# PERHITUNGAN SETELAN RELAI JARAK SUTT 150 KV
# GI TANGERANG LAMA - CENGKARENG
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# 1. Data SUTT 150 kV
j := sqrt(-1)
a := -0.5 + 0.5*j*sqrt(3)
k := 2*π/360
# 1.1 CENGKARENG - TANGERANG LAMA 1,2
# Jenis penghantar
# OHL-150kV-ACCC-LISBON-1x310mm (1250 A)
L1 := 9.23  # KM
R11 := 0.074
X11 := 0.482  # Ω  # /km
CCC := 1250  # A
# Imp. urutan positif
RL11 := R11*L1
XL11 := X11*L1  # Ω
ZL11 := (RL11 + j*XL11)
|ZL11| = 4.50099  # Ω
θph1 := arg(ZL11)*k^-1
θph1 = 81.2717  # deg
# Imp. urutan nol
R10 := (R11 + 0.15)
R10 = 0.224  # Ω  # /km
X10 := 3*X11
X10 = 1.446  # Ω  # /km
XL10 := 3*X11*L1
RL10 := (R11 + 0.15)*L1
ZL10 := (RL10 + j*XL10)
|ZL10| = 13.5058  # Ω
# 1.2  CENGKARENG - CENGKARENG BARU 1,2
# Jenis penghantar
# CAB-150kV-CU 2x2000mm (3168A)
L2 := 0.397  # km
R21 := 0.00655
X21 := 0.312  # Ω  # /km
# Imp. urutan positif
RL21 := R21*L2
XL21 := X21*L2  # Ω
ZL21 := (RL21 + j*XL21)
|ZL21| = 0.123891  # Ω
θph2 := arg(ZL21)*k^-1
θph2 = 88.7973  # deg
# Imp. urutan nol
R20 := (R21 + 0.15)
R20 = 0.15655  # Ω  # /km
X20 := 3*X21
X20 = 0.936  # Ω  # /km
XL20 := 3*X21*L2
RL20 := (R21 + 0.15)*L2
ZL20 := (RL20 + j*XL20)
|ZL20| = 0.376754  # Ω
# 1.3 CENGKARENG - DURIKOSAMBI 1,2
# Jenis penghantar
# OHL-150kV-ACSR 1x520 mm (1610A)
L3 := 10.32  # km
R31 := 0.0456
X31 := 0.46  # Ω  # /km
# Imp. urutan positif
RL31 := R31*L3
XL31 := X31*L3
ZL31 := (RL31 + j*XL31)
ZL31 = 0.470592 + 4.7472i  # Ω
|ZL31| = 4.77047
θph3 := arg(ZL31)*k^-1
θph3 = 84.3387  # deg
# Imp. urutan nol
XL30 := 3*X31*L3
RL30 := (R31 + 0.15)*L3
ZL30 := (RL30 + j*XL30)
|ZL30| = 14.3839  # Ω
# 1.4 DURIKOSAMBI - LMK
# Jenis penghantar
# OHL-150kV-DRAKE 1X468.45mm (780A)
L4 := 0.3  # km
R41 := 0.0823
X41 := 0.4063  # Ω  # /km
# Imp. urutan positif
RL41 := R41*L4
XL41 := X41*L4
ZL41 := (RL41 + j*XL41)
ZL41 = 0.02469 + 0.12189i  # Ω
|ZL41| = 0.124365
θph4 := arg(ZL41)*k^-1
θph4 = 78.5491  # deg
# Imp. urutan nol
XL40 := 3*X41*L4
RL40 := (R41 + 0.15)*L4
ZL40 := (RL40 + j*XL40)
|ZL40| = 0.372252  # Ω
# 2. Impedansi Trafo 150/20 KV GI CENGKARENG
# 2.1 GI CENGKARENG
XT11a := 0.12*150^2/60
XT11a = 45  # Ω  # asea
XT11b := 0.126*150^2/60
XT11b = 47.25  # Ω  # unindo
XT11c := 0.124*150^2/60
XT11c = 46.5  # Ω  # gec
XT11d := 0.121*150^2/60
XT11d = 45.375  # Ω  # xian
XT11e := 0.1203*150^2/60
XT11e = 45.1125  # Ω  # pauwels
# pilih XT terkecil
XT21 := XT11a = 45
# 3. PERHITUNGAN SETELAN RELAI JARAK
# 3.1  LINE 150 kV TANGERANG LAMA - CENGKARENG
# Distance relay Siemens - 7SL87
# 3.1.1 Ratio CT & PT
CT1 := 2000/5  # A
PT1 := 150000/100  # Volt
In := 5  # A
n1 := CT1/PT1
n1 = 0.266667
Vn := 100  # V
# 3.1.2 Scope of Functions
# 0110  : Trip Mode  1 Pole -/3 Pole
# 0112  : 21 Phase Distance Protection  MHO
# 0113  : 21G Ground Distance Protection  Quadrilateral
# 0121  : 85-21 Pilot Protection for Distance  PUTT/POTT
# 0124  : 50HS High Speed SOTF  Enable
# 0131  : Earth Fault O/C  Definite Time
# 0132  : Teleprot E/F  Directional Comp.
# 0138  : Fault Locator  Enable
# 3.1.3 Power System Data
# 1105 : Line Angle
θph1 = 81.2717  # deg
θph1 := 82  # degree
# 1110 : X'
X11 = 0.482  # Ohm/km
X11s := X11*n1 = 0.128533  # Ohm/km
# 1111 : Line Length
L1 = 9.23  # km
# 1116 : RE/RL(Z1) | Kr
# - Zero Sequence compensatio factor RG/RL(Z1) : R01
R01 := 1/3*(R10/R11 - 1)
R01 = 0.675676
R01 := 1.29
# 1117 : XE/XL(Z1) | Kx
# - Zero Sequence compensatio factor XG/XL(Z1) : X01
X01 := 1/3*(X10/X11 - 1)
X01 = 0.666667
X01 := 0.667
# 1118 : RE/RL(ZB..Z5)
# - Zero Sequence compensatio factor RG/RL(ZB...5) : R0B...5
R0B5 := 1/3*(R10/R11 - 1)
R0B5 = 0.675676
R0B5 := 1.29
# 1119 : XE/XL(ZB..Z5)
# - Zero Sequence compensatio factor XG/XL(ZB...5) : X0B...5
X0B5 := 1/3*(X10/X11 - 1)
X0B5 = 0.666667
X0B5 := 0.667
# 1120 : K0
K0 := 1/3*(ZL10/ZL11 - 1)
|K0| = 0.666875
K0 := 0.69
# 1121 : Angle K0
ZL10/ZL11 - 1 = 2.00062 - 0.00405383i
φK0 := arg(0.41/2.03) - k^-1 = -57.2958
φK0 := -57.296
# 3.1.3  Paramaterblock 12xx: 21 Distance protection, general setting
# 1201 : FCT Distance  = On
# 1202 : Minimum Iph>  = 0.1 A
# 1232 : Inst. Trip SOTF  = with Zone1B
# 1241 : R load (ph-E)  =
# - Load impedance
Zld := Vn/sqrt(3)/In
Zld = 11.547  # Ω (secondary)
# - Power factor load angle
θld := ((32 + 5)*k)
# - Resistance/Reactance
# impedance limit
Rld := Zld*cos(θld)*0.5
Rld = 4.61092  # Ω (secondary)
Xld := Zld*sin(θld)*0.5
Xld = 3.47458  # Ω (secondary)
# - Foot resistance
RfS := 40*n1
RfS = 10.6667  # Ω (secondary)
# Resistive Reach calculation :
Zloadmin := Zld*0.8
Zloadmin = 9.2376  # Ω  # sekunder  # Zr
Z1safety := 0.5*Zld
Z1safety = 5.7735  # Ω  # (sekunder)
# Resistive reach max :
Rgmax := Z1safety
Rgmax = 5.7735  # Ω  # sekunder
# Resistive reach min :
Rgmin := 10*n1
Rgmin = 2.66667  # Ω  # sekunder
# R load (ph-E)
RLphE := Rgmax
RLphE = 5.7735  # Ω  # sekunder
# 1242 : phi load (ph-E)
θLphE := θld/k
θLphE = 37  # degree
# 1243 : R load (ph-ph)
RLphph := Rgmax
RLphph = 5.7735  # Ω  # sekunder
# 1244 : phi load (ph-ph)
θLphph := θld/k
θLphph = 37  # degree
# 1203 : 3I0>, load current
# unbalance
Io := 0.1
Io = 0.1  # A  # sekunder
# 1204 : 3V0>, load voltage
# unbalance
Vo := 20
Vo = 20  # V  # sekunder
# 1207A : 3I0>Iphmax
IoIph := 0.1
IoIph = 0.1  # V  # sekunder
# 3.1.4  Paramaterblock 13xx: 21 Distance Zones Quadrilateral
# Rod insulator length
Larc := 3  # m
# Acuan Jarak Konduktor Fasa:
# 70 kV (1.5 meter)
# 150 kV (3.0 meter)
# 500 kV (8.0 meter)
# Short Circuit Current
Ihs3f := 23850  # A
# untuk hubung singkat
# dari P2B semester 1 2019 3phasa : 39878.52
# 1phasa : 41640.4
# dari digsilent 09 Oktober 2019
# 3phasa : 72901.86
# 1phasa : 82418.54
Ihs2f := sqrt(3)/2*Ihs3f
# Arc current
Iarc := Ihs2f  # A
# Foot resistance of tower
# (Rfoot)
Rfood := 20  # Ohm
# Arc resistance
Rarc1 := 28700*Larc/Iarc^1.4
Rarc1 = 0.0783387  # Ω  # primer
RL11 = 0.68302
# Rarc dipilih 0, bila nilai Rarc > dari RL11
Rarc := Rarc1*(|Rarc1| < |RL11|) + 0*(|RL11| < |Rarc1|)
# dipilih :
Rarc := □  # error: This placeholder is empty.
Rarc = 0.0783387
# Group Zone1 settings :
# 1301 : Op. mode Z1  = Forward
# 1302 : R (Z1)
RZ1P := ((0.8*RL11) + (0.5*Rarc))
RZ1P = 0.585585  # Ω  # (Primer)
RZ1 := RZ1P*n1
RZ1 = 0.156156  # Ω  # (Sekunder)
# 1303 : X (Z1)
XZ1P := 0.8*XL11
XZ1P = 3.55909  # Ω  # (Primer)
XZ1 := XZ1P*n1
XZ1 = 0.94909  # Ω  # (Sekunder)
Z1P := (RZ1P + j*XZ1P)
|Z1P| = 3.60694
Z1S := |Z1P|*n1 = 0.961851
# Setting Zone-1 terhadap Z line adalah
Z1% := |Z1P|/|ZL11|*100  # %
Z1% = 80.1367  # %
# 1302 : RG (Z1)
RGZ1P := ((0.8*RL11) + Rfood + Rarc)
RGZ1P = 20.6248  # Ω  # (Primer)
RGZ1 := RGZ1P*n1
RGZ1 = 5.49993  # Ω  # (Sekunder)
# Group Zone1B settings :
# 1351 : Op. mode Z1B  = Forward
# 1352 : R (Z1B)
Iinfeed := 1
RZ1BP := (0.8*(RL11 + 0.8*RL21*Iinfeed) + (0.5*Rarc))
RZ1BP = 0.58725  # Ω  # (Primer)
RZ1B := RZ1BP*n1
RZ1B = 0.1566  # Ω  # (Sekunder)
# 1353 : X (Z1B)
XZ1BPmin := 1.2*XL11
XZ1BPmin = 5.33863  # Ω  # (Primer)
XZ1BPmax1 := 0.8*(XL11 + 0.8*XL21*Iinfeed)
XZ1BPmax1 = 3.63836  # Ω  # (Primer)
XZ1BPmax2 := 0.8*(XL11 + 0.5*XT21*Iinfeed)
XZ1BPmax2 = 21.5591  # Ω  # (Primer)
# Dipilih Zone 1B terbesar tetapi tidak lebih besar dari zone 1B trafo
X21Bmak := XZ1BPmin*(|XZ1BPmin| > |XZ1BPmax1|) + XZ1BPmax1*(|XZ1BPmax1| > |XZ1BPmin|)
X1BP := X21Bmak*(|X21Bmak| < |XZ1BPmax2|) + XZ1BPmax2*(|XZ1BPmax2| < |X21Bmak|)
X1BP = 5.33863
|X1BP| = 5.33863  # Ω  # (Primer)
XZ1B := X1BP*n1
XZ1B = 1.42364  # Ω  # (Sekunder)
Z1BP := (RZ1BP + j*X1BP)
|Z1BP| = 5.37083  # Ω  # (Primer)
# Setting Zone-1B terhadap Z line adalah
Z1BS := |Z1BP|*n1 = 1.43222
Z1B% := |Z1BP|/|ZL11|*100  # %
Z1B% = 119.326  # %
# 1352 : RG (Z1B)
RGZ1BP := (0.8*(RL11 + 0.8*RL21*Iinfeed) + Rarc + 2*Rfood)
RGZ1BP = 40.6264  # Ω  # (Primer)
RGZ1B := RGZ1BP*n1
RGZ1B = 10.8337  # Ω  # (Sekunder)
# Group Zone2 settings :
# 1311 : Op. mode Z2  = Forward
# 1312 : R (Z2)
RZ2P := (0.8*(RL11 + 0.8*RL21*Iinfeed) + (0.5*Rarc))
RZ2P = 0.58725  # Ω  # (Primer)
RZ2 := RZ2P*n1
RZ2 = 0.1566  # Ω  # (Sekunder)
# 1313 : X (Z2)
XZ2Pmin := 1.2*XL11
XZ2Pmin = 5.33863  # Ω  # (Primer)
XZ2Pmax1 := 0.8*(XL11 + 0.8*XL21*Iinfeed)
XZ2Pmax1 = 3.63836  # Ω  # (Primer)
XZ2Pmax2 := 0.8*(XL11 + 0.5*XT21*Iinfeed)
XZ2Pmax2 = 21.5591  # Ω  # (Primer)
# Dipilih Zone 2 terbesar tetapi tidak lebih besar dari zone 2 trafo
X21mak := XZ2Pmin*(|XZ2Pmin| > |XZ2Pmax1|) + XZ2Pmax1*(|XZ2Pmax1| > |XZ2Pmin|)
X2P := X21mak*(|X21mak| < |XZ2Pmax2|) + XZ2Pmax2*(|XZ2Pmax2| < |X21mak|)
X2P = 5.33863
|X2P| = 5.33863  # Ω  # (Primer)
XZ2 := X2P*n1
XZ2 = 1.42364  # Ω  # (Sekunder)
Z2P := (RZ2P + j*X2P)
|Z2P| = 5.37083  # Ω  # (Primer)
# Setting Zone-2 terhadap Z line adalah
Z2S := |Z2P|*n1 = 1.43222
Z2% := |Z2P|/|ZL11|*100  # %
Z2% = 119.326  # %
# 1314 : RG (Z2)
RGZ2P := (0.8*(RL11 + 0.8*RL21*Iinfeed) + Rarc + 2*Rfood)
RGZ2P = 40.6264  # Ω  # (Primer)
RGZ2 := RGZ2P*n1
RGZ2 = 10.8337  # Ω  # (Sekunder)
# Group Zone3 settings :
# 1321 : Op. mode Z3  = Forward
# 1322 : R (Z3)
Iinfeed := 1
RZ3P := (1.2*(RL11 + RL31*Iinfeed) + (0.5*Rarc))
RZ3P = 1.4235  # Ω  # (Primer)
RZ3 := RZ3P*n1
RZ3 = 0.379601  # Ω  # (Sekunder)
# 1323 : X (Z3)
XZ3Pmin := 1.2*(XL11 + XL31)
XZ3Pmin = 11.0353  # Ω  # (Primer)
XZ3Pmax1 := 0.8*(XL11 + (Iinfeed*1.2*XL31))
XZ3Pmax1 = 8.1164  # Ω  # (Primer)
XZ3Pmax2 := 0.8*(XL11 + (Iinfeed*0.8*(XL31 + 0.8*XL41)))
XZ3Pmax2 = 6.6597  # Ω  # (Primer)
XZ3Pmax3 := 0.8*(XL11 + 0.8*XT21*Iinfeed)
XZ3Pmax3 = 32.3591  # Ω  # (Primer)
# Dipilih Zone 32 terbesar tetapi tidak lebih besar dari zone 3 trafo
X31 := XZ3Pmin*(|XZ3Pmin| > |XZ3Pmax1|) + XZ3Pmax1*(|XZ3Pmax1| > |XZ3Pmin|)
X32 := XZ3Pmax2*(|XZ3Pmax2| > |X31|) + X31*(|X31| > |XZ3Pmax2|)
X3P := XZ3Pmax3*(|X32| > |XZ3Pmax3|) + X32*(|XZ3Pmax3| > |X32|)
|X3P| = 11.0353  # Ω  # (Primer)
XZ3 := X3P*n1
XZ3 = 2.94274  # Ω  # (Sekunder)
Z3P := (RZ3P + j*X3P)
|Z3P| = 11.1267  # Ω  # (Primer)
Z3S := |Z3P|*n1 = 2.96712
# Setting Zone-3 terhadap Z line adalah
Z3% := |Z3P|/|ZL11|*100  # %
Z3% = 247.206  # %
# 1324 : RG (Z3)
RGZ3P := (1.2*(RL11 + RL31*Iinfeed) + Rarc + 2*Rfood)
RGZ3P = 41.4627  # Ω  # (Primer)
RGZ3 := RGZ3P*n1
RGZ3 = 11.0567  # Ω  # (Sekunder)
# Group Zone4 settings settings : NOT ACTIVE
# Group Zone5 settings : NOT ACTIVE
# 3.1.5  Paramaterblock 13xx: 21 Distance Zones MHO
# Group Zone1 (MHO) settings :
# 1401 : Op. mode Z1  = Forward
# 1402 : ZR (Z1)
ZRZ1P := 0.8*ZL11
|ZRZ1P| = 3.60079  # Ω  # (Primer)
ZRZ1 := ZRZ1P*n1
|ZRZ1| = 0.96021  # Ω  # (Sekunder)
θphZRZ1 := arg(ZRZ1)*k^-1
θphZRZ1 = 81.2717  # deg
# Setting Zone-1 terhadap Z line adalah
ZRZ1% := |ZRZ1P|/|ZL11|*100  # %
ZRZ1% = 80  # %
# Group Zone1B- Extends (MHO) settings :
# 1451 : Op. mode Z1B  = Forward
# 1452 : ZR (Z1B)
Z2min := 1.2*ZL11
|Z2min| = 5.40118  # Ω  # (Primer)
Z2mak1 := (ZL11 + (0.8*ZL21)*Iinfeed)*0.8
|Z2mak1| = 3.67941  # Ω  # (Primer)
Z2mak2 := (ZL11 + 0.8*ZL21)*0.8
|Z2mak2| = 3.67941  # Ω  # (Primer)
ZTrf := 0.8*(ZL11 + 0.5*XT21*j)  # arah trafo di GI
|ZTrf| = 21.566  # Ω  # (Primer)
# Dipilih Zone 2 terbesar tetapi tidak lebih besar dari zone 2 trafo
Z21mak := Z2mak1*(|Z2mak1| > |Z2min|) + Z2min*(|Z2min| > |Z2mak1|)
ZRZ1BP := Z21mak*(|Z21mak| < |ZTrf|) + ZTrf*(|ZTrf| < |Z21mak|)
ZRZ1BP = 0.819624 + 5.33863i
|ZRZ1BP| = 5.40118  # Ω  # (Primer)
ZRZ1B := ZRZ1BP*n1
|ZRZ1B| = 1.44032  # Ω  # (Sekunder)
θphZRZ1B := arg(ZRZ1B)*k^-1
θphZRZ1B = 81.2717  # deg
# Setting Zone-1B terhadap Z line adalah
ZRZ1B% := |ZRZ1BP|/|ZL11|*100  # %
ZRZ1B% = 120  # %
# 1357 : Z1B enabled before 1st AR : NO
# Group Zone2 (MHO) settings :
# 1411 : Op. mode Z2  = Forward
# 1412 : ZR (Z2)
Iinfeed := 1
Z2min := 1.2*ZL11
|Z2min| = 5.40118  # Ω  # (Primer)
Z2mak1 := (ZL11 + (0.8*ZL21)*Iinfeed)*0.8
|Z2mak1| = 3.67941  # Ω  # (Primer)
Z2mak2 := (ZL11 + 0.8*ZL21)*0.8
|Z2mak2| = 3.67941  # Ω  # (Primer)
ZTrf := 0.8*(ZL11 + 0.5*XT21*j)  # arah trafo di GI
|ZTrf| = 21.566  # Ω  # (Primer)
# Dipilih Zone 2 terbesar tetapi tidak lebih besar dari zone 2 trafo
Z21mak := Z2mak1*(|Z2mak1| > |Z2min|) + Z2min*(|Z2min| > |Z2mak1|)
ZRZ2P := Z21mak*(|Z21mak| < |ZTrf|) + ZTrf*(|ZTrf| < |Z21mak|)
ZRZ2P = 0.819624 + 5.33863i
|ZRZ2P| = 5.40118  # Ω  # (Primer)
ZRZ2 := ZRZ2P*n1
|ZRZ2| = 1.44032  # Ω  # (Sekunder)
θphZRZ2 := arg(ZRZ2)*k^-1
θphZRZ2 = 81.2717  # deg
# Setting Zone-2 terhadap Z line adalah
ZRZ2% := |ZRZ2P|/|ZL11|*100  # %
ZRZ2% = 120  # %
# Group Zone3 (MHO) settings :
# 1421 : Op. mode Z3  = Forward
# 1422 : ZR (Z3)
Iinfeed := 1
Z3min := 1.2*(ZL11 + Iinfeed*ZL31)
|Z3min| = 11.1218  # Ω  # (Primer)
Z3mak1 := 0.8*(ZL11 + (1.2*ZL31)*Iinfeed)
|Z3mak1| = 8.17755  # Ω  # (Primer)
Z3mak2 := 0.8*(ZL11 + (0.8*(ZL31 + 0.8*ZL41)*Iinfeed))
|Z3mak2| = 6.71503  # Ω  # (Primer)
Z3mak3 := 0.8*(ZL11 + 0.8*(ZL31 + 0.8*ZL41))
|Z3mak3| = 6.71503  # Ω  # (Primer)
Z3Trf := 0.8*(ZL11 + 0.8*XT21*j)  # arah trafo di GI
|Z3Trf| = 32.3637
Z31 := Z3mak1*(|Z3mak1| > |Z3mak2|) + Z3mak2*(|Z3mak2| > |Z3mak1|)
Z32 := Z31*(|Z31| > |Z3min|) + Z3min*(|Z3min| > |Z31|)
ZRZ3P := Z3Trf*(|Z32| > |Z3Trf|) + Z32*(|Z3Trf| > |Z32|)
|ZRZ3P| = 11.1218  # Ω  # (Primer)
ZRZ3 := ZRZ3P*n1
|ZRZ3| = 2.9658  # Ω  # (Sekunder)
θphZRZ3 := arg(ZRZ3)*k^-1
θphZRZ3 = 82.8498  # deg
# Setting Zone-3 terhadap Z line adalah
ZRZ3% := |ZRZ3P|/|ZL11|*100  # %
ZRZ3% = 247.096  # %
# Group Zone4 (MHO) settings settings : NOT ACTIVE
# Group Zone5 (MHO) settings : NOT ACTIVE
# 3.1.6  Paramaterblock 13xx: 21 Distance Protection, time delays
# Timer Zone 2,3
# A. Timer Zone 2
|ZL11| = 4.50099
q := |Z2P - ZL11|
q = 0.894911
X1sg := 0.8*XL21
|X1sg| = 0.0990912  # Ω  # (Primer)
# Lihat apakah Z2bs - (ZL11) < dari Z1sg, maka T2bs = 0.4 detik  jika tidak T2bs=0.8 detik
T2a := 0.4
T2b := 0.8
T2 := T2a*((|Z2P| - |XL11|) < |X1sg|) + T2b*((|Z2P| - |XL11|) > |X1sg|)
T2 = 0.8
# B. Timer Zone 3
# Setting waktu tunda untuk Zone-3 ditentukan 1.6 detik
T3 := 1.6  # detik
# 1305 : T1-1phase  = 0.00 sec
# 1306 : T1-multiphase  = 0.00 sec
#
# 1315 : T2-1phase  = 0.40 sec
# 1316 : T2-multiphase  = 0.40 sec
#
# 1325 : T3 delay  = 1.60 sec
# 3.2.1  Paramaters 21xx: 85-21 Teleprotection for Distance protection
# 2101 : FCT Telep. Dis.  = ON
# 2102 : Type of line  = Two terminals
# 3.2.2  Paramaters 24xx: Instantenous High Speed SOTF
# 2401 : FCT SOTF-O/C  = ON
# 2402 : 50HS SOTF Pickup
SOTF := 2.5*In
SOTF = 12.5  # A
# 3.3  DEF
# 3101  FCT E.F OC  : ON
# 3102  Blocked for DR  : W/ every pickup
# 3103  Block 1pDeadTime  : YES
#
# 3110  Op mode 3I0>>>  : Inactive
# 3120  Op mode 3I0>>>  : Inactive
# 3140  Op mode 3I0>>>  : Inactive
#
# 3110  Op mode 3I0>  : Inactive
# 3131  3I0>  : 0.1 A
# 3132  T 3I0>  : 2 detik
# 3133  Instant trip pilot  : YES
# 3134  Instant trip SOTF  : NO
# 3135  Instant blocking  : NO
#
# 3160  POLARIZATION  : UO+IY
#
# 3201  85-67 Pilot Prot For Dir GF  : ON
# 3202  Type of line  : Two terminal
