# PERHITUNGAN SETELAN RELAI JARAK SUTT 150 KV
# DURIKOSAMBI - MUARAKARANG LAMA 1
# GE - D60
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# 1. Data SUTT 150 kV
k := 2*π/360
j := sqrt(-1)
a := -0.5 + 0.5*j*sqrt(3)
# 1.1 Durikosambi - Muarakarang Lama
# OHL-150kV-DRAKE 2X468.5mm (1560A)
L1 := 12.9  # km
ccc := 1560  # A
RL11 := 0.0411
XL11 := 0.2812  # Ω  # /km
# Imp. urutan positif
RL11 = 0.0411
XL11 = 0.2812  # Ω/km
ZL11 := (RL11 + j*XL11)*L1
ZL11 = 0.53019 + 3.62748i  # Ω
θph1 := arg(ZL11)*k^-1
θph1 = 81.6846  # deg
# Imp. urutan nol
RL10 := 0.15 + RL11
RL10 = 0.1911
Ω/km
XL10 := 3*XL11
XL10 = 0.8436
ZL10 := (RL10 + j*XL10)*L1
ZL10 = 2.46519 + 10.8824i  # Ω
|ZL10| = 11.1582  # Ω
θN1 := arg(ZL10)*k^-1
θN1 = 77.2363  # deg
# 1.2  Muarakarang Lama - Muarakarang Baru
# Jenis penghantar
# OHL-150kV-DRAKE 2X468.5mm (1560A)
L2 := 0.7  # km
RL21 := 0.0411
XL21 := 0.2812  # Ω  # /km
# IMPEDANSI URUTAN POSITIP
ZL21 := (RL21 + j*XL21)*L2
ZL21 = 0.02877 + 0.19684i  # Ω
|ZL21| = 0.198931
θph2 := arg(ZL21)*k^-1
θph2 = 81.6846  # deg
# IMPEDANSI URUTAN NOL
RL20 := RL21 + 0.15
XL20 := 3*XL21
ZL20 := (RL20 + j*XL20)*L2
ZL20 = 0.13377 + 0.59052i  # Ω
|ZL20| = 0.605482
θN2 := arg(ZL20)*k^-1
θN2 = 77.2363  # deg
# 1.3  Muarakarang Lama - UGC Angke
# Jenis penghantar | CAB-150 KV 2XSK2Y 2x1200 mm (1752 A)
RL31 := 0.0752
XL31 := 0.468  # Ω  # /km
L3 := 3.6  # km
# Imp. urutan positif
ZL31 := (RL31 + j*XL31)*L3
ZL31 = 0.27072 + 1.6848i  # Ω
|ZL31| = 1.70641  # Ω
θph3 := arg(ZL31)*k^-1
θph3 = 80.8715  # deg
# Imp. urutan nol
RL30 := 0.15 + RL31
XL30 := 3*XL31
ZL30 := (RL30 + j*XL30)*L3
ZL30 = 0.81072 + 5.0544i  # Ω
|ZL30| = 5.11901  # Ω
θN3 := arg(ZL30)*k^-1
θN3 = 80.8874  # deg
# 1.4 Angke - Ketapang
# Jenis penghantar | CAB-150kV-CU 240mm (550A)
RL41 := 0.087
XL41 := 0.132  # Ω  # /km
L4 := 5.5  # km
# Imp. urutan positif
ZL41 := (RL41 + j*XL41)*L4
ZL41 = 0.4785 + 0.726i  # Ω
|ZL41| = 0.869505  # Ω
θph4 := arg(ZL41)*k^-1
θph4 = 56.6115  # deg  # Ω
# Imp. urutan nol
RL40 := RL41 + 0.15
XL40 := 3*XL41
ZL40 := (RL40 + j*XL40)*L4
ZL40 = 1.3035 + 2.178i  # Ω
|ZL40| = 2.53827
θN4 := arg(ZL40)*k^-1
θN4 = 59.1001  # deg
# 2.1. Impedansi Trafo di GI Muarakarang Lama (Asumsi trafo PT)
# Trafo-1 150/20 KV, 60 MVA, 12,5%
XT11a := 0.125*150^2/60
XT11a = 46.875  # Ω
# Dipilih impedansi terkecil
# Dipilih
XT1 := XT11a = 46.875
# 3. PERHITUNGAN SETELAN RELE JARAK
# Distance relay GE - D60 (Pola PUTT)
# 3.1.1 Ratio CT & PT
CT1 := 2000/5  # A
PT1 := 150000/100  # Volt
In := 1  # A
CTp := 1250
n1 := CT1/PT1
n1 = 0.266667
kV := 150000
Vn := 100/sqrt(3)  # V
# 3.1.2 Jangkauan Impedansi
# ZONE-1 Phase
Z1P := 0.8*ZL11
|Z1P| = 2.93282  # Ω  # (Primer)
Z1S := Z1P*n1  # %
|Z1S| = 0.782085  # Ω  # (Sekunder)
%Z1 := |Z1P|*100/|ZL11| = 80
# ZONE-2 Phase
# Infeed
K := 1
Z2min := 1.2*ZL11
|Z2min| = 4.39923  # Ω  # (Primer)
Z2mak1 := 0.8*(ZL11 + (0.8*ZL21)*K)
|Z2mak1| = 3.06013  # Ω  # (Primer)
ZTrf2 := 0.8*(ZL11 + 0.5*XT1*j)
|ZTrf2| = 21.6561  # Ω  # (Primer)
Z2b := ZL11 + 0.8*ZL21
|Z2b| = 3.82517  # Ω  # (Primer)
# Dipilih Zone 2 terbesar tetapi tidak lebih besar dari zone 2 trafo
Z21mak := Z2mak1*(|Z2mak1| > |Z2min|) + Z2min*(|Z2min| > |Z2mak1|)
Z22mak := Z21mak*(|Z21mak| < |ZTrf2|) + ZTrf2*(|ZTrf2| < |Z21mak|)
Z2P := Z22mak
Z2P = 0.636228 + 4.35298i
|Z2P| = 4.39923  # Ω  # (Primer)
Z2S := Z2P*n1
|Z2S| = 1.17313  # Ω  # (Sekunder)
%Z2 := |Z2P|*100/|ZL11| = 120  # %
# ZONE-3 Forward Phase
K3 := 1
Z3min := 1.2*(ZL11 + ZL31)
|Z3min| = 6.44678  # Ω  # (Primer)
Z3mak1 := 0.8*(ZL11 + (1.2*ZL31)*K3)
|Z3mak1| = 4.57087  # Ω  # (Primer)
Z3mak2 := 0.8*(ZL11 + (K3*(0.8*(ZL31 + 0.8*ZL41))))
|Z3mak2| = 4.43275  # Ω  # (Primer)
ZTrf3 := 0.8*(ZL11 + 0.8*XT1*j)
|ZTrf3| = 32.9047  # Ω  # (Primer)
Z3b := (ZL11 + (K3*(0.8*(ZL31 + 0.8*ZL41))))
|Z3b| = 5.54094  # Ω  # (Primer)
Z31 := Z3mak1*(|Z3mak1| > |Z3mak2|) + Z3mak2*(|Z3mak2| > |Z3mak1|)
Z32 := Z31*(|Z31| > |Z3min|) + Z3min*(|Z3min| > |Z31|)
Z3P := ZTrf3*(|Z32| > |ZTrf3|) + Z32*(|ZTrf3| > |Z32|)
|Z3P| = 6.44678  # Ω  # (Primer)
Z3S := Z3P*n1
|Z3S| = 1.71914  # Ω  # (Sekunder)
|ZL11| + |ZL21| = 3.86495  # Ω  # (Primer)
Z3% := |Z3P|/|ZL11|*100 = 175.852
# 3.1.3.  Setelan Waktu
# Timer
# Zone-1
t1 := 0.0
tk1g := 0.0
# Zone-2
|ZL11| = 3.66602
q := |Z2P - ZL11|
q = 0.733204
Z1sg := 0.8*ZL21
|Z1sg| = 0.159145  # Ω  # (Primer)
# Lihat apakah Z2bs - (ZL11) < dari Z1sg, maka T2bs = 0.4 detik  jika tidak T2bs=0.8 detik
T2a := 0.4
T2b := 0.8
T2 := T2a*(q < |Z1sg|) + T2b*(q > |Z1sg|)
T2 = 0.8
tk2 := T2
t2 := 0.4
tk2g := 0.4
# Zone-3
t3 := 1.6
tk3g := 1.6
# 3.1.4. Kompensasi Urutan Nol
Ko := ZL10/ZL11
|Ko| = 3.04367
θphKo := arg(Ko)*k^-1
θphKo = -4.44832  # deg
# 3.1.5. Impedansi beban  (  ZL  )
ccc = 1560  # A
kV = 150000  # V
# Zload maksimum
ZLoadP := kV/(ccc*sqrt(3))
ZLoadP = 55.5144  # Ω  # (Primer)
ZLoadS := n1*ZLoadP
ZLoadS = 14.8039  # Ω  # (Skunder)
# 50 % Zload
ZL := 0.5*ZLoadS
ZL = 7.40193  # Ω  # (Skunder)
# Jangkauan Resistive Tidak Melebihi 0.5 Beban, tetapi beban tidak mungkin mencapai maksimum
Resistive := 0.5*n1*kV/(ccc*sqrt(3))
Resistive = 7.40193  # Ω  # (Skunder)
# Blinder
# Magnitude
# Right Blinder
BLD := 0.9*Resistive
BLD = 6.66173  # Ω  # (Sekunder)
# Left  Blinder
BLD := 0.9*Resistive
BLD = 6.66173  # Ω  # (Sekunder)
# Angle
θBLD := arg(ZL11)*k^-1
θBLD = 81.6846  # deg
# Konstanta komp.
# impedansi urutan nol
Z1K0 := 0.95*Ko
|Z1K0| = 2.89149
# Impedansi total line
ZP := ZL11*n1
|ZP| = 0.977606  # Ω/ph  # (Sekunder)
# 3.1.6. SOTF  (Line Pick up Element)
# Parameter  : LINE PICKUP
# Function  : Enable
# Source  : SRC1
# Ph IOC Line Pickup
IOC := 2  # pu
# Line Pickup UV PKP
UV := 0.7  # pu
# Line End Open Pickup Delay
Tdpc := 0.2  # sec
# Line End Open Reset Delay
Tdres := 0.2  # sec
# Line Pickup OV PKP Delay
tdUV := 0.2  # sec
# 3.1.7. PUTT (DR) Scheme
# Parameter  : PUTT
# PUTT Schme Function  : Enable
# PUTT Rx Pickup Delay  : 0.012 sec
# PUTT Seal in Delay  : 0.024 sec
# PUTT No Of Comm Bit  :  1
# PUTT Rx 1  : Rec Dist On (W1a)
# PUTT Scheme Target  : Latched
# PUTT Scheme event  : Enable
# 3.1.8. Power Swing Element, 78 : Power Swing Block OP
# Syarat : Z3 < ZPS <  50% Zload
ZL := 0.5*ZLoadS
|Z3S| = 1.71914
ZL = 7.40193
# Power Swing Reach
FORBL := ZL
FORBL = 7.40193  # Ω  # (Sekunder)
# Power Swing Inner
INN := ZL
INN = 7.40193  # Ω  # (Sekunder)
# Power Swing Reach
OUT := ZL
OUT = 7.40193  # Ω  # (Sekunder)
# Delay pickup
Td := 50  # ms
# 3.1.8 DEF ~ BLOCK
# 3.1.9 FAULT REPORT
# Positive Seq (Z1) Mag
|ZL11|*n1 = 0.977606
# Positive Seq (Z1) Angle
θph1 = 81.6846
# Zero Seq (Z0) Mag
|ZL10|*n1 = 2.97551
# Zero Seq (Z0) Angle
θPh10 := θN1
θPh10 = 77.2363
# Line Length
L1 = 12.9
# 3.20 LOAD ENCROACHMENT
# Setting :
# Load encroahment function: | Setting = Enabled
# Load encroachment minimum voltage :
V_1 := 0.25  # pu
# Load encroachment reach :
# Jangkauan reach encroahment = 1/2 Z load
Z_res_reach := ZL = 7.40193  # ohm
# Load encroachment angle
Angle := 30  # deg
# Load encroachment pick up delay:
t_pickup := 0  # sec
# Load encroachment reset delay :
t_reset := 0  # sec
# Load encroachment block: | Setting = OFF
# Load encroachment target : | Setting = self reset
# Load encroachment events : | Setting = enabled
# Jangkauan Zone 1  Zone 2  , dan Zone 3
# dipotong oleh Load Encroachment
|Z1S| = 0.782085
|Z2S| = 1.17313
|Z3S| = 1.71914
Z_res_reach = 7.40193
# SETTING RELE GE D60
# GI | : SURALAYA
# PROTEKSI | : MCCI
# Rasio CT | : 1250/1  A
# Rasio PT | : 150.000/100  V
# Urutan Positif
# :
|ZL11|*n1 = 0.977606  # Ohm/phase
# Urutan Nol
# :
|ZL10|*n1 = 2.97551  # Ohm/phase
# Panjang saluran
# :
L1 = 12.9  # km
# Arus Nominal Relay
# :
In = 1  # A
# Perhitungan Tap Sekunder
# I. Configuration Setting
# 1.1 Current
# Phase CT Primary | : 1250  A
# Phase CT Secondary | : 1  A
# Ground CT Primary | : 1250  A
# Ground CT Secondary | : 1  A
# 1.2 Voltage
# Phase VT Connection | : Wye
# Phase VT Secondary | : 57.8  V
# Phase VT Ratio | : 1500:1
# Auxiliary VT Connection | : Vn
# Auxiliary VT Secondary | : 57.8  V
# Auxiliary VT Ratio | : 150000:100
# 1.3 Power System
# Nominal Frequency | : 50  Hz
# Phase Rotation | : ABC
# Freq and Phase Ref | : UN-KR (SRC 1)
# 1.4 Signal Source
# Source 1 Name | : UN - KR
# Phase CT | : F1
# Ground CT | : F1
# Phase VT | : F5
# Aux PT | : F5
# II.  Phase Distance Z1 MHO
# Ph Dis Z1 Reach
|Z1S| = 0.782085  # Ω  # (Sekunder)
# Ph Dis Z1 Direction | FORWARD
# Ph Dis Z1 Comp Limit
θph1 = 81.6846  # degree
# Ph Dis Z1 Delay
tk1ph := t1
tk1ph = 0  # sec
θph1 = 81.6846
# Ph Dist Z1 Supv
Isupv := 1.2  # pu
# RCA
RCA := θph1 = 81.6846  # degree
# COMPLIMIT
COMPLIMIT := 90  # degree
# DIR RCA
DIRRCA := 45  # degree
# DIR COMPLIMIT
DIRCOMPLIMIT := 60  # degree
# III.  Ground Distance Z1 QUAD
# Gnd Dis Z1 Reach
|Z1S| = 0.782085  # Ω  # (Sekunder)
# Gnd Dis Z1 Direction | FORWARD
# Gnd Dis Z1 Delay
tk1ph = 0  # sec
# Gnd Dist Z1 Supv
Isupv := 0.2  # pu
# Z0/Z1 Mag
|Ko| = 3.04367
# Z0/Z1 Ang
θphKo = -4.44832  # degree
# Z0M/Z1 Mag
KoM := 0
# Z0M/Z1 Ang
θphKoM := 0  # degree
# Right Blinder Magnitude
RBLD := BLD
RBLD = 6.66173  # Ω  # (Sekunder)
# Right Blinder Angle
θRBLD := θBLD
θRBLD = 81.6846  # degree
# Left Blinder Magnitude
LBLD := BLD
LBLD = 6.66173  # Ω  # (Sekunder)
# Left Blinder Angle
θLBLD := θBLD
θLBLD = 81.6846  # degree
# RCA
θPh10 := θN1
θPh10 = 77.2363  # degree
# COMPLIMIT
COMPLIMIT := 90  # degree
# DIR RCA
DIRRCA := 45  # degree
# DIR COMPLIMIT
DIRCOMPLIMIT := 60  # degree
# RIGHT BLINDER RCA
RGTBLDRCA := θBLD = 81.6846  # degree
# LEFT BLINDER RCA
LFTBLDRCA := θBLD = 81.6846  # degree
# IV.  Phase Distance Z2 MHO
# Ph Dis Z2 Reach
|Z2S| = 1.17313  # Ω  # (Sekunder)
# Ph Dis Z2 Direction | FORWARD
# Ph Dis Z2 Delay
tk2ph := t2
tk2ph = 0.4  # sec
# Ph Dis Z2 Supv
Isupv := 1.2  # pu  # pu
# RCA
RCA = 81.6846  # degree
# COMPLIMIT
COMPLIMIT := 90  # degree
# DIR RCA
DIRRCA := 45  # degree
# DIR COMPLIMIT
DIRCOMPLIMIT := 60  # degree
# V.  Ground Distance Z2 QUAD
# Gnd Dis Z2 Reach
|Z2S| = 1.17313  # Ω  # (Sekunder)
# Gnd Dis Z2 Direction | FORWARD
# Gnd Dis Z2 Delay
tk2ph = 0.4  # sec
# Gnd Dist Z2 Supv
Isupv := 0.2  # pu
# Z0/Z1 Mag
|Ko| = 3.04367
# Z0/Z1 Ang
θphKo = -4.44832  # degree
# Z0M/Z1 Mag
|KoM| = 0
# Z0M/Z1 Ang
θphKoM = 0  # degree
# Right Blinder Magnitude
RBLD := BLD
RBLD = 6.66173  # Ω  # (Sekunder)
# Right Blinder Angle
θRBLD := θBLD
θRBLD = 81.6846  # degree
# Left Blinder Magnitude
LBLD := BLD
LBLD = 6.66173  # Ω  # (Sekunder)
# Left Blinder Angle
θLBLD := θBLD
θLBLD = 81.6846  # degree
# RCA
θPh10 := θN1
θPh10 = 77.2363  # degree
# COMPLIMIT
COMPLIMIT := 90  # degree
# DIR RCA
DIRRCA := 45  # degree
# DIR COMPLIMIT
DIRCOMPLIMIT := 60  # degree
# RIGHT BLINDER RCA
RGTBLDRCA := θBLD = 81.6846  # degree
# LEFT BLINDER RCA
LFTBLDRCA := θBLD = 81.6846  # degree
# VI.  Phase Distance Z3 MHO
# Ph Dis Z3 Reach
|Z3S| = 1.71914  # Ω  # (Sekunder)
# Ph Dis Z3 Direction | FORWARD
# Ph Dis Z3 Delay
tk3ph := t3
tk3ph = 1.6  # sec
# Ph Dis Z3 Supv
Isupv := 1.2  # pu
# RCA
RCA = 81.6846  # degree
# COMPLIMIT
COMPLIMIT := 90  # degree
# DIR RCA
DIRRCA := 45  # degree
# DIR COMPLIMIT
DIRCOMPLIMIT := 60  # degree
# VII.  Ground Distance Z3 QUAD
# Gnd Dis Z3 Reach
|Z3S| = 1.71914  # Ω  # (Sekunder)
# Gnd Dis Z3 Direction | FORWARD
# Gnd Dis Z3 Delay
tk3ph = 1.6  # sec
# Gnd Dist Z3 Supv
Isupv := 0.2  # pu  # pu
# Z0/Z1 Mag
|Ko| = 3.04367
# Z0/Z1 Ang
θphKo = -4.44832  # degree
# Z0M/Z1 Mag
|KoM| = 0
# Z0M/Z1 Ang
θphKoM = 0  # degree
# Right Blinder Magnitude
RBLD := BLD
RBLD = 6.66173  # Ω  # (Sekunder)
# Right Blinder Angle
θRBLD := θBLD
θRBLD = 81.6846  # degree
# Left Blinder Magnitude
LBLD := BLD
LBLD = 6.66173  # Ω  # (Sekunder)
# Left Blinder Angle
θLBLD := θBLD
θLBLD = 81.6846  # degree
# RCA
θPh10 := θN1
θPh10 = 77.2363  # degree
# COMPLIMIT
COMPLIMIT := 90  # degree
# DIR RCA
DIRRCA := 45  # degree
# DIR COMPLIMIT
DIRCOMPLIMIT := 60  # degree
# RIGHT BLINDER RCA
RGTBLDRCA := θBLD = 81.6846  # degree
# LEFT BLINDER RCA
LFTBLDRCA := θBLD = 81.6846  # degree
# VIII. SOTF/Line Pick up Element
# Parameter  : LINE PICKUP
# Function  : Enable
# Source  : SRC1
# Ph IOC Line Pickup  :
# Line Pickup UV PKP  :
# Line End Open Pickup Delay  :
# Line End Open Reset Delay  :
# Line Pickup OV PKP Delay  :
# AR Coord Bypass  : Enable
# AR Co-ord Pickup Delay  : Disable
# AR Co-ord Reset Delay  : Disable
# Terminal Open  : Breaker Open
# AR Accelerate  : ACC AR On
# Reverse Pickup  : SCR1 VT Fuse Fail OP
# Line Pick up Block  : OFF
#
# Line Pick up Target  : Self-Reset
# Line Pick up Event  : Enable
IOC := 2  # pu
UV := 0.7
Tdpc := 0.2
Tdres := 0.2
tdUV := 0.2
# IX PUTT (DR) Scheme
# Parameter  : PUTT
# PUTT Schme Function  : Enable
# PUTT Rx Pickup Delay  : 0.012 sec
# PUTT Seal in Delay  : 0.024 sec
# PUTT No Of Comm Bit  :  1
# PUTT Rx 1  : Rec Dist On (W1a)
# PUTT Scheme Target  : Self-Reset
# PUTT Scheme event  : Enable
# X OOS Swing , 78 : Blocked
# XI. DEF : Disabled
# XII. A/R  : Internal
# XIII. Synchrocheck  : Internal
# XIV. OOS  : Blocked
# XV. OC  : Blocked
# XVI. Breaker Fail  : Blocked
# XVII. Power Swing Element : Power Swing Block OP
# Power Swing Reach
FORBL := ZL
FORBL = 7.40193  # Ω  # (Sekunder)
# Power Swing Inner
INN := ZL
INN = 7.40193  # Ω  # (Sekunder)
# Power Swing Reach
OUT := ZL
OUT = 7.40193  # Ω  # (Sekunder)
# Delay pickup
Td := 50  # ms
# XVIII. Fault Report
# Positive Seq (Z1) Mag
|ZL11|*n1 = 0.977606
# Positive Seq (Z1) Angle
θph1 = 81.6846
# Zero Seq (Z0) Mag
|ZL10|*n1 = 2.97551
# Zero Seq (Z0) Angle
θPh10 := θN1
θPh10 = 77.2363  # degree
# Line Length
L1 = 12.9
