# PERHITUNGAN SETELAN RELAI JARAK SUTT 150 KV
# LONTAR - TANGERANG BARU
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# 1. Data SKTT
# 1.1  GI LONTAR - TANGERANG BARU 2
j := sqrt(-1)
a := -0.5 + 0.5*j*sqrt(3)
k := 2*π/360
# OHL-150kV-TACSR 2X410/60mm2 (2730A)
Iccc := 2730  # A
R11a := 0.036  # Ω/km
X11a := 0.282  # Ω/km
L11a := 21.23  # km  # Diisi
L1 := L11a
# Imp. urutan positif
L1 = 21.23
RL1a := R11a*L11a
RL1a = 0.76428
XL1a := X11a*L11a
XL1a = 5.98686
ZL11 := (RL1a + j*XL1a)
ZL11 = 0.76428 + 5.98686i  # Ω
|ZL11| = 6.03545  # Ω
θph1 := arg(ZL11)*k^-1
θph1 = 82.725  # deg
# Imp. urutan nol
R10a := 0.15 + R11a
R10a = 0.186
X10a := 3*X11a
X10a = 0.846
ZL10 := (R10a + j*X10a)*L11a
ZL10 = 3.94878 + 17.9606i  # Ω
|ZL10| = 18.3895  # Ω
θN1 := arg(ZL10)*k^-1
θN1 = 77.6003  # deg
# Imp. mutual
ZM10 := 0.0493 + j*0.2962
|ZM10| = 0.300275  # Ω/km
ZLM10 := ZM10*L1
|ZLM10| = 6.37483  # Ω
θM10 := arg(ZM10)*k^-1
θM10 = 80.5502  # deg
# 1.2  TANGERANG BARU - CENGKARENG BARU 2
j := sqrt(-1)
a := -0.5 + 0.5*j*sqrt(3)
k := 2*π/360
# OHL-150kV-ACCC-DUBLIN2x520mm (3746 A)
R21a := 0.03037  # Ω/km
X21a := 0.64236  # Ω/km
L21a := 6.3  # km
# CAB-150kV-CU 2x2000mm (3168A)
R21b := 0.00655  # Ω/km
X21b := 0.312  # Ω/km
L21b := 0.232  # km
R21c := 0  # Ω/km
X21c := 0  # Ω/km
L21c := 0  # km
L21 := L21a + L21b + L21c
L21 = 6.532  # km
L2 := L21
# Imp. urutan nol
RL20a := (0.15 + R21a)*L21a
RL20a = 1.13633
XL20a := (3*X21a)*L21a
XL20a = 12.1406
RL20b := (0.15 + R21b)*L21b
RL20b = 0.0363196
XL20b := (3*X21b)*L21b
XL20b = 0.217152
RL20c := (0.15 + R21c)*L21c
RL20c = 0
XL20c := (3*X21c)*L21c
XL20c = 0
RL20 := RL20a + RL20b + RL20c
XL20 := XL20a + XL20b + XL20c
RL20 = 1.17265
XL20 = 12.3578
R20 := RL20/L21
X20 := XL20/L21
R20 = 0.179524  # Ω/km
X20 = 1.89188  # Ω/km
ZL20 := RL20 + XL20*j
ZL20 = 1.17265 + 12.3578i
# Imp. urutan positif
RL21a := R21a*L21a
RL21a = 0.191331
XL21a := X21a*L21a
XL21a = 4.04687
RL21b := R21b*L21b
RL21b = 0.0015196
XL21b := X21b*L21b
XL21b = 0.072384
RL21c := R21c*L21c
RL21c = 0
XL21c := X21c*L21c
XL21c = 0
RL21 := RL21a + RL21b + RL21c
XL21 := XL21a + XL21b + XL21c
RL21 = 0.192851
XL21 = 4.11925
R21 := RL21/L21
X21 := XL21/L21
R21 = 0.029524  # Ω/km
X21 = 0.630626  # Ω/km
ZL21 := RL21 + XL21*j
ZL21_verify := (R21a + j*X21a)*L21a + (R21b + j*X21b)*L21b + (R21c + j*X21c)*L21c
ZL21_verify = 0.192851 + 4.11925i
ZL21 = 0.192851 + 4.11925i
|ZL21| = 4.12376
ZL2 := ZL21
θph2 := arg(ZL21)*k^-1
θph2 = 87.3195  # deg
L2 = 6.532  # km
# 1.3 TANGERANG BARU - CENGKARENG BARU 2
# OHL-150kV-TACSR 2X410mm (2730A)
R31a := 0.0633  # Ω/km
X31a := 0.2581  # Ω/km
L31a := 9.525  # km
R31b := 0  # Ω/km
X31b := 0  # Ω/km
L31b := 0  # km
L3 := L31a + L31b
L3 = 9.525  # km
# Imp. urutan positif
RL3a := R31a*L31a
RL3a = 0.602932
RL3b := R31b*L31b
RL3b = 0
XL3a := X31a*L31a
XL3a = 2.4584
XL3b := X31b*L31b
XL3b = 0
RL31 := RL3a + RL3b
XL31 := XL3a + XL3b
RL31 = 0.602932
XL31 = 2.4584
RL331 := RL31/L3
XL331 := XL31/L3
RL331 = 0.0633
XL331 = 0.2581
ZL31 := (RL3a + j*XL3a) + (RL3b + j*XL3b)
ZL31 = 0.602932 + 2.4584i  # Ω
|ZL31| = 2.53126  # Ω
ZL32 := (R31a + j*X31a)*L31a + (R31b + j*X31b)*L31b = 0.602932 + 2.4584i
|ZL32| = 2.53126
θph3 := arg(ZL31)*k^-1
θph3 = 76.22  # deg
# Imp. urutan nol
R30a := 0.15 + R31a
R30a = 0.2133
R30b := 0.15 + R31b
R30b = 0.15
X30a := 3*X31a
X30a = 0.7743
X30b := 3*X31b
X30b = 0
XL30a := X30a*L31a
RL30a := R30a*L31a
XL30a = 7.37521
RL30a = 2.03168
XL30b := X30b*L31b
RL30b := R30b*L31b
XL30b = 0
RL30b = 0
XL30 := XL30a + XL30b
RL30 := RL30a + RL30b
XL30 = 7.37521
RL30 = 2.03168
ZL30 := (R30a + j*X30a)*L31a + (R30b + j*X30b)*L31b
RL330 := RL30/L3
ZL30 = 2.03168 + 7.37521i  # Ω
|ZL30| = 7.64993  # Ω
RL330 = 0.2133
θN3 := arg(ZL30)*k^-1
θN3 = 74.5985  # deg
XL330 := XL30/L3
XL330 = 0.7743
# 1.4  CENGKARENG BARU - CENGKARENG 2
# Jenis penghantar | CAB-150kV-CU 2x2000mm (3168A)
RL4a := 0.00655
XL4a := 0.312  # ohm/km
RL4b := 0
XL4b := 0
# panjang (km)
L4a := 0.397  # km
L4b := 0  # km
L4 := L4a + L4b = 0.397  # km
# Imp. urutan positif
RL41a := RL4a*L4
RL41a = 0.00260035
XL41a := XL4a*L4
XL41a = 0.123864
RL41 := RL41a
RL41 = 0.00260035
XL41 := XL41a
XL41 = 0.123864
ZL41 := (RL41 + j*XL41)
ZL41 = 0.00260035 + 0.123864i  # Ω
ZL41 := ZL41
|ZL41| = 0.123891  # Ω
θph4 := arg(ZL41)*k^-1
θph4 = 88.7973  # deg
RL441 := RL41/L4 = 0.00655  # ohm/km
XL441 := XL41/L4 = 0.312  # ohm/km
# Imp. urutan nol
RL40a := (0.15 + RL4a)*L4a
RL40a = 0.0621504
XL40a := (3*XL4a)*L4a
XL40a = 0.371592
RL40b := (0.15 + RL4b)*L4b
RL40b = 0
XL40b := (3*XL4b)*L4b
XL40b = 0
RL40 := (RL40a + RL40b)
RL40 = 0.0621504
XL40 := XL40a + XL40b
XL40 = 0.371592
ZL40 := (RL40 + j*XL40)
ZL40 = 0.0621504 + 0.371592i  # Ω
ZL40 := ZL40
|ZL40| = 0.376754  # Ω
θN4 := arg(ZL40)*k^-1
θN4 = 80.5049  # deg
RL440 := RL40/L4 = 0.15655  # ohm/km
XL440 := XL40/L4 = 0.936  # ohm/km
# 2. Impedansi Trafo di GI SPONG
# TD1, TD2, TD4, KTT | TD3
# trafo 150/20 kV, 60 MVA, 12 % | trafo 150/20 kV, 30 MVA, 12.5 %
XT2 := 0.12*150^2/30
XT2 = 90
XT1 := 0.12*150^2/60
XT1 = 45  # Ω
XT11 := XT1 = 45  # Ω
# PERHITUNGAN SETELAN RELE JARAK ~ Distance Relay MiCom P442
# I. Distance relay MiCOM - P442
# 3.1.1 Ratio CT & PT
CT1 := 3000/1  # A
PT1 := 150000/100  # Volt
Vp := 150000  # Volt
n1 := CT1/PT1 = 2
In := 1  # A
Vn := 100/sqrt(3)  # V
# 3.1.2 Jangkauan induktif
# ZONE-1
|ZL11| = 6.03545  # Ω  # (Primer)
Z1P := 0.8*ZL11
|Z1P| = 4.82836  # Ω  # (Primer)
Z1S := Z1P*n1
|Z1S| = 9.65671  # Ω  # (Sekunder)
# ZONE-2
Z2min := 1.2*ZL11
|Z2min| = 7.24254  # Ω  # (Primer)
Z2mak1 := 0.8*(ZL11 + 0.8*ZL21)
|Z2mak1| = 7.46208  # Ω  # (Primer)
ZTrf2 := 0.8*(ZL11 + 0.5*XT11*j)
|ZTrf2| = 22.7977  # Ω  # (Primer)
Z2b := ZL11 + 0.8*ZL21
|Z2b| = 9.3276  # Ω  # (Primer)
# Dipilih Zone 2 terbesar tetapi tidak lebih besar dari zone 2 trafo
Z21mak := Z2mak1*(|Z2mak1| > |Z2min|) + Z2min*(|Z2min| > |Z2mak1|)
Z22mak := Z21mak*(|Z21mak| < |ZTrf2|) + ZTrf2*(|ZTrf2| < |Z21mak|)
Z2P := Z22mak
Z2P = 0.734848 + 7.42581i
|Z2P| = 7.46208  # Ω  # (Primer)
Z2S := Z2P*n1
|Z2S| = 14.9242  # Ω  # (Sekunder)
# ZONE-3 Forward
# Infeed
K3 := 1
Z3min := 1.2*(ZL11 + ZL31)
|Z3min| = 10.2663  # Ω  # (Primer)
Z3mak1 := 0.8*(ZL11 + (1.2*ZL31)*K3)
|Z3mak1| = 7.24795  # Ω  # (Primer)
Z3mak2 := 0.8*(ZL11 + (K3*(0.8*(ZL31 + 0.8*ZL41))))
|Z3mak2| = 6.50341  # Ω  # (Primer)
ZTrf3 := 0.8*(ZL11 + 0.8*XT11*j)
|ZTrf3| = 33.5951  # Ω  # (Primer)
Z3b := (ZL11 + (K3*(0.8*(ZL31 + 0.8*ZL41))))
|Z3b| = 8.12927  # Ω  # (Primer)
Z31 := Z3mak1*(|Z3mak1| > |Z3mak2|) + Z3mak2*(|Z3mak2| > |Z3mak1|)
Z32 := Z31*(|Z31| > |Z3min|) + Z3min*(|Z3min| > |Z31|)
Z3P := ZTrf3*(|Z32| > |ZTrf3|) + Z32*(|ZTrf3| > |Z32|)
|Z3P| = 10.2663  # Ω  # (Primer)
Z3S := Z3P*n1
|Z3S| = 20.5325  # Ω  # (Sekunder)
|ZL11| + |ZL21| = 10.1592  # Ω  # (Primer)
# 3.1.3.  Setelan Waktu
T1 := 0
T1 = 0  # detik
T2 := 0.4*(|Z2b| > |Z22mak|) + 0.8*(|Z22mak| > |Z2b|)
T2 = 0.4  # detik
T3 := 1.2*(|Z3b| > |Z32|) + 1.6*(|Z32| > |Z3b|)
T3 = 1.6  # detik
# dipilih
T3 := 1.6  # detik
# Timer Zone 2
|ZL11| = 6.03545
|Z2P| = 7.46208
q := |Z2P| - |ZL11|
q = 1.42663
Z1sg := 0.8*ZL21
|Z1sg| = 3.29901  # Ω  # (Primer)
# Lihat apakah Z2bs - (ZL11) < dari Z1sg, maka T2bs = 0.4 detik  jika tidak T2bs=0.8 detik
T2a := 0.4
T2b := 0.8
T2 := T2a*(q < |Z1sg|) + T2b*(q > |Z1sg|)
T2 = 0.4  # detik
# 3.1.4. PROTECTION SETTING DISTANCE ELEMENT
ZL11 = 0.76428 + 5.98686i
# Line setting :
|ZL11| = 6.03545
L := L1
L = 21.23  # km
Lmin := 0.3  # km
Lmax := 1000  # km
Lstep := 0.01  # km
ZL := |ZL11|*n1
ZL = 12.0709  # Ω  # sekunder
ZLmin := 0.001/In  # Ω  # diambil
ZLmax := 500/In  # Ω
ZLstep := 0.001/In  # Ω
θL := θph1
θL = 82.725  # deg
θLmin := -90  # deg
θLmax := 90  # deg
θLstep := 0.1  # deg
# Zone setting :
# Bit  : 7 6 5 4 3 2 1 0
# Bit 0 = Z1  enabled
# Bit 1 = Z2  enabled
# Bit 2 = Zp  enabled
# Bit 3 = Z3  enabled
# Bit 4 = Z4  enabled
# Zone status : 0 0 0 0 1 0 1 1
# Ground Fault Compensation setting :
kZ0 := (ZL10 - ZL11)/(3*ZL11)
|kZ0| = 0.684288
kZ0min := 0
kZN := |kZ0|
kZ0max := 7
kZN = 0.684288
kZ0step := 0.001
θkZ0min := 0  # deg
θkZ0 := arg(kZ0)*k^-1
θkZ0 = -7.61847  # deg
θkZ0max := 360  # deg
θkZN := θkZ0
θkZ0step := 0.1  # deg
# Zone 1
θkZN = -7.61847
Z1 := |Z1S|
Z1 = 9.65671  # Ω  # sekunder
Zmin := 0.001/In  # Ω
tZ1 := T1
tZ1 = 0  # sec
Zmax := 500/In  # Ω
# Zone 2
Zstep := 0.001/In  # Ω
Z2 := |Z2S|
Z2 = 14.9242  # Ω  # sekunder
tZmin := 0  # sec
tZ2 := T2
tZ2 = 0.4  # sec
tZmax := 10  # sec
tZstep := 0.002  # sec
# Zone 3
Z3 := |Z3S|
Z3 = 20.5325  # Ω  # sekunder
tZ3 := T3
tZ3 = 1.6  # sec
# Resistive Reach calculation :
CTp := 1600
Vp := 150000
n1 = 2
CT1 = 3000
Iccc = 2730
Iloadmax := 1  # A
In = 1
CCC := 1251  # A
CC := CCC*(CCC < CT1) + CTp*(CTp < CCC)  # A
CC = 1251
IloadMax := CC/CT1
IloadMax = 0.417
Zloadmin := Vn/IloadMax = 138.453  # dr sisi sekunder
# Tipikal Resistive reach max : R gangguan fasa akan mencegah impedansi beban min dengan margin lebih besar atau sama dengan 40 %. R gangguan tanah dengan margin lebih besar atau sama dengan 20 %.
# Margin resistive reach max :
MRphmax := 0.4*Zloadmin
MRphmax = 55.3813  # Ω  # Ω  # Ω  # sekunder  # sekunder  # sekunder
MRgmax := 0.2*Zloadmin
MRgmax = 27.6907  # Ω  # sekunder
# Resistive reach max :
Rphmax := Zloadmin - MRphmax
Rphmax = 83.072  # Ω  # sekunder
Rgmax := Zloadmin - MRgmax
Rgmax = 110.763  # Ω  # sekunder
# Tipikal Resistive reach min (ph fault) : lebih besar dari fault resistance (dgn formula warrington)
# Resistive reach min (g fault) : 20 ohm primer (tipikal)
# Jarak konduktor fasa :
Lc := 3.3  # km
# Arus gangguan fasa-fasa :
Ihs3f := 32776.93  # A  # (data digsilent 17 Desember 2018)
Ihs2f := sqrt(3)/2*Ihs3f
Ihs2f = 28385.7  # A
# Arc resistance :
Ra := (28710*Lc)/Ihs2f^1.4
Ra = 0.0552343  # Ω
# Resistive reach min :
Rphmin := Ra*n1
Rphmin = 0.110469  # Ω  # sekunder
Rgmin := 20*n1
Rgmin = 40  # Ω  # sekunder
# Setting resistive reach : | lebih besar dari Rgmin dan lebih kecil dari Rgmax
Rphminr := 0  # Ω
R3ph := 0.8*Rphmax
R3ph = 66.4576  # Ω  # sekunder
Rphmaxr := 400/In  # Ω
R3g := 0.8*Rgmax
R3g = 88.6101  # Ω  # sekunder
Rphstep := 0.01/In  # Ω
R2ph := 0.8*R3ph
R2ph = 53.1661  # Ω  # sekunder
R2g := 0.8*R3g
R2g = 70.8881  # Ω  # sekunder
Rgminr := 0  # Ω
R1ph := 0.8*R2ph
R1ph = 42.5329  # Ω  # sekunder
Rgmaxr := 400/In  # Ω
R1g := 0.8*R2g
R1g = 56.7105  # Ω  # sekunder
Rgstep := 0.01/In  # Ω
# Fault Locator :
# Mutual compensation :
kZm := ZLM10/(3*ZL11)
|kZm| = 0.352077
kZmmin := 0
kZmmax := 7
kZmstep := 0.001
θkZm := arg(kZm)*k^-1
θkZm = -2.17477  # deg
θkZmmin := 0  # deg
θkZmmax := 360  # deg
θkZmstep := 0.1  # deg
# Z BLINDER IMP:
Iccc = 2730
k := 2*π/360
k = 0.0174533
n1 = 2
# a. Load Impedance:
Zld := 150000/sqrt(3)/Iccc*n1
Zld = 63.4451  # Ω (secondary)
# Power factor load angle:
θld := 30*k
cos(30*k) = 0.866025
# b. Blinder Impedance:
ZB := Zld*cos(30*k)*0.51
ZB = 28.022  # Ω (secundary)
# POWER SWING :
ΔRmin := 0
ΔR := 0.3*R3ph
ΔR = 19.9373  # Ω
ΔRmax := 400/In  # Ω
ΔX := 0.3*R3ph
ΔX = 19.9373  # Ω
R5 := 0.85*ZB
Z5 := 2*|ZL11|
ΔRstep := 0.01/In  # Ω
R5 = 23.8187  # Ω
Z5 = 12.0709  # Ω
