# PERHITUNGAN SETELAN RELAI JARAK SUTT 150 KV
# Pasar Kemis Baru - Pasar Kemis
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# 1. Data SUTT 150 kV
k := 2*π/360
j := sqrt(-1)
a := -0.5 + 0.5*j*sqrt(3)
# 1.1 Pasar Kemis Baru - Pasar Kemis
# Jenis penghantar
Vn := 150000
# OHL-150kV-ZEBRA 2x484.5mm 1620A
R11a := 0.0387  # Ω/km
X11a := 0.2807  # Ω/km
L11a := 3.5  # km
Iccc_a := 1620  # A
R11b := 0  # Ω/km
X11b := 0  # Ω/km
L11b := 0  # km
Iccc_b := 9999  # A
R11c := 0  # Ω/km
X11c := 0  # Ω/km
L11c := 0  # km
Iccc_c := 9999  # A
L11 := L11a + L11b + L11c
Iccc := min(Iccc_a, Iccc_b, Iccc_c)
L11 = 3.5  # km
Iccc = 1620  # A
L1 := L11
L1 := L11
# Imp. urutan nol
RL10a := (0.15 + R11a)*L11a
RL10a = 0.66045
XL10a := (3*X11a)*L11a
XL10a = 2.94735
RL10b := (0.15 + R11b)*L11b
RL10b = 0
XL10b := (3*X11b)*L11b
XL10b = 0
RL10c := (0.15 + R11c)*L11c
RL10c = 0
XL10c := (3*X11c)*L11c
XL10c = 0
RL10 := RL10a + RL10b + RL10c
XL10 := XL10a + XL10b + XL10c
RL10 = 0.66045
XL10 = 2.94735
R10 := RL10/L11
X10 := XL10/L11
R10 = 0.1887  # Ω/km
X10 = 0.8421  # Ω/km
ZL10 := RL10 + XL10*j
ZL10 = 0.66045 + 2.94735i
|ZL10| = 3.02044  # Ω
θph10 := arg(ZL10)*k^-1
θph10 = 77.3697  # deg
# Imp. urutan positif
RL11a := R11a*L11a
RL11a = 0.13545
XL11a := X11a*L11a
XL11a = 0.98245
RL11b := R11b*L11b
RL11b = 0
XL11b := X11b*L11b
XL11b = 0
RL11c := R11c*L11c
RL11c = 0
XL11c := X11c*L11c
XL11c = 0
RL11 := RL11a + RL11b + RL11c
XL11 := XL11a + XL11b + XL11c
RL11 = 0.13545
XL11 = 0.98245
R11 := RL11/L11
X11 := XL11/L11
R11 = 0.0387  # Ω/km
X11 = 0.2807  # Ω/km
ZL11 := RL11 + XL11*j
ZL11_verify := (R11a + j*X11a)*L11a + (R11b + j*X11b)*L11b + (R11c + j*X11c)*L11c
ZL11_verify = 0.13545 + 0.98245i
ZL11 = 0.13545 + 0.98245i
|ZL11| = 0.991743
θph11 := arg(ZL11)*k^-1
θph11 = 82.1501  # deg
θph1 := θph11
# Imp. mutual
ZM10 := 0.0493 + j*0.2962
|ZM10| = 0.300275  # Ω/km
ZLM10 := ZM10*L11
|ZLM10| = 1.05096  # Ω
θM10 := arg(ZM10)*k^-1
θM10 = 80.5502  # deg
# 1.2 Pasar Kemis - Cikupa
# OHL-150kV-ZEBRA 2x484.5mm 1620A
R21a := 0.0387  # Ω/km
X21a := 0.2807  # Ω/km
L21a := 5.7  # km
R21b := 0  # Ω/km
X21b := 0  # Ω/km
L21b := 0  # km
R21c := 0  # Ω/km
X21c := 0  # Ω/km
L21c := 0  # km
L21 := L21a + L21b + L21c
L21 = 5.7  # km
L2 := L21
# Imp. urutan nol
RL20a := (0.15 + R21a)*L21a
RL20a = 1.07559
XL20a := (3*X21a)*L21a
XL20a = 4.79997
RL20b := (0.15 + R21b)*L21b
RL20b = 0
XL20b := (3*X21b)*L21b
XL20b = 0
RL20c := (0.15 + R21c)*L21c
RL20c = 0
XL20c := (3*X21c)*L21c
XL20c = 0
RL20 := RL20a + RL20b + RL20c
XL20 := XL20a + XL20b + XL20c
RL20 = 1.07559
XL20 = 4.79997
R20 := RL20/L21
X20 := XL20/L21
R20 = 0.1887  # Ω/km
X20 = 0.8421  # Ω/km
ZL20 := RL20 + XL20*j
|ZL20| = 4.919
θph20 := arg(ZL20)*k^-1
θph20 = 77.3697
XL20 := ZL20*sin(θph20*k)
|XL20| = 4.79997
# Imp. urutan positif
RL21a := R21a*L21a
RL21a = 0.22059
XL21a := X21a*L21a
XL21a = 1.59999
RL21b := R21b*L21b
RL21b = 0
XL21b := X21b*L21b
XL21b = 0
RL21c := R21c*L21c
RL21c = 0
XL21c := X21c*L21c
XL21c = 0
RL21 := RL21a + RL21b + RL21c
XL21 := XL21a + XL21b + XL21c
RL21 = 0.22059
XL21 = 1.59999
R21 := RL21/L21
X21 := XL21/L21
R21 = 0.0387  # Ω/km
X21 = 0.2807  # Ω/km
ZL21 := RL21 + XL21*j
ZL21_verify := (R21a + j*X21a)*L21a + (R21b + j*X21b)*L21b + (R21c + j*X21c)*L21c
ZL21_verify = 0.22059 + 1.59999i
ZL21 = 0.22059 + 1.59999i
|ZL21| = 1.61512
ZL2 := ZL21
θph21 := arg(ZL21)*k^-1
θph21 = 82.1501  # deg
θph2 := θph21
L2 = 5.7  # km
XL21 := ZL21*sin(θph21*k)
|XL21| = 1.59999
# 1.3  Pasar Kemis - Cikupa
# OHL-150kV-ZEBRA 2x484.5mm 1620A
R31a := 0.0387  # Ω/km
X31a := 0.2807  # Ω/km
L31a := 5.7  # km
R31b := 0  # Ω/km
X31b := 0  # Ω/km
L31b := 0  # km
R31c := 0  # Ω/km
X31c := 0  # Ω/km
L31c := 0  # km
L31 := L31a + L31b + L31c
L31 = 5.7  # km
L3 := L31
# Imp. urutan nol
RL30a := (0.15 + R31a)*L31a
RL30a = 1.07559
XL30a := (3*X31a)*L31a
XL30a = 4.79997
RL30b := (0.15 + R31b)*L31b
RL30b = 0
XL30b := (3*X31b)*L31b
XL30b = 0
RL30c := (0.15 + R31c)*L31c
RL30c = 0
XL30c := (3*X31c)*L31c
XL30c = 0
RL30 := RL30a + RL30b + RL30c
XL30 := XL30a + XL30b + XL30c
RL30 = 1.07559
XL30 = 4.79997
R30 := RL30/L31
X30 := XL30/L31
R30 = 0.1887  # Ω/km
X20 = 0.8421  # Ω/km
ZL30 := RL30 + XL30*j
|ZL30| = 4.919
θph30 := arg(ZL30)*k^-1
θph30 = 77.3697
XL30 := ZL30*sin(θph30*k)
|XL30| = 4.79997
# Imp. urutan positif
RL31a := R31a*L31a
RL31a = 0.22059
XL31a := X31a*L31a
XL31a = 1.59999
RL31b := R31b*L31b
RL31b = 0
XL31b := X31b*L31b
XL31b = 0
RL31c := R31c*L31c
RL31c = 0
XL31c := X31c*L31c
XL31c = 0
RL31 := RL31a + RL31b + RL31c
XL31 := XL31a + XL31b + XL31c
RL31 = 0.22059
XL31 = 1.59999
R31 := RL21/L21
X31 := XL31/L31
R31 = 0.0387  # Ω/km
X31 = 0.2807  # Ω/km
ZL31 := RL31 + XL31*j
ZL31_verify := (R31a + j*X31a)*L31a + (R31b + j*X31b)*L31b + (R31c + j*X31c)*L31c
ZL31_verify = 0.22059 + 1.59999i
ZL31 = 0.22059 + 1.59999i
|ZL31| = 1.61512
ZL3 := ZL31
θph31 := arg(ZL31)*k^-1
θph31 = 82.1501  # deg
θph3 := θph31
L3 = 5.7  # km
XL21 := ZL31*sin(θph31*k)
|XL31| = 1.59999
θN3 := θph3
θN3 = 82.1501  # deg
# 1.4  Cikupa - Jatake
# Jenis penghantar
# OHL-150kV-ZEBRA 2x468.5mm (1560A)
L4 := 7.2  # km
R41 := 0.0411
X41 := 0.1911  # Ω  # /km
CCC4 := 1560
# Imp. urutan positif
Vn := 150000
RL41 := R41*L4
XL41 := X41*L4  # Ω
ZL41 := (RL41 + j*XL41)
|ZL41| = 1.40738
ZL41 = 0.29592 + 1.37592i  # Ω
θph41 := arg(ZL41)*k^-1
θph41 = 77.8623  # deg
# Imp. urutan nol
R40 := 0.15 + R41
X40 := 3*X41  # Ω  # /km
RL40 := R40*L4
XL40 := X40*L4  # Ω
ZL40 := (RL40 + j*XL40)
ZL40 = 1.37592 + 4.12776i  # Ω
|ZL40| = 4.35104
θph40 := arg(ZL40)*k^-1
θph40 = 71.5651  # deg
θN4 := arg(ZL40)*k^-1
θN4 = 71.5651  # deg
# 2.1. Impedansi Trafo di GI Sepatan
# Trafo-1,2,3,4 60 MVA 150/20 kV 12.5%
XT11a := 0.125*150^2/60
XT11a = 46.875  # Ω
# Dipilih
XT11 := XT11a = 46.875
# 3. PERHITUNGAN SETELAN RELE JARAK
# 3.1  SUTT Pasar Kemis Baru arah Sepatan
# Distance relay GE - L90 (Basic)
# 3.1.1 Ratio CT & PT
CT1 := 2000/1  # A
PT1 := 150000/100  # Volt
n1 := CT1/PT1
n1 = 1.33333
# 3.1.2 Jangkauan Impedansi
In := 1  # A
# ZONE-1 Phase : DISABLED
Z1P := 0.8*ZL11
|Z1P| = 0.793395  # Ω  # (Primer)
Z1S := Z1P*n1
|Z1S| = 1.05786  # Ω  # (Sekunder)
%Z1 := |Z1P|*100/|ZL11|
%Z1 = 80  # %
# ZONE-2 Phase
# Infeed
K := 1.2
Z2min := 1.2*ZL11
|Z2min| = 1.19009  # Ω  # (Primer)
Z2mak1 := (ZL11 + (0.8*ZL21)*K)*0.8
|Z2mak1| = 2.03381  # Ω  # (Primer)
Z2mak2 := (ZL11 + 0.8*ZL21)*0.8
|Z2mak2| = 1.82707  # Ω  # (Primer)
ZTrf := 0.8*(ZL11 + 0.5*XT11*j)
|ZTrf| = 19.5363  # Ω  # (Primer)
# Dipilih Zone 2 terbesar tetapi tidak lebih besar dari Zone 2 Trf
Z21mak := Z2mak1*(|Z2mak1| > |Z2min|) + Z2min*(|Z2min| > |Z2mak1|)
Z2P := Z21mak*(|Z21mak| < |ZTrf|) + ZTrf*(|ZTrf| < |Z21mak|)
Z2P = 0.277773 + 2.01475i
|Z2P| = 2.03381  # Ω  # (Primer)
Z2S := Z2P*n1
|Z2S| = 2.71175  # Ω  # (Sekunder)
%Z2 := |Z2P|*100/|ZL11|
%Z2 = 205.074  # %
# ZONE-3 Forward Phase
Z3min := 1.2*(ZL11 + K*ZL31)
|Z3min| = 3.51587  # Ω  # (Primer)
Z3mak1 := 0.8*(ZL11 + (1.2*ZL31)*K)
|Z3mak1| = 2.65402  # Ω  # (Primer)
Z3mak2 := 0.8*(ZL11 + (0.8*(ZL31 + 0.8*ZL41)*K))
|Z3mak2| = 2.89681  # Ω  # (Primer)
Z3mak3 := 0.8*(ZL11 + 0.8*(ZL31 + 0.8*ZL41))
|Z3mak3| = 2.54621  # Ω  # (Primer)
Z3mak4 := 0.8*(ZL11 + 1.2*ZL31)
|Z3mak4| = 2.34391  # Ω  # (Primer)
Z3Trf := 0.8*(ZL11 + 0.8*XT11*j)
|Z3Trf| = 30.7862  # Trf Asahimas
Z31 := Z3mak1*(|Z3mak1| > |Z3mak2|) + Z3mak2*(|Z3mak2| > |Z3mak1|)
Z32 := Z31*(|Z31| > |Z3min|) + Z3min*(|Z3min| > |Z31|)
Z3P := Z3Trf*(|Z32| > |Z3Trf|) + Z32*(|Z3Trf| > |Z32|)
|Z3P| = 3.51587  # Ω  # (Primer)
Z3S := Z3P*n1
|Z3S| = 4.68783  # Ω  # (Sekunder)
# Z3 TIDAK MELEBIHI SETTING 0.5 IMPEDANSI BEBAN
kV := 150000
CT := 2000
CCC := 1620
ZloadP := 0.5*kV/(CCC*sqrt(3))
ZloadP = 26.7292  # Ω  # (Primer)
ZloadS := n1*ZloadP
ZloadS = 35.6389  # Ω  # (Skunder)
# Asumsi tahanan kaki tiang
Rf := 0  # Ω  # (Primer)
# ZONE-1 Ground : DISABLED
Z1Pg := (0.8*ZL11) + Rf
|Z1Pg| = 0.793395  # Ω  # (Primer)
Z1Sg := Z1Pg*n1
|Z1Sg| = 1.05786  # Ω  # (Sekunder)
# ZONE-2 Ground
# Infeed
K := 1.2
Z2ming := 1.2*(ZL11 + Rf)
|Z2ming| = 1.19009  # Ω  # (Primer)
Z2mak1g := 0.8*((ZL11 + Rf) + 0.8*ZL21)
|Z2mak1g| = 1.82707  # Ω  # (Primer)
Z2mak2g := 0.8*((ZL11 + Rf)*K + 0.8*ZL21)
|Z2mak2g| = 1.98575  # Ω  # (Primer)
ZTrfg := 0.8*((ZL11 + Rf) + 0.5*j*XT11)
|ZTrfg| = 19.5363  # Ω  # (Primer)
# Dipilih Zone 2 terbesar tetapi tidak lebih besar dari | Z Trf Asahimas
Z21makg := Z2mak1g*(|Z2mak1g| > |Z2ming|) + Z2ming*(|Z2ming| > |Z2mak1g|)
Z2Pg := Z21makg*(|Z21makg| < |ZTrfg|) + ZTrfg*(|ZTrfg| < |Z21makg|)
Z2Pg = 0.249538 + 1.80995i
|Z2Pg| = 1.82707  # Ω  # (Primer)
Z2Sg := Z2Pg*n1
|Z2Sg| = 2.4361  # Ω  # (Sekunder)
# ZONE-3 Forward Ground
Z3ming := 1.2*((ZL11 + ZL31) + Rf)
|Z3ming| = 3.12824  # Ω  # (Primer)
Z3mak1g := 0.8*(ZL11 + Rf + (1.2*ZL31)*K)
|Z3mak1g| = 2.65402  # Ω  # (Primer)
Z3mak2g := 0.8*(ZL11 + Rf + (0.8*(ZL31 + 0.8*ZL41)*K))
|Z3mak2g| = 2.89681  # Ω  # (Primer)
Z3mak3g := 0.8*(ZL11 + Rf + 0.8*(ZL31 + 0.8*ZL41))
|Z3mak3g| = 2.54621  # Ω  # (Primer)
Z3mak4g := 0.8*(ZL11 + Rf + 1.2*ZL31)
|Z3mak4g| = 2.34391  # Ω  # (Primer)
Z3Trfg := 0.8*(ZL11 + Rf + 0.8*XT11*j)
|Z3Trfg| = 30.7862  # Trf Asahimas
Z31g := Z3mak1g*(|Z3mak1g| > |Z3mak2g|) + Z3mak2g*(|Z3mak2g| > |Z3mak1g|)
Z32g := Z31g*(|Z31g| > |Z3ming|) + Z3ming*(|Z3ming| > |Z31g|)
Z3Pg := Z3Trfg*(|Z32g| > |Z3Trfg|) + Z32g*(|Z3Trfg| > |Z32g|)
|Z3P| = 3.51587  # Ω  # (Primer)
Z3Sg := Z3ming*n1
|Z3Sg| = 4.17099  # Ω  # (Sekunder)
Z3Pg := ZloadP
Z3Pg = 26.7292
Z3Sg = 0.569664 + 4.1319i
# Timer
# Zone-1
tk1ph := 0.1
tk1g := 0.1
# Zone-2
|ZL11| = 0.991743
q := |Z2P - ZL11|
q = 1.04207
Z1sg := 0.8*ZL21
|Z1sg| = 1.2921  # Ω  # (Primer)
# Lihat apakah Z2bs - (ZL11) < dari Z1sg, maka T2bs = 0.4 detik  jika tidak T2bs=0.8 detik
T2a := 0.4
T2b := 0.8
T2 := T2a*(q < |Z1sg|) + T2b*(q > |Z1sg|)
T2 = 0.4
tk2 := T2
tk2ph := 0.4
tk2g := 0.4
# Zone-3
tk3ph := 1.6
tk3g := 1.6
# 3.1.4. Kompensasi Urutan Nol Pada Relay GE
Ko := ZL10/ZL11
|Ko| = 3.04559
θphKo := arg(Ko)*k^-1
θphKo = -4.78049  # deg
# 3.1.5. Load Beban
kV = 150000
CT = 2000
CCC = 1620
CCC = 1620
ZLoadP := kV/(CCC*sqrt(3))
ZLoadP = 53.4584  # Ω  # (Primer)
ZLoadS := n1*ZLoadP
ZLoadS = 71.2778  # Ω  # (Skunder)
# Jangkauan Resistive Tidak Melebihi 0.5 Beban, tetapi beban tidak mungkin mencapai maksimum
Resistive := 0.5*n1*kV/(CCC*sqrt(3))
Resistive = 35.6389  # Ω  # (Skunder)
# Blinder
# Magnitude
# Right Blinder
BLD := 0.9*Resistive
BLD = 32.075  # Ω  # (Sekunder)
# Left  Blinder
BLD := 0.9*Resistive
BLD = 32.075  # Ω  # (Sekunder)
# Angle
θBLD := arg(ZL11)*k^-1
θBLD = 82.1501  # deg
# Impedansi total line
ZP := ZL11*n1
|ZP| = 1.32232  # Ω/ph  # (Sekunder)
# 3.1.6 SOTF/Line Pick up Element
# Parameter  : LINE PICKUP
# Function  : Enable
# Source  : SRC1
#
# Ph IOC Line Pickup  :
# Line Pickup UV PKP  :
# Line End Open Pickup Delay  :
# Line End Open Reset Delay  :
# Line Pickup OV PKP Delay  :
#
# AR Coord Bypass  : Enable
# AR Co-ord Pickup Delay  : Disable
# AR Co-ord Reset Delay  : Disable
#
# Terminal Open  : Breaker Open
# AR Accelerate  : ACC AR On
# Reverse Pickup  : SCR1 VT Fuse Fail OP
#
# Line Pick up Block  : OFF
# Line Pick up Target  : Self-Reset
# Line Pick up Event  : Enable
IOC := 2  # pu
UV := 0.7
Tdpc := 0.2
Tdres := 0.2
tdUV := 0.2
# 3.1.7 PUTT (DR) Scheme
# Parameter  : PUTT
# PUTT Schme Function  : Enable
# PUTT Rx Pickup Delay  : 0.000 sec
# PUTT Seal in Delay  : 0.024 sec
# PUTT No Of Comm Bit  :  1
# PUTT Rx 1  : Rec Dist On (...................)
# PUTT Scheme Target  : Self-Reset
# PUTT Scheme event  : Enable
# 3.1.8 Power Swing Element, 78 : Power Swing Block OP
# Setelan power swing dipilih diatas Zone yang terkena power swing (Zone 3)
# Forward Reach
# Zpswg = (1.2 - 1.3 ) x Zone 3
Zpswg := 1.3*|Z3P|
Zpswg = 4.57063  # Ω  # primer
ZpswgS := Zpswg*n1
ZpswgS = 6.09418  # Ω  # sekunder
# Timer Power Swing
Tswg := 3  # detik
FORBL := ZpswgS
FORBL = 6.09418
# Inner Blinder
INN := |Z3S|
INN = 4.68783  # Ω  # sekunder
# Middle Blinder
MID := 1.15*|Z3P|*n1
MID = 5.391  # Ω  # sekunder
# Outer Blinder
OUT := ZpswgS
OUT = 6.09418  # Ω  # sekunder
# 3.1.8 DEF ~ BLOCK
# 3.1.9 FAULT REPORT
# Positive Seq (Z1) Mag
|ZL11|*n1 = 1.32232
# Positive Seq (Z1) Angle
θph1 = 82.1501
# Zero Seq (Z0) Mag
|ZL10|*n1 = 4.02726
# Zero Seq (Z0) Angle
θph10 = 77.3697
# Line Length
L1 = 3.5
# 3.20 LOAD ENCROACHMENT
# Setting :
# Load encroahment function: | Setting = Enabled
# Load encroachment minimum voltage :
V_1 := 0.25  # pu
# Load encroachment reach :
# Jangkauan reach encroahment = 1/2 Z load
Z_res_reach := Resistive = 35.6389  # ohm
# Load encroachment angle
Angle := 30  # deg
# Load encroachment pick up delay:
t_pickup := 0  # sec
# Load encroachment reset delay :
t_reset := 0  # sec
# Load encroachment block: | Setting = OFF
# Load encroachment target : | Setting = self reset
# Load encroachment events : | Setting = enabled
# Jangkauan Zone 1  Zone 2  , dan Zone 3
# dipotong oleh Load Encroachment
|Z1S| = 1.05786
|Z2S| = 2.71175
|Z3S| = 4.68783
Z_res_reach = 35.6389
# SETTING RELE GE L90
# GI | : Pasar Kemis Baru
# PROTEKSI | : Sepatan
# Rasio CT | : 2000/1  A
# Rasio PT | : 150.000/100  V
# Urutan Positif
# :
|ZL11|*n1 = 1.32232  # Ohm/phase
# Urutan Nol
# :
|ZL10|*n1 = 4.02726  # Ohm/phase
# Panjang saluran
# :
L1 = 3.5  # km
# Arus Nominal Relay
# :
In = 1  # A
# Perhitungan Tap Sekunder
# I. Configuration Setting
# 1.1 Current
# Phase CT Primary | : 2000  A
# Phase CT Secondary | : 1  A
# Ground CT Primary | : 2000  A
# Ground CT Secondary | : 1  A
# 1.2 Voltage
# Phase VT Connection | : Wye
# Phase VT Secondary | : 57.8  V
# Phase VT Ratio | : 5000:1
# Auxiliary VT Connection | : Vn
# Auxiliary VT Secondary | : 57.8  V
# Auxiliary VT Ratio | : 5000:1
# 1.3 Power System
# Nominal Frequency | : 50  Hz
# Phase Rotation | : ABC
# Freq and Phase Ref | : UN-KR (SRC 1)
# 1.4 Signal Source
# Source 1 Name | : UN - KR
# Phase CT | : F1
# Ground CT | : F1
# Phase VT | : F5
# Aux PT | : F5
# II.  Phase Distance Z1  : MHO
# Ph Dis Z1 Reach
|Z1S| = 1.05786  # Ω  # (Sekunder)
# Ph Dis Z1 Direction | FORWARD
# Ph Dis Z1 Delay
tk1ph = 0.1  # sec
# Ph Dis Z1 Supv
Isupv := 1.2  # pu  # pu
# RCA
RCA := 82  # degree
# COMPLIMIT
COMPLIMIT := 90  # degree
# DIR RCA
DIRRCA := 45  # degree
# DIR COMPLIMIT
DIRCOMPLIMIT := 60  # degree
# III.  Ground Distance Z1 QUAD : QUAD
# Gnd Dis Z1 Reach
|Z1S| = 1.05786  # Ω  # (Sekunder)
# Gnd Dis Z1 Direction | FORWARD
# Gnd Dis Z1 Delay
tk1ph = 0.1  # sec
# Gnd Dist Z1 Supv
Isupv := 0.2  # pu
# Z0/Z1 Mag
|Ko| = 3.04559
# Z0/Z1 Ang
θphKo = -4.78049  # degree
# Z0M/Z1 Mag
KoM := 0
# Z0M/Z1 Ang
θphKoM := 0  # degree
# Right Blinder Magnitude
RBLD := BLD
RBLD = 32.075  # Ω  # (Sekunder)
# Right Blinder Angle
θRBLD := θBLD
θRBLD = 82.1501  # degree
# Left Blinder Magnitude
LBLD := BLD
LBLD = 32.075  # Ω  # (Sekunder)
# Left Blinder Angle
θLBLD := θBLD
θLBLD = 82.1501  # degree
# RCA
θph10 = 77.3697  # degree
# COMPLIMIT
COMPLIMIT := 90  # degree
# DIR RCA
DIRRCA := 45  # degree
# DIR COMPLIMIT
DIRCOMPLIMIT := 60  # degree
# RIGHT BLINDER RCA
RGTBLDRCA := 82  # degree
# LEFT BLINDER RCA
LFTBLDRCA := 82  # degree
# IV.  Phase Distance Z2 MHO
# Ph Dis Z2 Reach
|Z2S| = 2.71175  # Ω  # (Sekunder)
# Ph Dis Z2 Direction | FORWARD
# Ph Dis Z2 Delay
tk2ph = 0.4  # sec
# Ph Dis Z2 Supv
Isupv := 1.2  # pu  # pu
# RCA
RCA := 82  # degree
# COMPLIMIT
COMPLIMIT := 90  # degree
# DIR RCA
DIRRCA := 45  # degree
# DIR COMPLIMIT
DIRCOMPLIMIT := 60  # degree
# V.  Ground Distance Z2 QUAD
# Gnd Dis Z2 Reach
|Z2S| = 2.71175  # Ω  # (Sekunder)
# Gnd Dis Z2 Direction | FORWARD
# Gnd Dis Z2 Delay
tk2ph = 0.4  # sec
# Gnd Dist Z2 Supv
Isupv := 0.2  # pu
# Z0/Z1 Mag
|Ko| = 3.04559
# Z0/Z1 Ang
θphKo = -4.78049  # degree
# Z0M/Z1 Mag
KoM := 0
# Z0M/Z1 Ang
θphKoM := 0  # degree
# Right Blinder Magnitude
RBLD := BLD
RBLD = 32.075  # Ω  # (Sekunder)
# Right Blinder Angle
θRBLD := θBLD
θRBLD = 82.1501  # degree
# Left Blinder Magnitude
LBLD := BLD
LBLD = 32.075  # Ω  # (Sekunder)
# Left Blinder Angle
θLBLD := θBLD
θLBLD = 82.1501  # degree
# RCA
θph10 = 77.3697  # degree
# COMPLIMIT
COMPLIMIT := 90  # degree
# DIR RCA
DIRRCA := 45  # degree
# DIR COMPLIMIT
DIRCOMPLIMIT := 60  # degree
# RIGHT BLINDER RCA
RGTBLDRCA := 82  # degree
# LEFT BLINDER RCA
LFTBLDRCA := 82  # degree
# VI.  Phase Distance Z3 MHO
# Ph Dis Z3 Reach
|Z3S| = 4.68783  # Ω  # (Sekunder)
# Ph Dis Z3 Direction | FORWARD
# Ph Dis Z3 Delay
tk3ph = 1.6  # sec
# Ph Dis Z3 Supv
Isupv := 1.2  # pu
# RCA
RCA := 82  # degree
# COMPLIMIT
COMPLIMIT := 90  # degree
# DIR RCA
DIRRCA := 45  # degree
# DIR COMPLIMIT
DIRCOMPLIMIT := 60  # degree
# VII.  Ground Distance Z3 QUAD
# Gnd Dis Z3 Reach
|Z3S| = 4.68783  # Ω  # (Sekunder)
# Gnd Dis Z3 Direction | FORWARD
# Gnd Dis Z3 Delay
tk3ph = 1.6  # sec
# Gnd Dist Z3 Supv
Isupv := 0.2  # pu  # pu
# Z0/Z1 Mag
|Ko| = 3.04559
# Z0/Z1 Ang
θphKo = -4.78049  # degree
# Z0M/Z1 Mag
|KoM| = 0
# Z0M/Z1 Ang
θphKoM = 0  # degree
# Right Blinder Magnitude
RBLD := BLD
RBLD = 32.075  # Ω  # (Sekunder)
# Right Blinder Angle
θRBLD := θBLD
θRBLD = 82.1501  # degree
# Left Blinder Magnitude
LBLD := BLD
LBLD = 32.075  # Ω  # (Sekunder)
# Left Blinder Angle
θLBLD := θBLD
θLBLD = 82.1501  # degree
# RCA
θph10 = 77.3697  # degree
# COMPLIMIT
COMPLIMIT := 90  # degree
# DIR RCA
DIRRCA := 45  # degree
# DIR COMPLIMIT
DIRCOMPLIMIT := 60  # degree
# RIGHT BLINDER RCA
RGTBLDRCA := 82  # degree
# LEFT BLINDER RCA
LFTBLDRCA := 82  # degree
# VIII. SOTF/Line Pick up Element
# Parameter  : LINE PICKUP
# Function  : Enable
# Source  : SRC1
# Ph IOC Line Pickup  :
# Line Pickup UV PKP  :
# Line End Open Pickup Delay  :
# Line End Open Reset Delay  :
# Line Pickup OV PKP Delay  :
# AR Coord Bypass  : Enable
# AR Co-ord Pickup Delay  : Disable
# AR Co-ord Reset Delay  : Disable
# Terminal Open  : Breaker Open
# AR Accelerate  : ACC AR On
# Reverse Pickup  : SCR1 VT Fuse Fail OP
# Line Pick up Block  : OFF
# Line Pick up Target  : Self-Reset
# Line Pick up Event  : Enable
IOC := 2  # pu
UV := 0.7
Tdpc := 0.2
Tdres := 0.2
tdUV := 0.2
# IX PUTT (DR) Scheme
# Parameter  : POTT
# Schme Function  : Enable
# Rx Pickup Delay  : 0.000 sec
# Seal in Delay  : 0.024 sec
# No Of Comm Bit  :  1
# Rx 1  : Rec Dist On (W1a)
# Scheme Target  : Self-Reset
# Scheme event  : Enable
# X OOS Swing , 78  : Blocked
# XI. DEF  : Disabled
# XII. A/R  : Internal
# XIII. Synchrocheck  : Internal
# XIV. OOS  : Blocked
# XV. OC  : Blocked
# XVI. Breaker Fail  : Blocked
# XVIII. Fault Report
# Positive Seq (Z1) Mag
|ZL11|*n1 = 1.32232
# Zero Seq (Z0) Angle
θph10 = 77.3697
# Positive Seq (Z1) Angle
θph1 = 82.1501
# Line Length
L1 = 3.5
# Zero Seq (Z0) Mag
|ZL10|*n1 = 4.02726
