# PERHITUNGAN SETELAN RELAI JARAK SUTT 150 KV
# GI Tangerang Lama bay Jatake II-2_2000-5PCS9611
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3*PH
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1*PH
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MVAb := 100
kVb := 150
Ib := MVAb*1000/(sqrt(3)*kVb) = 384.9
Zb := kVb^2/MVAb = 225
Ihs0 := 23126  # I hubung singkat 1 fasa ke tanah
# 150 kV system parameter
X1 := 0.01679  # pu
X0 := 0.03120  # pu
# 1. Data SUTT 150 kV
# 1.1  NJTKE-TGRNG-2 (ex. JTAKE-TGRNG -2)
j := sqrt(-1)
a := -0.5 + 0.5*j*sqrt(3)
k := 2*π/360
# Jenis penghantar  :  OHL-150kV-ZEBRA 2X484.5mm (1620A)
L1 := 6.87  # km
ccc := 1620
# Data parameter penghantar dari Digsilent:
RL11 := 0.0387
XL11 := 0.2807  # Ω/km
# Imp. urutan positif
ZL11 := (RL11 + j*XL11)*L1
ZL11 = 0.265869 + 1.92841i  # Ω
|ZL11| = 1.94665  # Ω
θph1 := arg(ZL11)*k^-1
θph1 = 82.1501  # deg
R11pu := RL11*L1*(MVAb/kVb^2)
R11pu = 0.00118164
X11pu := XL11*L1*(MVAb/kVb^2)
X11pu = 0.00857071
Z11pu := R11pu + j*X11pu
Z11pu = 0.00118164 + 0.00857071i
|Z11pu| = 0.00865178
# Imp. urutan nol
RL10 := 0.15 + RL11  # Ω/km
RL10 = 0.1887
XL10 := 3*XL11
XL10 = 0.8421
ZL10 := (RL10 + j*XL10)*L1
ZL10 = 1.29637 + 5.78523i  # Ω
|ZL10| = 5.92869  # Ω
θN1 := arg(ZL10)*k^-1
θN1 = 77.3697  # deg
R10pu := RL10*L1*(MVAb/kVb^2)
R10pu = 0.00576164
X10pu := XL10*L1*(MVAb/kVb^2)
X10pu = 0.0257121
Z10pu := R10pu + j*X10pu
Z10pu = 0.00576164 + 0.0257121i
|Z10pu| = 0.0263498
# Imp. mutual
ZM10 := 0.0493 + j*0.2962
|ZM10| = 0.300275  # Ω/km
ZLM10 := ZM10*L1
|ZLM10| = 2.06289  # Ω
θM10 := arg(ZM10)*k^-1
θM10 = 80.5502  # deg
RM10 := 0.0493
XM10 := 0.2962
# 1.2  JATAKE-NJTKE -1 (ex. JTAKE-TGRNG -1)
j := sqrt(-1)
a := -0.5 + 0.5*j*sqrt(3)
k := 2*π/360
# Jenis penghantar  :  OHL-150kV-ZEBRA 2X484.5mm (1620A)
L2 := 3.53  # km
RL21 := 0.0387
XL21 := 0.2807  # Ω/km
# Imp. urutan positif
ZL21 := (RL21 + j*XL21)*L2
ZL21 = 0.136611 + 0.990871i  # Ω
|ZL21| = 1.00024  # Ω
θph2 := arg(ZL21)*k^-1
θph2 = 82.1501  # deg
# Imp. urutan nol
RL20 := 0.15 + RL21
RL20 = 0.1887
Ω/km
XL20 := 3*XL21
XL20 = 0.8421
ZL20 := (RL20 + j*XL20)*L2
ZL20 = 0.666111 + 2.97261i  # Ω
|ZL20| = 3.04633  # Ω
θN2 := arg(ZL20)*k^-1
θN2 = 77.3697  # deg
# Imp. mutual
ZM20 := 0.0493 + j*0.2962
|ZM20| = 0.300275  # Ω/km
ZLM20 := ZM20*L2
|ZLM20| = 1.05997  # Ω
θM20 := arg(ZM20)*k^-1
θM20 = 80.5502  # deg
# 1.3 JATAKE-NJTKE -1 (ex. JTAKE-TGRNG -1)
j := sqrt(-1)
a := -0.5 + 0.5*j*sqrt(3)
k := 2*π/360
# Jenis penghantar  :  OHL-150kV-ZEBRA 2X484.5mm (1620A)
L3 := 3.53  # km
RL31 := 0.0387
XL31 := 0.2807  # Ω/km
# Imp. urutan positif
ZL31 := (RL31 + j*XL31)*L3
ZL31 = 0.136611 + 0.990871i  # Ω
|ZL31| = 1.00024  # Ω
θph3 := arg(ZL31)*k^-1
θph3 = 82.1501  # deg
# Imp. urutan nol
RL30 := RL31 + 0.15
Ω/km
XL30 := 3*XL31
ZL30 := (RL30 + j*XL30)*L3
ZL30 = 0.666111 + 2.97261i  # Ω
|ZL30| = 3.04633  # Ω
θN3 := arg(ZL30)*k^-1
θN3 = 77.3697  # deg
# Imp. mutual
ZM30 := 0.0493 + j*0.2962
|ZM30| = 0.300275  # Ω/km
ZLM30 := ZM30*L3
|ZLM30| = 1.05997  # Ω
θM30 := arg(ZM30)*k^-1
θM30 = 80.5502  # deg
# 1.4  JTAKE-MAXIM-1
j := sqrt(-1)
a := -0.5 + 0.5*j*sqrt(3)
k := 2*π/360
# CAB-150kV-CU 240mm (550A)
L4 := 1.1  # km
RL41 := 0.087
XL41 := 0.132  # Ω/km
# Imp. urutan positif
ZL41 := (RL41 + j*XL41)*L4
ZL41 = 0.0957 + 0.1452i  # Ω
|ZL41| = 0.173901  # Ω
θph4 := arg(ZL41)*k^-1
θph4 = 56.6115  # deg
# Imp. urutan nol
RL40 := 0.15 + RL41
RL40 = 0.237
Ω/km
XL40 := 3*XL41
XL40 = 0.396
ZL40 := (RL40 + j*XL40)*L4
ZL40 = 0.2607 + 0.4356i  # Ω
|ZL40| = 0.507653  # Ω
θN4 := arg(ZL40)*k^-1
θN4 = 59.1001  # deg
# Imp. mutual
ZM40 := 0.0493 + j*0.2962
|ZM40| = 0.300275  # Ω/km
ZLM40 := ZM40*L4
|ZLM40| = 0.330302  # Ω
θM40 := arg(ZM40)*k^-1
θM40 = 80.5502  # deg
# 2. Impedansi Trafo GI JATAKE
# Trafo
XT1a := 0.125*150^2/60
XT1a = 46.875  # Ω
XT11 := XT1a
XT11 = 46.875  # Ω
# SUTT JATAKE DUA - JATAKE LAMA
# I. Distance relay NARI PCS-931
# 3.1.1 Ratio CT & PT
CT1 := 2000/5  # A
PT1 := 150000/100  # Volt
In := 5  # A
n1 := CT1/PT1
n1 = 0.266667
Vn := 100/sqrt(3)  # V
# 3.1.2 Jangkauan induktif
# ZONE-1
|ZL11| = 1.94665  # Ω  # (Primer)
Z1P := 0.8*ZL11
|Z1P| = 1.55732  # Ω  # (Primer)
Z1S := Z1P*n1
|Z1S| = 0.415285  # Ω  # (Sekunder)
# ZONE-2
K2 := 1.0
Z2min := 1.2*ZL11
|Z2min| = 2.33598  # Ω  # (Primer)
Z2mak1 := (ZL11 + (0.8*ZL21*K2))*0.8
|Z2mak1| = 2.19748  # Ω  # (Primer)
ZTrf2 := 0.8*(ZL11 + 0.5*XT11*j)
|ZTrf2| = 20.2938  # Ω  # (Primer)
Z2b := ZL11 + 0.8*ZL21
|Z2b| = 2.74685  # Ω  # (Primer)
# Dipilih Zone 2 terbesar tetapi tidak lebih besar dari zone 2 trafo
Z21mak := Z2mak1*(|Z2mak1| > |Z2min|) + Z2min*(|Z2min| > |Z2mak1|)
Z22mak := Z21mak*(|Z21mak| < |ZTrf2|) + ZTrf2*(|ZTrf2| < |Z21mak|)
Z2P := Z22mak*(|Z22mak| < |Z2b|) + Z22mak*(|Z2b| < |Z22mak|)
|Z2P| = 2.33598  # Ω  # (Primer)
Z2S := Z2P*n1
|Z2S| = 0.622928  # Ω  # (Sekunder)
# ZONE-3 Forward
# Infeed
K3 := 1.0
Z3min := 1.2*(ZL11 + K3*ZL31)
|Z3min| = 3.53627
Z3mak1 := 0.8*(ZL11 + (1.2*ZL31)*K3)
|Z3mak1| = 2.51755
Z3mak2 := 0.8*(ZL11 + (0.8*(ZL31 + 0.8*ZL41)*K3))
|Z3mak2| = 2.27814
Z3mak3 := 0.8*(ZL11 + 0.8*(ZL31 + 0.8*ZL41))
|Z3mak3| = 2.27814
Z3Trf := 0.8*(ZL11 + 0.8*XT11*j)
|Z3Trf| = 31.5434
Z3b := (ZL11 + (K3*(0.8*(ZL31 + 0.8*ZL41))))
|Z3b| = 2.84767
Z31 := Z3mak1*(|Z3mak1| > |Z3mak2|) + Z3mak2*(|Z3mak2| > |Z3mak1|)
Z32 := Z31*(|Z31| > |Z3min|) + Z3min*(|Z3min| > |Z31|)
Z3P := Z3Trf*(|Z32| > |Z3Trf|) + Z32*(|Z3Trf| > |Z32|)
|Z3P| = 3.53627
Z3S := Z3P*n1
|Z3S| = 0.943006
# 3.1.3.  Setelan Waktu
# 1.
T1 := 0
# 2. | Timer Zone 2 :
|ZL11| = 1.94665
q := |Z2P - ZL11|
q = 0.38933
XL21 = 0.2807
X1sg := 0.8*XL21*L2
|X1sg| = 0.792697  # Ω  # (Primer)
Z1sg := 0.8*ZL21
Z1sg = 0.109289 + 0.792697i
# Lihat apakah Z2bs - (ZL11) < dari Z1sg, maka T2bs = 0.4 detik  jika tidak T2bs=0.8 detik
T2a := 0.4
T2b := 0.8
T2 := T2a*((|Z2P| - |ZL11|) < |X1sg|) + T2b*((|Z2P| - |ZL11|) > |X1sg|)
|Z2P| - |XL11| = 2.05528
T2 = 0.4  # detik
# 3.
T3 := 1.2*(|Z3b| > |Z32|) + 1.6*(|Z32| > |Z3b|)
T3 = 1.6  # detik
# 2. Setting NARI PCS-931
# 2.1 Current setting DPFC current fault detector element(I_DPFC_OC_FD)
# This value should be greater than maximum variation of load current. Typically 0.2In
I_DPFC_OC_FD := 0.2*In = 1  # A
# 2.2 Current set of zero sequence current fault detector element(I_ROC_FD)
# This value should be greater than maximum zero sequence unbalance fault. Typically 0.2In
I_ROC_FD := 0.2*In = 1  # A
# CT Ratio factor:
CTP_local := CT1*In = 2000
CTP_remote := 2000
CTA := CTP_local
CTB := CTP_remote
CT_factor := CTP_local/max(CTP_local, CTP_remote) = 1
# 2.3 Impedance setting of DPFC distance element(Z_DPFC)
# As Zone 1 Distance we use 80% of impedance
Z_DPFC := |Z1S| = 0.415285  # Ω  # sekunder
# 2.4 Impedance setting of pilot distance prot.for forward direction element(Z_TeleP)
# It should be 1.5 times impedane of whole line
Z_TeleP := |Z2S| = 0.622928  # Ω  # sekunder
# 2.5 Impedance set of pilot distance prot. for reverse direction element(Z_Rev_TeleP)
# This set is valid when PCS-902 is used for weak infeed end. And the setting is 0Ω
Z_Rev_TeleP := 0  # Ω  # (Not Used)
X1Σ := X1 + X11pu
X1Σ = 0.0253607
X0Σ := X0 + X10pu
X0Σ = 0.0569121
E := 1
Ksen := 2
# 2.6 Current set of pilot directional zero-sequence prot. It should ensure that pilot
# directional zero sequence prot. is sensitive enough when an earth fault happens in the
# remote end of line. (I_ROC_TeleP)
Ik := 3*E/(2*X1Σ + X0Σ)*Ib
Ik = 10728.1  # A
Iks := Ik/2500  # A
Iks = 4.29123
I_ROC_TeleP := Iks/Ksen
I_ROC_TeleP = 2.14561  # A
# 2.7 Setting time of automatic channel test.According to the site of setting
# parameters.(t_ChAutoTest)
# 2.8 Zero sequence compensation coefficient (K0)
K0 := (ZL10 - ZL11)/(3.*ZL11) = 0.678331 - 0.0846049i
Re(K0) = 0.678331
Im(K0) = -0.0846049
# 2.9 Current setting for power swing blocking. This current setting should be greater than
# maximum load current of the line.We use CCC
IratedSST := ccc/CT1  # Α  # sekunder
I_OC_PSB := IratedSST*1.2
I_OC_PSB = 4.86  # Α  # sekunder
# 2.10 Impedance setting of zone 1 of phase-to-ground distance element (Z_PG1)
# we use 80% of impedance line and no delay time
Z_PG1 := |Z1S| = 0.415285  # Ω  # sekunder
# 2.11 Impedance setting of zone 2 of phase to ground distance element (Z_PG2)
Z_PG2 := |Z2S| = 0.622928  # Ω  # sekunder
T2 = 0.4  # s
# 2.12 Impedance setting of zone 3 of phase-to-ground distance element (Z_PG3)
Z_PG3 := |Z3S| = 0.943006  # Ω  # sekunder
T3 = 1.6  # s
# 2.13 Impedance setting  of zone 1 of phase-phase distance element (Z_PP1)
Z_PP1 := |Z1S| = 0.415285  # Ω  # sekunder
# 2.14 Impedance setting of zone 2 of phase-to-phase distance element (Z_PP2)
Z_PP2 := |Z2S| = 0.622928  # Ω  # sekunder
# 2.15 Impedance setting of zone 3 of phase-to-phase distance element (Z_PP3)
Z_PP3 := |Z3S| = 0.943006  # Ω  # sekunder
# Resistive Reach calculation :
CCC := ccc  # A
CT := CT1
CTp := CT1*In = 2000
CCC = 1620
CT = 400
CC := CCC*(CCC < CTp) + CTp*(CTp < CCC)  # A
CC = 1620
IloadMax := CC/CT  # nilai load max dalam sekunder
Zloadmin := Vn/IloadMax
Zloadmin = 14.2556  # Ω  # sekunder
# Tipikal Resistive reach max : R gangguan fasa akan mencegah impedansi beban min dengan margin lebih besar atau sama dengan 40 %. R gangguan tanah dengan margin lebih besar atau sama dengan 20 %.
# Margin resistive reach max :
MRphmax := 0.4*Zloadmin
MRphmax = 5.70222  # Ω  # Ω  # Ω  # sekunder  # sekunder  # sekunder
MRgmax := 0.2*Zloadmin
MRgmax = 2.85111  # Ω  # sekunder
# Tipikal Resistive reach min (ph fault) : lebih besar dari fault resistance (dgn formula warrington)
# Resistive reach min (g fault) : 20 ohm primer (tipikal)
# Jarak konduktor fasa :
Lc := 4.3  # m
# Arus gangguan fasa-fasa :
Ihs3f := 24985  # A
Ihs2f := sqrt(3)/2*Ihs3f
Ihs2f = 21637.6  # A
# Arc resistance :
Ra := (28710*Lc)/Ihs2f^1.4
Ra = 0.105247  # Ω
# Resistive reach max :
Rphmax := Zloadmin - MRphmax
Rphmax = 8.55334  # Ω  # sekunder
Rgmax := Zloadmin - MRgmax
Rgmax = 11.4044  # Ω  # sekunder
# 50 % Load Max
0.5*Zloadmin = 7.12778  # Ω  # sekunder
# 50 % Load Max batas maksimum resistif reach (ground) khususnya untuk double circuit line saat 1 sirkit lepas
# Resistive reach min :
Rphmin := Ra*n1
Rphmin = 0.0280657  # Ω  # sekunder
Rgmin := 20*n1
Rgmin = 5.33333  # Ω  # sekunder
# Setting resistive reach :
Rphminr := 0  # Ω
R3ph := 0.8*Rphmax
R3ph = 6.84267  # Ω  # sekunder
Rphmaxr := 400/In  # Ω
R3g := 0.5*Zloadmin
R3g = 7.12778  # Ω  # sekunder
# modif rumus karena nilai R3g melewati 50%Zload min
Rphstep := 0.01/In  # Ω
R2ph := 0.8*R3ph
R2ph = 5.47414  # Ω  # sekunder
R2g := 0.9*R3g
R2g = 6.415  # Ω  # sekunder
Rgminr := 0  # Ω
R1ph := 0.8*R2ph
R1ph = 4.37931  # Ω  # sekunder
Rgmaxr := 400/In  # Ω
R1g := 0.9*R2g
R1g = 5.7735  # Ω  # sekunder
Rgstep := 0.01/In  # Ω
# catatan : Nilai R3ph-R2ph-R1ph agar diset di antara nilai
Rphmin ≤ Rphmax
# Nilai R3g-R2g-R1g agar di set di antara nilai
Rgmin ≤ 0.5*Zloadmin
# 2.16 Restrict impedance of the reach of distance element (R_Blinder)
R_Blinder := 0.9*0.5*150000*n1/(sqrt(3)*1620)
R_Blinder = 6.415  # Ω  # sekunder
%Z2 := Z_PG2*100/(|ZL11|*n1) = 120
%Z3 := Z_PG3*100/(|ZL11|*n1) = 181.659
# 2.17 Phi1_Reach =
# and Phi0_Reach =^o
θph1 = 82.1501
θN1 = 77.3697
# 2.18 Phase shift of zone 1,2 of phase-to-ground distance element (phi_Shift_ZPG)
# Recommended value: 30^o for length of the line <=10km,
# 15^o for length of the line >=10km,
# 0^o for length of the line >=40km
# So we set 30^o
# 2.1 9 Phase shift of zone 1,2 of phase-to-phase distance element (phi_Shift_ZPP)
# Recommended value: 30^o for length of the line <=2km,
# 15^o for length of the line >=2km,
# 0^o for length of the line >=10km
# So we set 15^o
# 2.20 Current setting of stage 1 of zero sequence overcurrent element (I_ROC1) and
# no delay (works intantaneously).
# Not Activated
# 2.21 Current setting of stage 2 of zero sequence overcurrent element (I_ROC2) be
# compatible with the zero sequence current protection.
I_ROC2 := 0.2 - 0.4  # A  # sekunder
# Not Activated because using OC/GF Relay at another hardware
# 2.22 I_ROC3 and I_ROC4 set Maximum because the cable is very short and the  150kV
# busbar power is large.
# Not Activated because using OC/GF Relay at another hardware
# 2.23 Current setting of accelerated stage of zero sequence overcurrent element
# (I_ROC_SOTF)
I_ROC_SOTF := 0.5*0.8*Ihs0/CT1
I_ROC_SOTF = 23.126  # A
# 2.24 Phase Current setting of overcurrent element for VTS (I_OC_VTS) Zero sequence
# current setting of overcurrent element for VTS (I_ROC_VTS) Time setting of phase and
# zero sequence overcurrent elements for VTS (t_OC/ROC_VTS=0.1s)
I_OC_VTS := 8*In = 40  # A
I_ROC_VTS := 2.5*In = 12.5  # A
# 2.25 Auto Reclose : Using Single Shot SPAR
# En_1P_AR : 1
# En_3P_AR : 0
# En_1/3P_AR : 0
# t_Reclaim : 40 s | Reclaim Time
# t_1P_AR : 1 s | Dead Time | Timer to wait for extinction of temporary fault
# 2.26 Synchrocheck
# En_SynChk : 1
# UBusHigh : Live Bus
UBusHigh := 0.9*Vn = 51.9615  # fix set > 80%
# ULineHigh : Live Line
ULineHigh := 0.9*Vn = 51.9615  # fix set > 80%
# UDiff : Differential Voltage
UDiff := 0.1*Vn = 5.7735  # V
# FreqDiff :Slip Frequency
FreqDiff := 0.167  # Hz
# phi_Diff_SynChk : Frequency diff limit of SynchroCheck
phi_Diff_SynChk := 15  # deg
# En_DdB_Ddl_AR : 0
# En_LvB_DdL_AR : 0
# En_DdB_LvL_AR : 0
# ULineLow :Dead Line
Ulinelow := 0.2*Vn = 11.547  # fix set < 30%
# UBusLow : Dead Bus
UBusLow := 0.2*Vn = 11.547  # fix set < 30%
# 2.27 Positive sequence and zero reactance and resistance of the line.(X1L,R1L,X0L,R0L)
Ω
R1L := RL11*L1*n1 = 0.0708984  # Ω
X1L := XL11*L1*n1 = 0.514242  # Ω
R0L := RL10*L1*n1 = 0.345698  # Ω
X0L := XL10*L1*n1 = 1.54273  # Ω
R0M := RM10*L1*n1 = 0.0903176  # Ω
X0M := XM10*L1*n1 = 0.542638  # Ω
# 2.28 Line length=  km
L1 = 6.87
