# PERHITUNGAN SETELAN RELAI JARAK SUTT 150 KV
# GI CENGKARENG BAY CENGKARENG BARU
# PERHITUNGAN SETELAN RELAI JARAK SUTT 150 KV
# GI CENGKARENG BAY CENGKARENG BARU
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# CENGKARENG | CENGKARENG BARU | TANGERANG BARU
# L1; 0.397 KM, 0.123 OHM | L3; 6.3 KM, 4.05 OHM | LONTAR
# L4; 21.23 KM, 6.03 OHM
# 60 MVA
# 12.5%
# 150kV
# TANGERANG BARU
# L2; 6.3 KM, 4.05 OHM
j := sqrt(-1)
a := -0.5 + 0.5*j*sqrt(3)
k := 2*π/360
# 1. Data Impedansi
# 1.1  CENGKARENG - CENGKARENG BARU
# CAB-150kV-CU 2x2000mm (3168A)
R11a := 0.00655  # Ω/km
X11a := 0.312  # Ω/km
Iccc_a := 3168  # A
L11a := 0.397  # km
R11b := 0  # Ω/km
X11b := 0  # Ω/km
Iccc_b := 9999  # A
L11b := 0  # km
Iccc_c := 9999  # A
L11c := 0  # km
R11c := 0  # Ω/km
X11c := 0  # Ω/km
L11 := L11a + L11b + L11c
Iccc := min(Iccc_a, Iccc_b, Iccc_c)
L11 = 0.397  # km
Iccc = 3168  # A
# Imp. urutan nol
RL10a := (0.15 + R11a)*L11a
RL10a = 0.0621504
XL10a := (3*X11a)*L11a
XL10a = 0.371592
RL10b := (0.15 + R11b)*L11b
RL10b = 0
XL10b := (3*X11b)*L11b
XL10b = 0
RL10c := (0.15 + R11c)*L11c
RL10c = 0
XL10c := (3*X11c)*L11c
XL10c = 0
RL10 := RL10a + RL10b + RL10c
XL10 := XL10a + XL10b + XL10c
RL10 = 0.0621504
XL10 = 0.371592
R10 := RL10/L11
X10 := XL10/L11
R10 = 0.15655  # Ω/km
X10 = 0.936  # Ω/km
ZL10 := RL10 + XL10*j
ZL10 = 0.0621504 + 0.371592i
|ZL10| = 0.376754
θN1 := arg(ZL10)*k^-1
θN1 = 80.5049  # deg
# Imp. urutan positif
RL11a := R11a*L11a
RL11a = 0.00260035
XL11a := X11a*L11a
XL11a = 0.123864
RL11b := R11b*L11b
RL11b = 0
XL11b := X11b*L11b
XL11b = 0
RL11c := R11c*L11c
RL11c = 0
XL11c := X11c*L11c
XL11c = 0
RL11 := RL11a + RL11b + RL11c
XL11 := XL11a + XL11b + XL11c
RL11 = 0.00260035
XL11 = 0.123864
R11 := RL11/L11
X11 := XL11/L11
R11 = 0.00655  # Ω/km
X11 = 0.312  # Ω/km
ZL11 := RL11 + XL11*j
ZL11_verify := (R11a + j*X11a)*L11a + (R11b + j*X11b)*L11b + (R11c + j*X11c)*L11c
ZL11_verify = 0.00260035 + 0.123864i
ZL11 = 0.00260035 + 0.123864i
|ZL11| = 0.123891
ZL1 := ZL11
θph1 := arg(ZL11)*k^-1
θph1 = 88.7973  # deg
# Imp. mutual
ZM10 := 0.0493 + j*0.2962
|ZM10| = 0.300275  # Ω/km
ZLM10 := ZM10*L11
|ZLM10| = 0.119209  # Ω
θM10 := arg(ZM10)*k^-1
θM10 = 80.5502  # deg
# 1.2  CENGKARENG BARU - TANGERANG BARU
# OHL-150kV-ACCC-DUBLIN2x520mm 3746A
R21a := 0.03037  # Ω/km
X21a := 0.64236  # Ω/km
L21a := 6.3  # km
R21b := 0  # Ω/km
X21b := 0  # Ω/km
L21b := 0  # km
R21c := 0  # Ω/km
X21c := 0  # Ω/km
L21c := 0  # km
L21 := L21a + L21b + L21c
L21 = 6.3  # km
# Imp. urutan nol
RL20a := (0.15 + R21a)*L21a
RL20a = 1.13633
XL20a := (3*X21a)*L21a
XL20a = 12.1406
RL20b := (0.15 + R21b)*L21b
RL20b = 0
XL20b := (3*X21b)*L21b
XL20b = 0
RL20c := (0.15 + R21c)*L21c
RL20c = 0
XL20c := (3*X21c)*L21c
XL20c = 0
RL20 := RL20a + RL20b + RL20c
XL20 := XL20a + XL20b + XL20c
RL20 = 1.13633
XL20 = 12.1406
R20 := RL20/L21
X20 := XL20/L21
R20 = 0.18037  # Ω/km
X20 = 1.92708  # Ω/km
ZL20 := RL20 + XL20*j
ZL20 = 1.13633 + 12.1406i
|ZL20| = 12.1937
θN2 := arg(ZL20)*k^-1
θN2 = 84.6528  # deg
# Imp. urutan positif
RL21a := R21a*L21a
RL21a = 0.191331
XL21a := X21a*L21a
XL21a = 4.04687
RL21b := R21b*L21b
RL21b = 0
XL21b := X21b*L21b
XL21b = 0
RL21c := R21c*L21c
RL21c = 0
XL21c := X21c*L21c
XL21c = 0
RL21 := RL21a + RL21b + RL21c
XL21 := XL21a + XL21b + XL21c
RL21 = 0.191331
XL21 = 4.04687
R21 := RL21/L21
X21 := XL21/L21
R21 = 0.03037  # Ω/km
X21 = 0.64236  # Ω/km
ZL21 := RL21 + XL21*j
ZL21_verify := (R21a + j*X21a)*L21a + (R21b + j*X21b)*L21b + (R21c + j*X21c)*L21c
ZL21_verify = 0.191331 + 4.04687i
ZL21 = 0.191331 + 4.04687i
|ZL21| = 4.05139
ZL2 := ZL21
θph2 := arg(ZL21)*k^-1
θph2 = 87.2931  # deg
# 1.3  CENGKARENG BARU - TANGERANG BARU
# CENGKARENG BARU - TANGERANG BARU
R31a := 0.03037  # Ω/km
X31a := 0.64236  # Ω/km
L31a := 6.3  # km
R31b := 0  # Ω/km
X31b := 0  # Ω/km
L31b := 0  # km
R31c := 0  # Ω/km
X31c := 0  # Ω/km
L31c := 0  # km
L31 := L31a + L31b + L31c
L31 = 6.3  # km
# Imp. urutan nol
RL30a := (0.15 + R31a)*L31a
RL30a = 1.13633
XL30a := (3*X31a)*L31a
XL30a = 12.1406
RL30b := (0.15 + R31b)*L31b
RL30b = 0
XL30b := (3*X31b)*L31b
XL30b = 0
RL30c := (0.15 + R31c)*L31c
RL30c = 0
XL30c := (3*X31c)*L31c
XL30c = 0
RL30 := RL30a + RL30b + RL30c
XL30 := XL30a + XL30b + XL30c
RL30 = 1.13633
XL30 = 12.1406
R30 := RL30/L31
X30 := XL30/L31
R30 = 0.18037  # Ω/km
X30 = 1.92708  # Ω/km
ZL30 := RL30 + XL30*j
ZL30 = 1.13633 + 12.1406i
|ZL30| = 12.1937
θN3 := arg(ZL30)*k^-1
θN3 = 84.6528  # deg
# Imp. urutan positif
RL31a := R31a*L31a
RL31a = 0.191331
XL31a := X31a*L31a
XL31a = 4.04687
RL31b := R31b*L31b
RL31b = 0
XL31b := X31b*L31b
XL31b = 0
RL31c := R31c*L31c
RL31c = 0
XL31c := X31c*L31c
XL31c = 0
RL31 := RL31a + RL31b + RL31c
XL31 := XL31a + XL31b + XL31c
RL31 = 0.191331
XL31 = 4.04687
R31 := RL31/L31
X31 := XL31/L31
R31 = 0.03037  # Ω/km
X31 = 0.64236  # Ω/km
ZL31 := RL31 + XL31*j
ZL31_verify := (R31a + j*X31a)*L31a + (R31b + j*X31b)*L31b + (R31c + j*X31c)*L31c
ZL31_verify = 0.191331 + 4.04687i
ZL31 = 0.191331 + 4.04687i
|ZL31| = 4.05139
ZL3 := ZL31
θph3 := arg(ZL31)*k^-1
θph3 = 87.2931  # deg
# 1.4 TANGERANG BARU - LONTAR
# OHL-150kV-TACSR 2X410/60mm2 (2730A)
L4 := 21.23  # km
# IMPEDANSI URUTAN POSITIF
RL41 := 0.036  # Ω/km
XL41 := 0.282  # Ω/km
ZL41 := (RL41 + j*XL41)*L4
ZL41 = 0.76428 + 5.98686i  # Ω
|ZL41| = 6.03545
θph4 := arg(ZL41)*k^-1
θph4 = 82.725  # deg
ZL4 := ZL41
# IMPEDANSI URUTAN NOL
RL40 := (0.15 + RL41)
XL40 := (3*XL41)
ZL40 := (RL40 + j*XL40)*L4
ZL40 = 3.94878 + 17.9606i  # Ω
|ZL40| = 18.3895
θN4 := arg(ZL40)*k^-1
θN4 = 77.6003  # deg
# 1.5 TRAFO GI CENGKARENG BARU
MVA := 60
X_trafo := 12.183 %
XT1 := X_trafo*150^2/MVA
XT1 = 45.6863  # Ω
XT1 = 45.6863  # Ω
|ZL1| = 0.123891  # ohm
XT1 = 45.6863  # ohm
|ZL2| = 4.05139  # ohm
|ZL3| = 4.05139  # ohm
|ZL4| = 6.03545  # ohm
# PERHITUNGAN SETELAN RELE JARAK ~ Distance Relay MiCom P545
# I. Distance relay MiCOM - P545
# 3.1.1 Ratio CT & PT
CT1 := 4000/5  # A
PT1 := 150000/100  # Volt
In := 5  # A
Vn := 100/sqrt(3)  # V
n1 := CT1/PT1 = 0.533333
|ZL1| = 0.123891  # Ω  # (Primer)
ZL1s := n1*|ZL1| = 0.0660754  # Ω  # (Secondary)
# 3.1.2 Jangkauan induktif
# ZONE-1
Z1P := 0.8*ZL1
|Z1P| = 0.099113  # Ω  # (Primer)
Z1S := Z1P*n1
|Z1S| = 0.0528603  # Ω  # (Sekunder)
# ZONE-2
Z2min := 1.2*ZL1
|Z2min| = 0.14867  # Ω  # (Primer)
Z2mak1 := 0.8*(ZL1 + 0.8*ZL2)
|Z2mak1| = 2.69197  # Ω  # (Primer)
ZTrf2 := 0.8*(ZL1 + 0.5*XT1*j)
|ZTrf2| = 18.3736  # Ω  # (Primer)
Z2b := ZL1 + 0.8*ZL2
|Z2b| = 3.36496  # Ω  # (Primer)
# Dipilih Zone 2 terbesar tetapi tidak lebih besar dari zone 2 trafo
Z21mak := Z2mak1*(|Z2mak1| > |Z2min|) + Z2min*(|Z2min| > |Z2mak1|)
Z22mak := Z21mak*(|Z21mak| < |ZTrf2|) + ZTrf2*(|ZTrf2| < |Z21mak|)
Z2P := Z22mak
Z2P = 0.124532 + 2.68909i
|Z2P| = 2.69197  # Ω  # (Primer)
Z2S := Z2P*n1
|Z2S| = 1.43572  # Ω  # (Sekunder)
# ZONE-3 Forward
# Infeed
K3 := 1
Z3min := 1.2*(ZL1 + ZL3)
|Z3min| = 5.01029  # Ω  # (Primer)
Z3mak1 := 0.8*(ZL1 + (1.2*ZL3)*K3)
|Z3mak1| = 3.98841  # Ω  # (Primer)
Z3mak2 := 0.8*(ZL1 + (K3*(0.8*(ZL3 + 0.8*ZL4))))
|Z3mak2| = 5.77743  # Ω  # (Primer)
ZTrf3 := 0.8*(ZL1 + 0.8*XT1*j)
|ZTrf3| = 29.3383  # Ω  # (Primer)
Z3b := (ZL1 + (K3*(0.8*(ZL3 + 0.8*ZL4))))
|Z3b| = 7.22179  # Ω  # (Primer)
Z31 := Z3mak1*(|Z3mak1| > |Z3mak2|) + Z3mak2*(|Z3mak2| > |Z3mak1|)
Z32 := Z31*(|Z31| > |Z3min|) + Z3min*(|Z3min| > |Z31|)
Z3P := ZTrf3*(|Z32| > |ZTrf3|) + Z32*(|ZTrf3| > |Z32|)
|Z3P| = 5.77743  # Ω  # (Primer)
Z3S := Z3P*n1
|Z3S| = 3.0813  # Ω  # (Sekunder)
# ZONE-3 Reverse
# Disetting 10 % dari impedansi Line yang diamankan (ZL11)
# Z3 Reverse
Z3R := 0.1*ZL1
Z3R = 0.000260035 + 0.0123864i
|Z3R| = 0.0123891  # Ω  # (Primer)
Z3RS := |Z3R|*n1
Z3RS = 0.00660754  # Ω  # (Sekunder)
# 3.1.3.  Setelan Waktu
T1 := 0
T1 = 0  # detik
T2 := 0.4*(|Z2b| > |Z22mak|) + 0.8*(|Z22mak| > |Z2b|)
T2 = 0.4  # detik
T3 := 1.2*(|Z3b| > |Z32|) + 1.6*(|Z32| > |Z3b|)
T3 = 1.2  # detik
# dipilih
T3 := 1.6  # detik
# Timer Zone 2
|ZL1| = 0.123891
|Z2P| = 2.69197
q := |Z2P| - |ZL1|
q = 2.56808
Z1sg := 0.8*ZL2
|Z1sg| = 3.24111  # Ω  # (Primer)
# Lihat apakah Z2bs - (ZL1) < dari Z1sg, maka T2bs = 0.4 detik  jika tidak T2bs=0.8 detik
T2a := 0.4
T2b := 0.8
T2 := T2a*(q < |Z1sg|) + T2b*(q > |Z1sg|)
T2 = 0.4  # detik
# 3.1.4. PROTECTION SETTING DISTANCE ELEMENT
ZL1 = 0.00260035 + 0.123864i
# Line setting :
|ZL1| = 0.123891
Lmin := 0.3  # km
L := L11
Lmax := 1000  # km
L = 0.397  # km
Lstep := 0.01  # km
ZL := |ZL1|*n1
ZLmin := 0.001/In  # Ω
ZL = 0.0660754  # Ω  # sekunder
ZLmax := 500/In  # Ω
ZLstep := 0.001/In  # Ω
θL := θph1
θLmin := -90  # deg
θL = 88.7973  # deg
θLmax := 90  # deg
θLstep := 0.1  # deg
# Zone setting :
# Bit  : 7 6 5 4 3 2 1 0
# Bit 0 = Z1  enabled
# Bit 1 = Z2  enabled
# Bit 2 = Zp  enabled
# Bit 3 = Z3  enabled
# Bit 4 = Z4  enabled
# Zone status : 0 0 0 0 0 0 1 1
# Ground Fault Compensation setting :
kZ0 := (ZL10 - ZL11)/(3*ZL11)
|kZ0| = 0.685507
kZ0min := 0
kZN := |kZ0|
kZ0max := 7
kZN = 0.685507
kZ0step := 0.001
θkZ0min := 0  # deg
θkZ0 := arg(kZ0)*k^-1
θkZN := θkZ0
θkZ0max := 360  # deg
θkZN = -12.3139  # deg
θkZ0step := 0.1  # deg
# Zone 1
Zmin := 0.001/In  # Ω
Z1 := |Z1S|
Z1 = 0.0528603  # Ω  # sekunder
tZ1 := T1
tZ1 = 0  # sec
Zmax := 500/In  # Ω
# Zone 2
Zstep := 0.001/In  # Ω
Z2 := |Z2S|
Z2 = 1.43572  # Ω  # sekunder
tZmin := 0  # sec
tZ2 := T2
tZ2 = 0.4  # sec
tZmax := 10  # sec
tZstep := 0.002  # sec
# Zone 3
Z3 := |Z3S|
Z3 = 3.0813  # Ω  # sekunder
tZ3 := T3
tZ3 = 1.6  # sec
# Resistive Reach calculation :
CT1 = 800
n1 = 0.533333
CTp := CT1*In = 4000
Iccc = 3168
Iloadmax := In = 5  # A
In = 5
CCC := Iccc = 3168
CC := CCC*(CCC < CTp) + CTp*(CTp < CCC)  # A
CC = 3168
IloadMax := CC/CT1
IloadMax = 3.96
Zloadmin := Vn/IloadMax = 14.5796  # (ohm) dr sisi sekunder
# Rumus lain untuk perhitungan resistive reach berdasarkan primary value
# Tegangan phasa-phasa
Vpp := PT1*100  # Volt
# Impedansi Beban Maksimum
ZloadMax := Vpp/(sqrt(3)*CC)*n1
|ZloadMax| = 14.5796  # Ω  # Ω  # Ω  # sekunder  # sekunder  # sekunder
# Tipikal Resistive reach max : nilai "R gangguan fasa" akan mencegah impedansi beban min dengan margin lebih besar atau sama dengan 40 %. nilai "R gangguan tanah" dengan margin lebih besar atau sama dengan 20 %.
# Margin resistive reach max :
MRphmax := 0.4*Zloadmin
MRphmax = 5.83182  # Ω  # Ω  # Ω  # sekunder  # sekunder  # sekunder
MRgmax := 0.2*Zloadmin
MRgmax = 2.91591  # Ω  # sekunder
# Tipikal Resistive reach min (ph fault) : lebih besar dari fault resistance (dgn formula warrington)
# Resistive reach min (g fault) : 20 ohm primer (tipikal)
# Jarak konduktor fasa :
Lc := 4.3  # km
# Arus gangguan fasa-fasa :
Ihs3f := 21250  # A  # (data digsilent 17 Juli 2020)
# 3 phasa fault
Ihs2f := sqrt(3)/2*Ihs3f
Ihs2f = 18403  # A
# Arc resistance :
Ra := (28710*Lc)/Ihs2f^1.4
Ra = 0.132025  # Ω
# Resistive reach max :
Rphmax := Zloadmin - MRphmax
Rphmax = 8.74773  # Ω  # sekunder
Rgmax := Zloadmin - MRgmax
Rgmax = 11.6636  # Ω  # sekunder
# Resistive reach min :
Rphmin := Ra*n1
Rphmin = 0.0704133  # Ω  # sekunder
Rgmin := 20*n1
Rgmin = 10.6667  # Ω  # sekunder
# Setting resistive reach : | lebih besar dari Rgmin dan lebih kecil dari Rgmax
Rphminr := 0  # Ω
R3ph := 0.8*Rphmax
R3ph = 6.99819  # Ω  # sekunder
Rphmaxr := 400/In  # Ω
R3g := 0.6*Zloadmin
R3g = 8.74773  # Ω  # sekunder
# modif rumus karena nilai R3g melewati 50%Zload min
Rphstep := 0.01/In  # Ω
R2ph := 0.8*R3ph
R2ph = 5.59855  # Ω  # sekunder
R2g := 0.8*R3g
R2g = 6.99819  # Ω  # sekunder
Rgminr := 0  # Ω
R1ph := 0.8*R2ph
R1ph = 4.47884  # Ω  # sekunder
Rgmaxr := 400/In  # Ω
R1g := 0.8*R2g
R1g = 5.59855  # Ω  # sekunder
Rgstep := 0.01/In  # Ω
# DISTANCE SCHEME :
# Program mode : Standard scheme
# Standard mode : BASIC
# Fault type  : Both enabled | Phase to ground and Phase to phase fault
# Trip mode  : 1P Z1 Z2 & CR
# Bit  : 6 5 4 3 2 1 0
# Bit 0 = Z1  enabled
# Bit 1 = Z2  enabled
# Bit 2 = Zp  enabled
# Bit 3 = Z3  enabled
# Bit 4 = Z4  enabled
# TOR-SOTF Mode : 0 0 0 0 0 1 1
# SOTF Delay  : 30 sec.
# Weak Infeed  : Disabled
# Loss of Load  : Disabled
# Z BLINDER IMP:
CC = 3168  # A
Vp := PT1*100 = 150000  # V
k := 2*π/360
k = 0.0174533
n1 = 0.533333
# a. Load Impedance:
Zld_primer := Vp/sqrt(3)/CC
Zld_primer = 27.3367  # Ω (primary)
Zld := Zld_primer*n1 = 14.5796  # Ω (secondary)
# Power factor load angle:
θld := 30*k
cos(30*k) = 0.866025
# b. Blinder Impedance:
ZB := Zld*cos(30*k)*0.51
ZB = 6.43939  # Ω (secondary)
ZB_primer := ZB/n1 = 12.0739  # Ω (primary)
# POWER SWING :
ΔRmin := 0
ΔR := 0.3*R3ph
ΔR = 2.09946  # Ω
ΔRmax := 400/In  # Ω
ΔX := 0.3*R3ph
ΔX = 2.09946  # Ω
R5 := 0.85*ZB
Z5 := 2*ZL
ΔRstep := 0.01/In  # Ω
R5 = 5.47348  # Ω
Z5 = 0.132151  # Ω
# SUPERVISION
# AUTORECLOSE | DISABLED
# 1P Trip Mode  : 1 - 3
# 1P Dead Time 1  : 1  sec
# Reclaim Time  : 40  sec
# Pulse Time  : 0.2  sec
# LINE DIFFERENTIAL RELAY SETTING FOR SUTT 150 kV Jatirangon2-Jatirangon
# Relay Type  : | MICOM P545
# Rated Current  :
in := In
in = 5  # A
# 1. System Data
# Line length
Ln := L11
Ln = 0.397  # km
# Teg Nom
KV := 150  # kV
# CT remote ratio
CT := 1600
CT = 1600
CT1 = 800
# CT ratio
CTr := 2000
CTr = 2000
# PT ratio
PT := 150*10^3/100
PT = 1500
# Freq
f := 50  # Hz
i := sqrt(-1)
# *Impedansi UGC :
R1 := R11  # Ω/km
R11 = 0.00655
X1 := X11  # Ω/km
Z1 := R1 + i*X1
|Z1|*Ln = 0.123891  # Ω  # primary
|Z1|*Ln*n1 = 0.0660754  # sekunder
# LINE PARAMETER
# Suseptansi
B := 71.94247*10^-6  # S/km
k := CT/PT
k = 1.06667
# Impedansi UGC :
XFL := X1*Ln*k
XFL = 0.132122  # Ω  # sekunder
RFL := R1*Ln*k
RFL = 0.00277371  # Ω  # sekunder
Z := RFL + XFL*i = 0.00277371 + 0.132122i
|Z| = 0.132151  # Ω  # sekunder
sudut(x) := arg(x)*180/π
sudut(Z) = 88.7973
# Panjang UGC :
Ln = 0.397  # km
# 2. Perhitungan Setting
# 2.1 Current Differential Setting
# a. basic current differential setting I_s1 :
# Charging Current :
Bt := B*Ln
Bt = 2.85612e-5  # S
Xc := 1/Bt
Xc = 35012.6  # Ω
# Charging current :
Ic := KV*10^3/(sqrt(3)*Xc)
Ic = 2.47347  # A primary
Ics := Ic/CT
Ics = 0.00154592  # A secondary
# Setting I_s1 minimum 2.5 x arus charging :
Is_calculation := 2.5*Ics
Is_calculation = 0.0038648  # A secondary
Is_standard := 0.2*in
Is_standard = 1  # A secondary
Is1 := Is_standard*(Is_calculation < Is_standard) + Is_calculation*(Is_calculation ≥ Is_standard)
# *nilai perhitungan terlalu kecil, dipilih 0.2 x In
# dipilih :
Is1 = 1  # A secondary
# b. percentage bias setting k_(1  :)
k1 := 30 %  # (recommended by manufacture)
# c. basic current differential setting I_s2 :
Is2 := 2*in  # (recommended by manufacture)
# dipilih :
Is2 = 10  # A secondary
# d. percentage bias setting k_2  _(:)
k2 := 150 %  # (recommended by manufacture)
# Untuk mengatasi efek line charging diperlukan I capacitive correction :
Bt = 2.85612e-5  # mho (  )  # Ω^-1  # primary
b := Bt*CT*PT^-1 = 3.04652e-5  # mho (  )  # Ω^-1  # secondary
# dipilih : | b_set = 10 | nmho * in | secondary
# I Cap Correction : Enabled
# Phase char  : Definite Time (DT)
# Phase Time Delay : 0 s
# Phase CT correction :
CT_1 := CT = 1600  # CT di GI Senayan
CT_2 := CTr = 2000  # CT di GI New Senayan
CT_corr.CLGBR := CT_1/CT_1 = 1  # CT correction di GI Jatirangon
CT_corrCLGLM := CT_2/CT_1 = 1.25  # CT correction di GI Jatirangon2
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# 2.2 Permissive intertrip timer (PIT)
# time to send intertripping signal to adjacent substation :
PIT := 25  # ms
# PIT I selection : Remote
# 2.3 Scheme Logic Setting
# Tripping mode :single pole
# Setting group : 1 Enabled & 2,3,4 Disabled
# Active setting : group 1
# 2.4 Communication Setting
# 2.4.1 Scheme setup : 2 Terminal
# 2.4.2 Address : 1-B
# 2.4.3 Comms mode : Standard
# 2.4.4 Baud rate Ch 1 : 64 kbits/s
# 2.4.5 Clock source Ch1 : Internal
# 2.4.6 Channel propagation delay tolerance (CDT)  : | 350 | us
# Jika waktu selisih delay propagasi sinyal melebihi setting ini maka isi data akan dibuang karena dapat menyebabkan mal operasi.
# 2.4.7 Communication failure time (CFT): | 10 | s
# CFT adalah waktu selama eror komunikasi harus tetap mendetect adanya eror sebelum channel dideclared "failed". Digunakan untuk menghindari alarm supervisi komunikasi dan alarm proteksi non-operasi terpengaruh oleh noise / interupsi link komunikasi
# 2.4.8 Communication fail mode (CFM) :  : | Channel 1
# 2.4.9 GPS synch : Disabled
# 2.4.10 Char Mod Time : 500 ms
# Char Mod Time digunakan untuk mengatasi masalah transient pada jalur komunikasi yang akan mereset propagation value ke nilai aslinya jika terjadi perubahan propagasi selama waktu perioda (yang ditentukan user)
# 2.4.11 Alarm Level : 25%
# 2.4.12 Prop delay Stats : Enabled
# 2.4.13 MaxCh1 PropDelay : 15 ms
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# I.  OCR dan GFR  (P141)
# Penghantar
CCC = 3168  # A
# Ratio CT
CT := CT1 = 800
# I Nominal Rele
In1 := in = 5  # A
# Pemilihan Referensi Arus Setelan
CC := (CCC*(CCC < (CT1*In1))) + ((CT1*In1)*((CT1*In1) < CCC))
CC = 3168  # A
# Setelan OCR
Isbs := 1.2*CC
Isbs = 3801.6  # A
# I Nominal Rele
In1 = 5  # A
# Setelan Tap Rele
Iset1 := Isbs*In1^-1/CT1
Iset1 = 0.9504  # A
Iset1 := 0.95  # x In
# Setelan Aktual
Iset1 := Iset1*CT1*In1
Iset1 = 3800  # A
# H.S di bus
Ihs3θB := Ihs3f
Ihs3θB = 21250  # A
Ihs2θB := 0.867*Ihs3θB
# Waktu kerja relay yang dikehendaki
t := 1  # detik
tms1 := ((Ihs2θB/Iset1)^0.02 - 1)*t/0.14
tms1 = 0.229118
# Cek waktu kerja relay
tms1 := 0.23
t1 := 0.14/((Ihs2θB/Iset1)^0.02 - 1)*tms1
t1 = 1.00385  # detik
# Setelan GFR
Isgbs := 0.2*CC
Isgbs = 633.6  # A
# H.S di bus
Ihs1θB := 16380  # A  # 1 phasa fault
# I Nominal Rele
In2 := in = 5  # A
# Setelan Tap Rele
Iset2 := Isgbs*In2^-1/CT1
Iset2 = 0.1584
Iset2 := 0.16
# Setelan Aktual
Iset2 := Iset2*CT1*In2
Iset2 = 640  # A
# Waktu kerja relay yang dikehendaki
t := 1  # detik
tms2 := ((Ihs1θB/Iset2)^0.02 - 1)*t/0.14
tms2 = 0.478541
# Cek waktu kerja relay
# dipilih
tms2 := 0.48
t2 := 0.14/((Ihs1θB/Iset2)^0.02 - 1)*tms2
t2 = 1.00305  # detik
