# PERHITUNGAN SETELAN RELAI JARAK
# LAUTAN STEEL (LSI) - NEW BALARAJA 1,2
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# LSI | NEW BALARAJA
# L1, L2, L3, L4; 9.45 KM; 2.6 OHM
# 500 MVA
# 13%
# 150kV
# 1. Data SUTT 150 kV
j := sqrt(-1)
Vn := 150000
k := 2*π/360
# 1.1 NBLRJA-LSTEL :  L1=L2 = L3 = L4
# Jenis penghantar | OHL-150kV-TACSR 2X410/67mm2(2730A) | DATA KONTRUKSI
R11b := 0.038
X11b := 0.279  # Ω
# /km
L11b := 9.45  # km
# OHL NIHIL
R11a := 0
X11a := 0  # Ω
# /km
L11a := 0  # km
L1 := L11a + L11b = 9.45  # km
# Imp. urutan positif
RL11 := (R11a*L11a) + (R11b*L11b)
RL11 = 0.3591  # Ω
RL111 := RL11/L1
RL111 = 0.038
XL11 := (X11a*L11a) + (X11b*L11b)
XL11 = 2.63655  # Ω
XL111 := XL11/L1
XL111 = 0.279
ZL11 := (R11a + j*X11a)*L11a + (R11b + j*X11b)*L11b
ZL11 = 0.3591 + 2.63655i  # Ω
|ZL11| = 2.66089  # Ω
θph11 := arg(ZL11)*k^-1
θph11 = 82.244  # deg
θph1 := θph11
XL11 := ZL11*sin(θph11*k)
|XL11| = 2.63655
# Imp. urutan nol
R10a := 0.15 + R11a = 0.15
X10a := 3*X11a = 0  # Ω
R10b := 0.15 + R11b = 0.188
X10b := 3*X11b = 0.837  # Ω
RL10 := (R10a*L11a) + (R10b*L11b)
RL10 = 1.7766  # Ω
XL10 := (X10a*L11a) + (X10b*L11b)
XL10 = 7.90965  # Ω
ZL10 := (R10a + j*X10a)*L11a + (R10b + j*X10b)*L11b
ZL10 = 1.7766 + 7.90965i  # Ω
|ZL10| = 8.10672  # Ω
θph10 := arg(ZL10)*k^-1
θph10 = 77.3408  # deg
XL10 := ZL10*sin(θph10*k)
|XL10| = 7.90965
# 1.2 NBLRJA-LSTEL :  L1=L2 = L3 = L4
Vn := 150000
# Jenis penghantar | OHL-150kV-TACSR 2X410/67mm2(2730A)
R21a := 0.038
X21a := 0.279  # Ω
# /km
L21a := 9.45  # km
# OHL NIHIL
R21b := 0
X21b := 0  # Ω
# /km
L21b := 0  # km
L2 := L21a + L21b = 9.45  # km
# Imp. urutan positif
RL21 := (R21a*L21a) + (R21b*L21b)
RL21 = 0.3591  # Ω
RL211 := RL21/L2
RL211 = 0.038
XL21 := (X21a*L21a) + (X21b*L21b)
XL21 = 2.63655  # Ω
XL211 := XL21/L2
XL211 = 0.279
ZL21 := (R21a + j*X21a)*L21a + (R21b + j*X21b)*L21b
ZL21 = 0.3591 + 2.63655i  # Ω
|ZL21| = 2.66089  # Ω
θph21 := arg(ZL11)*k^-1
θph21 = 82.244  # deg
θph2 := θph21
XL21 := ZL21*sin(θph11*k)
|XL21| = 2.63655
# Imp. urutan nol
X20 := 3*XL211
R20 := 0.15 + RL211
X20 = 0.837
R20 = 0.188
RL20 := R20*L2
XL20 := X20*L2  # Ω
ZL20 := (RL20 + j*XL20)
ZL20 = 1.7766 + 7.90965i  # Ω
|ZL20| = 8.10672  # Ω
θph20 := arg(ZL20)*k^-1
θph20 = 77.3408  # deg
# 1.3 NBLRJA-LSTEL :  L1=L2 = L3 = L4
# Jenis penghantar | OHL-150kV-TACSR 2X410/67mm2(2730A)
R31a := 0.038
X31a := 0.279  # Ω
# /km
L31a := 9.45  # km
# OHL NIHIL
R31b := 0
X31b := 0  # Ω
# /km
L31b := 0  # km
L3 := L31a + L31b = 9.45  # km
# Imp. urutan positif
RL31 := (R31a*L31a) + (R31b*L31b)
RL31 = 0.3591  # Ω
RL311 := RL21/L3
RL311 = 0.038
XL31 := (X31a*L31a) + (X31b*L31b)
XL31 = 2.63655  # Ω
XL311 := XL31/L3
XL311 = 0.279
ZL31 := (R31a + j*X31a)*L31a + (R31b + j*X31b)*L31b
ZL31 = 0.3591 + 2.63655i  # Ω
|ZL31| = 2.66089  # Ω
θph31 := arg(ZL11)*k^-1
θph31 = 82.244  # deg
θph3 := θph31
XL31 := ZL31*sin(θph31*k)
|XL31| = 2.63655
# Imp. urutan nol
X30 := 3*XL311
R30 := 0.15 + RL311
X30 = 0.837
R30 = 0.188
RL30 := R30*L3
XL30 := X30*L3  # Ω
ZL30 := (RL30 + j*XL30)
ZL30 = 1.7766 + 7.90965i  # Ω
|ZL30| = 8.10672  # Ω
θph30 := arg(ZL30)*k^-1
θph30 = 77.3408  # deg
# 1.4 NBLRJA-LSTEL :  L1=L2 = L3 = L4
# Jenis penghantar
# OHL-150kV-TACSR 2X410/67mm2(2730A)
L4 := 9.45  # km
# Berdasarkan data ABB
R41 := 0.038
X41 := 0.279  # Ω
# /km
CCC4 := 1620
Vn := 150000
# Imp. urutan positif
RL41 := R41*L4
XL41 := X41*L4  # Ω
ZL41 := (RL41 + j*XL41)
ZL41 = 0.3591 + 2.63655i  # Ω
|ZL41| = 2.66089  # Ω
θph41 := arg(ZL41)*k^-1
θph41 = 82.244  # deg
# Imp. urutan nol
R40 := 0.15 + R41
X40 := 3*X41
R40 = 0.188
X40 = 0.837
RL40 := R40*L4
XL40 := X40*L4  # Ω
ZL40 := (RL40 + j*XL40)
ZL40 = 1.7766 + 7.90965i  # Ω
|ZL40| = 8.10672
θph40 := arg(ZL40)*k^-1
θph40 = 77.3408  # deg
# 1.5 Impedansi Trafo
# 1.5.1 GI MILLENIUM
# IBT 500/150kV 500MVA 13%
XT1a := 0.13*150^2/500 = 5.85  # Ω
# Trafo2 150/20kV 60MVA 12.5%
XT1b := 0.125*150^2/60 = 46.875  # Ω
XT1 :=
    XT1a if XT1b ≥ XT1a
    XT1b if XT1a > XT1b
L1 = 9.45
|ZL11| = 2.66089
L2 = 9.45
|ZL21| = 2.66089
L3 = 9.45
|ZL31| = 2.66089
L4 = 9.45
|ZL41| = 2.66089
XT1 = 5.85  # Ω
# 2. PERHITUNGAN SETELAN RELE JARAK
# 2.1  LINE 150 kV LSI - MILLENIUM
# Distance relay ABB REL670 v1.1
ZL11 = 0.3591 + 2.63655i
# 2.1.1 Ratio CT & PT
CT1 := 2000/1  # A
PT1 := 150000/100  # Volt
IBase := 2000
UBase := 150
n1 := CT1/PT1
n1 = 1.33333
KN := (ZL10 - ZL11)/(3*ZL11)
|KN| = 0.684019
# 3.1.2 Jangkauan Impedansi
In := 1  # A
# ZONE-1 Phase
Z1P := 0.8*ZL11
Z1P = 0.28728 + 2.10924i
|Z1P| = 2.12871  # Ω  # (Primer)
Z1S := Z1P*n1
Z1S = 0.38304 + 2.81232i
|Z1S| = 2.83829  # Ω  # (Sekunder)
Z10P := 0.8*ZL10
Z10P = 1.42128 + 6.32772i
|Z10P| = 6.48537  # Ω  # (Primer)
Z10S := Z10P*n1
Z10S = 1.89504 + 8.43696i
|Z10S| = 8.64717  # Ω  # (Sekunder)
# Activation of zone 1 operation (ZM1)
# OperationDir = Forward
# Operation PP = On
# Operation PE = On
# Setting of zone 1 phase fault reach :
X1Z1P := |Z1P|*sin(θph11*k)
X1Z1P = 2.10924  # Ω  # (Primer)
X1Z1S := X1Z1P*n1
X1Z1S = 2.81232  # Ω  # (Sekunder)
R1Z1P := |Z1P|*cos(θph11*k)
R1Z1P = 0.28728  # Ω  # (Primer)
R1Z1S := R1Z1P*n1
R1Z1S = 0.38304  # Ω  # (Sekunder)
R1ZM01 := R1Z1P
R1ZM01 = 0.28728
# Setting of zone earth fault zero sequence values :
X0Z1P := |Z10P|*sin(θph10*k)
X0Z1P = 6.32772  # Ω  # (Primer)
X0Z1S := X0Z1P*n1
X0Z1S = 8.43696  # Ω  # (Sekunder)
R0Z1P := |Z10P|*cos(θph10*k)
R0Z1P = 1.42128  # Ω  # (Primer)
R0Z1S := R0Z1P*n1
R0Z1S = 1.89504  # Ω  # (Sekunder)
R0ZM01 := R0Z1P
R0ZM01 = 1.42128
# Setting Zone-1 terhadap Z line adalah
Z1% := Z1P/ZL11*100  # %
Z1% = 80  # %
# Setting of the fault resistive cover :
# Batasan setting RFPP
RFPPZ1Pmax ≤ 3*X1Z1P  # Ω/loop
RFPPZ1Pmax := 3*X1Z1P
RFPPZ1Pmax = 6.32772  # Ω/loop
RFPPZ1P := 0.7*3*X1Z1P
RFPPZ1P = 4.4294  # Ω/loop
RFPPZ1S := RFPPZ1P*n1
RFPPZ1S = 5.90587  # Ω/loop
# Perhitungan RFPE ada dibagian bawah karena mengacu dari besaran RldFw
# Load impedance limitation, with load encroachment function activated
# Setting of minimum operating currents
IMinOpPP := 15  # %  # Ibase
IMinOpPE := 15  # %  # Ibase
IMinOpIN := 10  # %  # Ibase
# ZONE-2 Phase
# Infeed
K := 1
Z2min := 1.2*ZL11
|Z2min| = 3.19307  # Ω  # (Primer)
Z2mak1 := (ZL11 + (0.8*ZL21)*K)*0.8
|Z2mak1| = 3.83169  # Ω  # (Primer)
Z2mak2 := (ZL11 + 0.8*ZL21)*0.8
|Z2mak2| = 3.83169  # Ω  # (Primer)
ZTrf := 0.8*(ZL11 + 0.5*XT1*j)  # arah trafo di GI Pati
|ZTrf| = 4.4585  # Ω  # (Primer)
# Dipilih Zone 2 terbesar tetapi tidak lebih besar dari zone 2 trafo
Z21mak := Z2mak1*(|Z2mak1| > |Z2min|) + Z2min*(|Z2min| > |Z2mak1|)
Z2P := Z21mak*(|Z21mak| < |ZTrf|) + ZTrf*(|ZTrf| < |Z21mak|)
Z2P = 0.517104 + 3.79663i
|Z2P| = 3.83169  # Ω  # (Primer)
Z2S := Z2P*n1
Z2S = 0.689472 + 5.06218i
|Z2S| = 5.10891  # Ω  # (Sekunder)
θphZ2P := arg(Z2P)*k^-1
θphZ2P = 82.244  # deg
# ZONE-2 Earth
Z20min := 1.2*ZL10
|Z20min| = 9.72806  # Ω  # (Primer)
Z20mak1 := (ZL10 + (0.8*ZL20)*K)*0.8
|Z20mak1| = 11.6737  # Ω  # (Primer)
Z20mak2 := (ZL10 + 0.8*ZL20)*0.8
|Z20mak2| = 11.6737  # Ω  # (Primer)
Z20Trf := 0.8*(ZL10 + 0.5*XT1*j)
# arah trafo di GI Kmjng
|Z20Trf| = 8.78347  # Ω  # (Primer)
# Dipilih Zone 2 terbesar tetapi tidak lebih besar dari zone 2 trafo
Z210mak := Z20mak1*(|Z20mak1| > |Z20min|) + Z20min*(|Z20min| > |Z20mak1|)
Z20P := Z210mak*(|Z210mak| < |Z20Trf|) + Z20Trf*(|Z20Trf| < |Z210mak|)
Z20P = 1.42128 + 8.66772i
|Z20P| = 8.78347  # Ω  # (Primer)
Z20S := Z20P*n1
Z20S = 1.89504 + 11.557i
|Z20S| = 11.7113  # Ω  # (Sekunder)
θphZ20P := arg(Z20P)*k^-1
θphZ20P = 80.6879  # deg
# Activation of zone 2 operation (ZM2)
# OperationDir = Forward
# Operation PP = On
# Operation PE = On
# Setting of zone 2 phase fault reach :
X1Z2P := |Z2P|*sin(θphZ2P*k)
X1Z2P = 3.79663  # Ω  # (Primer)
X1Z2S := X1Z2P*n1
X1Z2S = 5.06218  # Ω  # (Sekunder)
R1Z2P := |Z2P|*cos(θphZ2P*k)
R1Z2P = 0.517104  # Ω  # (Primer)
R1Z2S := R1Z2P*n1
R1Z2S = 0.689472  # Ω  # (Sekunder)
X1ZM02 := X1Z2P
X1ZM02 = 3.79663
Z1ZM02 := X1ZM02/sin(θph1*k) = 3.83169
# Setting of zone earth fault zero sequence values :
X0Z2P := |Z20P|*sin(θphZ20P*k)
X0Z2P = 8.66772  # Ω  # (Primer)
X0Z2S := X0Z2P*n1
X0Z2S = 11.557  # Ω  # (Sekunder)
R0Z2P := |Z20P|*cos(θphZ20P*k)
R0Z2P = 1.42128  # Ω  # (Primer)
R0Z2S := R0Z2P*n1
R0Z2S = 1.89504  # Ω  # (Sekunder)
R0ZM02 := R0Z2P
R0ZM02 = 1.42128
# Setting Zone-2 terhadap Z line adalah
Z2% := |Z2P|/|ZL11|*100  # %
Z2% = 144  # %
# Setting of the fault resistive cover :
# Batasan setting RFPP
RFPPZ2Pmax ≤ 3*X1Z2P  # Ω/loop
RFPPZ2Pmax := 3*X1Z2P
RFPPZ2Pmax = 11.3899  # Ω/loop
RFPPZ2P := 0.7*3*X1Z2P
RFPPZ2P = 7.97293  # Ω/loop
RFPPZ2S := RFPPZ2P*n1
RFPPZ2S = 10.6306  # Ω/loop
# Perhitungan RFPE ada dibagian bawah karena mengacu dari besaran RldFw
# Load impedance limitation, with load encroachment function activated
# Setting of minimum operating currents
|ZL11| = 2.66089
IMinOpPP := 15  # %  # Ibase
|ZL21| = 2.66089
IMinOpPE := 15  # %  # Ibase
# ZONE-3 Forward Phase
# Infeed
K := 1
Z3min := 1.2*(ZL11 + K*ZL31)
|Z3min| = 6.38614  # Ω  # (Primer)
Z3mak1 := 0.8*(ZL11 + (1.2*ZL31)*K)
|Z3mak1| = 4.68317  # Ω  # (Primer)
Z3mak2 := 0.8*(ZL11 + (0.8*(ZL21 + 0.8*ZL41)*K))
|Z3mak2| = 5.19406  # Ω  # (Primer)
Z3mak3 := 0.8*(ZL11 + 0.8*(ZL31 + 0.8*ZL41))
|Z3mak3| = 5.19406  # Ω  # (Primer)
Z3Trf := 0.8*(ZL11 + 0.8*XT1*j)
# arah trafo di GI Millenium
|Z3Trf| = 5.86029
Z31 := Z3mak1*(|Z3mak1| > |Z3min|) + Z3min*(|Z3min| > |Z3mak1|)
Z32 := Z3mak2*(|Z3mak2| > |Z31|) + Z31*(|Z31| > |Z3mak2|)
Z3P := Z3Trf*(|Z32| > |Z3Trf|) + Z32*(|Z3Trf| > |Z32|)
|Z3P| = 5.86029  # Ω  # (Primer)
θphZ3P := arg(Z3P)*k^-1
Z3P = 0.28728 + 5.85324i  # Ω  # (Primer)
θphZ3P = 87.1901  # deg
Z3S := Z3P*n1
|Z3S| = 7.81371  # Ω  # (Sekunder)
Z3S = 0.38304 + 7.80432i  # Ω  # (Sekunder)
# Setting of zone 3 phase fault reach :
X1Z3P := |Z3P|*sin(θphZ3P*k)
X1Z3P = 5.85324  # Ω  # (Primer)
X1Z3S := X1Z3P*n1
X1Z3S = 7.80432  # Ω  # (Sekunder)
R1Z3P := |Z3P|*cos(θphZ3P*k)
R1Z3P = 0.28728  # Ω  # (Primer)
R1Z3S := R1Z3P*n1
R1Z3S = 0.38304  # Ω  # (Sekunder)
X1ZM03 := X1Z3P
X1ZM03 = 5.85324
Z1ZM03 := X1ZM03/sin(θph1*k) = 5.90728
R1ZM03 := R1Z3P
R1ZM03 = 0.28728
# ZONE-3 Forward EARTH fault
Z30min := 1.2*(ZL10 + K*ZL30)
|Z30min| = 19.4561  # Ω  # (Primer)
Z30mak1 := 0.8*(ZL10 + (1.2*ZL30)*K)
|Z30mak1| = 14.2678  # Ω  # (Primer)
Z30mak2 := 0.8*(ZL10 + (0.8*(ZL20 + 0.8*ZL40)*K))
|Z30mak2| = 15.8243  # Ω  # (Primer)
Z30mak3 := 0.8*(ZL10 + 0.8*(ZL30 + 0.8*ZL40))
|Z30mak3| = 15.8243  # Ω  # (Primer)
Z30Trf := 0.8*(ZL10 + 0.8*XT1*j)  # arah trafo di GI Millenium
|Z30Trf| = 10.1715
Z301 := Z30mak1*(|Z30mak1| > |Z30min|) + Z30min*(|Z30min| > |Z30mak1|)
Z302 := Z301*(|Z301| > |Z30mak2|) + Z30mak2*(|Z30mak2| > |Z301|)
Z30P := Z30Trf*(|Z302| > |Z30Trf|) + Z302*(|Z30Trf| > |Z302|)
|Z30P| = 10.1715  # Ω  # (Primer)
Z30P = 1.42128 + 10.0717i  # Ω  # (Primer)
Z30S := Z30P*n1
|Z30S| = 13.562  # Ω  # (Sekunder)
Z30S = 1.89504 + 13.429i  # Ω  # (Sekunder)
θphZ30P := arg(Z30P)*k^-1
θphZ30P = 81.9677  # deg
# Setting of zone 3 EARTH fault reach :
X0Z3P := |Z30P|*sin(θphZ30P*k)
X0Z3P = 10.0717  # Ω  # (Primer)
X0Z3S := X0Z3P*n1
X0Z3S = 13.429  # Ω  # (Sekunder)
R0Z3P := |Z30P|*cos(θphZ30P*k)
R0Z3P = 1.42128  # Ω  # (Primer)
R0Z3S := R0Z3P*n1
R0Z3S = 1.89504  # Ω  # (Sekunder)
X0ZM03 := X0Z3P
X0ZM03 = 10.0717
Z0ZM03 := X0ZM03/sin(θph10*k) = 10.3227
R0ZM03 := R0Z3P
R0ZM03 = 1.42128
# Setting Zone-3 terhadap Z line adalah
Z3% := |Z3P|/|ZL11|*100  # %
Z3% = 220.238  # %
# Setting of the fault resistive cover :
# Batasan setting RFPP
RFPPZ3Pmax ≤ 3*X1Z3P  # Ω/loop
RFPPZ3Pmax := 3*X1Z3P
RFPPZ3Pmax = 17.5597  # Ω/loop
RFPPZ3P := 0.7*3*X1Z3P
RFPPZ3P = 12.2918  # Ω/loop
RFPPZ3S := RFPPZ3P*n1
RFPPZ3S = 16.3891  # Ω/loop
# Perhitungan RFPE ada dibagian bawah karena mengacu dari besaran RldFw
# Timer Zone 2,3
# A. Timer Zone 2
|ZL11| = 2.66089
q := |Z2P - ZL11|
q = 1.17079
X1sg := 0.8*XL21
|X1sg| = 2.10924  # Ω  # (Primer)
# Lihat apakah Z2bs - (ZL11) < dari Z1sg, maka T2bs = 0.4 detik  jika tidak T2bs=0.8 detik
T2a := 0.4
T2b := 0.8
T2 := T2a*((|Z2P| - |XL11|) < |X1sg|) + T2b*((|Z2P| - |XL11|) > |X1sg|)
T2 = 0.4
# B. Timer Zone 3
# Setting waktu tunda untuk Zone-3 ditentukan 1.6 detik
T3 := 1.6  # detik
# Load impedance limitation, with load encroachment function activated
# Setting of minimum operating currents
IMinOpPP := 15  # %  # Ibase
IMinOpPE := 15  # %  # Ibase
# Setting of phase selection with load encroachment (PPHS)
# Set mengcover melebihi zone 2 mendekati zone 3, untuk mendapatkan jangkauan phase selection yang luas.
Z2% = 144
Z3% = 220.238
# Berdasarkan manual, X1Phs disetting lebih dari 1.44 XL11 agar menjangkau zone 2 namun hanya sampai mendekati zone 3. Phase selection digunakan untuk kebutuhan single pole autoreclose. Jadi atur nilai 1.44 (safety margin) agar dapat memenuhi persyaratan itu.
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|X1Z2P| = 3.79663
|X0Z2P| = 8.66772
|X1Z3P| = 5.85324
|X0Z3P| = 10.0717
X1phsP := 0.95*|X1Z3P|
X1phsP = 5.56058  # Ω (primer)
X0phsP := 0.95*|X0Z3P|
X0phsP = 9.56813  # Ω (primer)
# Set the angle of the load limitation line
ARGLd := acos(0.8)*k^-1
ARGLd = 36.8699  # deg
# Nominal operation voltage
U := 150000  # V
# Load current
CCC := 2730  # A
# Set the load limitation reach in forward direction:
Umin := 0.95*U
Umin = 142500  # volt
Pexpmax := Umin*CCC*cos(ARGLd*k)
Pexpmax = 311220000  # watt
RLdFw := 0.5*Umin^2/Pexpmax
RLdFw = 32.6236  # Ω/phase
# Set the load limitation in the reverse (import) direction
RLdRv := RLdFw
RLdRv = 32.6236  # Ω/phase
# Setting RFPE digrading dari Rload
RFPEZ3Pphase := 0.7*RLdFw
RFPEZ3Pphase = 22.8365  # Ω/phase
RFPEZ3P := 0.9*RLdFw
RFPEZ3P = 29.3613  # Ω/loop
RFPEZ2P := 0.7*RFPEZ3P
RFPEZ2P = 20.5529  # Ω/loop
RFPEZ1P := 0.7*RFPEZ2P
RFPEZ1P = 14.387  # Ω/loop
# Fault resistance reach
RFFwPE := 1.2*RFPEZ2P
RFFwPE = 24.6635  # Ω/loop
RFRvPE := RFFwPE
RFRvPE = 24.6635  # Ω/loop
RFFwPP := 1.1*RFPPZ2P
RFFwPP = 8.77022  # Ω/loop
RFRvPP := RFFwPP
RFRvPP = 8.77022  # Ω/loop
# TEF
# Operation  = off
Is1 := 20  # %  # In
t1 := 2  # s
# Setting of the tripping logic (TRP01) | Setting of the tripping logic (TRP02)
# Operation  = On
# Program  = 1/3ph
# tTripMin  = 0.150s
# TripLockOut  = Off
# AutoLock  = Off
# Operation  = On
# Program  = 1/3ph
# tTripMin  = 0.150s
# TripLockOut  = Off
# AutoLock  = Off
# Setting of the Switch On to Fault (SOTF) function
# Operation  = On
# Ibase  = 3000A
# Ubase  = 150kV
# Mode  = Impedance
# AutoInit  = Off
# IPh<  = 10% * Ibase
# UPh<  = 60% * Ubase
# Setting of the local accelaration logic (ZCLC)
# Extension  = Off
# LossOf Load  = Off
# Scheme communication logic for distance protection (ZCOM):
# Set the current reversal and WEI functions:
# Operation = On | Operation = Off
# Scheme type = Permissive Overreach
# tCoord = 0 s
# tSendmin = 0.1 s
# Unblock = off
# tSecurity = 0.035 s
# Setting of Fuse Failure supervision function based on U0-I0, U2-I2, and dU-dI (FSD)
# Operation  = On
# OpMode  = UZsIZs
# Ubase  = 150kV
# Ibase  = 3000A
# 3U0>  = 20% * Ubase
# 3I0<  = 10% * Ibase
# 3U2>  = 20% * Ubase
# 3I2<  = 10% * Ibase
# Operation DUDI  = On
# DU>  = 20% * Ubase
# IPH>  = 10% * Ibase
# UPH>  = 70% * Ubase
# DI<  = 10% * Ibase
# SEALIN  = On
# USealln<  = 60% * Ubase
# UDLD<  = 60% * Ubase
# IDLD<  = 20% * Ibase
# FAULT LOCATOR
MVAbase := 100
kVbase := 150
Zbase := kVbase^2/MVAbase
Zbase = 225  # ohm
R1Apu := 0.001167
R1A := R1Apu*Zbase
R1A = 0.262575  # ohm
# A : source imp at local s/s
# B : source imp at remote s/s
X1Apu := 0.013966
X1A := X1Apu*Zbase
X1A = 3.14235  # ohm
R1Bpu := 0.002258
R1B := R1Bpu*Zbase
R1B = 0.50805  # ohm  # DIGSILENT
X1Bpu := 0.018428
X1B := X1Bpu*Zbase
X1B = 4.1463  # ohm
ZL11 = 0.3591 + 2.63655i
ZL11S := ZL11
ZL11S = 0.3591 + 2.63655i
|ZL11S| = 2.66089  # Ω Primer
R1L := |ZL11S|*cos(θph11*k)
R1L = 0.3591
X1L := |ZL11S|*sin(θph11*k)
X1L = 2.63655
ZL10 = 1.7766 + 7.90965i
ZL10S := ZL10
ZL10S = 1.7766 + 7.90965i
|ZL10S| = 8.10672  # Ω Primer
R0L := |ZL10S|*cos(θph10*k)
R0L = 1.7766
X0L := |ZL10S|*sin(θph10*k)
X0L = 7.90965
LineLength := L1
LineLength = 9.45
# POWER SWING DETECTION
X1InFw := 1.1*X1ZM03
X1InFw = 6.43856
R1LIn := 0.1*RFPPZ3Pmax
R1LIn = 1.75597
X1ZM03 = 5.85324
R1FInFw := 1.1*RFPPZ3Pmax
R1FInFw = 19.3157
X1InRv := 0.8*X1ZM03
X1InRv = 4.68259
R1ZM03 = 0.28728
R1FInRv := 1.1*RFPPZ3Pmax
R1FInRv = 19.3157
RLdInFw := RFPPZ3Pmax
RLdInFw = 17.5597
ArgLd := 36.87
RLdOutFw := 1.1*RLdInFw
RLdOutFw = 19.3157
RLdOutRv := RLdOutFw
RLdOutRv = 19.3157
# Initial PSD timer tP1
tP1 := 0.045  # s
# Fast PSD timer tP2
tP2 := 0.015  # s
# Hold timer for initof Fast PSD timer
tW := 0.250  # s
# Hold timer for PSD detected
tH := 0.500  # s
# timer overriding 1-ph Reclosing
tEF := 2.000  # s
# timer to delay block by the IN current
tR1 := 0.300  # s
# timer Blocking output at slow swings
tR2 := 0.300  # s
# Setting of synchrocheck function (SYN1)
# Operation = On
Δθ := 15  # deg
t := 0.5  # sec
Δf := 1/t*Δθ/180
Δf = 0.166667  # Hz
# Setting of Breaker Failure Function (BFP1) | DISABLED
# Operation  = On
# RetripMode  = I> Check
# BUTripMode  = 1 out of 3
# FunctionMode  = Current
# Ibase  = 1600A
# IP>  = 20% * Ibase
# IN>  = 20% * Ibase
# t1  = 0.15s
# t2  = 0.25s
# t2MPh  = 0.25s
# t3  = 0.03s
# tPulse  = 0.20s
# I>BlkCont  = 20%* Ibase
# tCBAlarm  = 5.00s
# Setting of single and/or three phase auto recloser device (AR1)
# !Note: Operasi AR1: Externalctrl: Activation/deactivation is made by external switch
# Operation  = ExternalCtrl
# Setting of the number of Auto reclose shots  NoOfShots  = 1
# Setting of the Autoreclose first shot types allowed  FirstShot  = SPAR
# Set if you want the AR to be started from CB Open instead
# of from start inputs  StartByCBOpen  = Off
# Select the type of contact used for the CB position input  CBAuxContType= NO
# Extended t1S and t1 at PLC failure activated of not  Extended t1  = On
# Set the 3Ph shot 1 timer extention when the PLC is not
# operative and connected to input PLCFAIL  tExtended t1  = 0.5s
# Shot 1, Single phase reclosure dead-time  t1 1Ph  = 1 s (SPAR)
# Shot 1, two phase reclosure dead time  t1 2Ph  = 1 s (not used because of SPAR)
# Shot 1, Three phase reclosure dead time  t1 3Ph  = 3 s (not used because of SPAR)
# Shot 1, Three phase reclosure dead time for high speed
# shot without Synchrocheck  t1 3PhHS  = 0.40s
# Shot 2, Three phase reclosure dead time  t2 3Ph  = 60.00s
# Shot 3, Three phase reclosure dead time  t3 3Ph  = 60.00s
# Shot 4, Three phase reclosure dead time  t4 3Ph  = 60.00s
# Shot 5, Three phase reclosure dead time  t5 3Ph  = 60.00s
# Select if you want the multi shot cycle to advance to next
# shot at a new fault if CB has been closed  Follow CB  = Off
# Maximum time for Synchro check condition to be fulfilled  tSync  = 3.00s
# Reclose pulse duration  tPulse  = 0.2s
# Setting of the operating mode  CutPulse  = Off
# Set the reclaim time  tReclaim  = 40.00s
# Set the inhibit reset time  tInhibit  = 5.00s
# Setting of the type of CB Ready condition  CBReadyType  = OCO
# Max duration of trip or start signal  tTrip  = 0.2s
# Setting of the Priority between AR terminals in multi
# breaker schemes  Priority  = None
# Setting of the maximum wait time for Master to be ready  tWaitMaster  = 15.00s
# Setting of the time CB shall be closed before a fault
# to get an AR attempt  tCBClosedMin  = 5.00s
#
# Setting of the operating mode for next AR attempt  AutoCont  = Off
# Blocking of the Auto reclose program at unsuccessful
# auto reclosing  BlockByUnsucCl  = Off
# Wait time after reclose attempt before proceeding to
# next shots  tAutoCondWait  = 4.00s
# Setting of the signal mode at Unsuccessful reclosing  UnsucCIBYCBChk  = No CB Check
# CB check time before unsuccessful alarm  tUnsucCl  = 20.00s
# DATA SETTING
# (Primary Value)
# Lokasi : GI 150 kV LSI
# Bay  : PHT 150 kV Millenium-1, 2
# Impedance Protection
# DistanceZones(PDIS,21)
# ZM01 | ZM02 | ZM03
# Operation  : On | Operation  : On | Operation  : On
IBase = 2000
IBase = 2000
IBase = 2000
UBase = 150
UBase = 150
UBase = 150
# OperationDir  : Forward | OperationDir  : Forward | OperationDir  : Forward
X1Z1P = 2.10924
X1Z2P = 3.79663
X1Z3P = 5.85324
R1Z1P = 0.28728
R1Z2P = 0.517104
R1Z3P = 0.28728
X0Z1P = 6.32772
X0Z2P = 8.66772
X0Z3P = 10.0717
R0Z1P = 1.42128
R0Z2P = 1.42128
R0Z3P = 1.42128
RFPPZ1P = 4.4294
RFPPZ2P = 7.97293
RFPPZ3P = 12.2918
RFPEZ1P = 14.387
RFPEZ2P = 20.5529
RFPEZ3P = 29.3613
# OperationPP  : On | OperationPP  : On | OperationPP  : On
# Timer tPP  : On | Timer tPP  : On | Timer tPP  : On
T1 := 0.0
T2 = 0.4
T3 = 1.6
IMinOpPP = 15  # %IB
IMinOpPP = 15  # %IB
IMinOpPP = 15  # %IB
IMinOpPE = 15  # %IB
IMinOpPE = 15  # %IB
IMinOpPE = 15  # %IB
IMinOpIN = 10  # %IB
IMinOpIN = 10  # %IB
IMinOpIN = 10  # %IB
# ZM04 | ZM05
# Operation  : Off | Operation  : Off
# PhaseSelection(PDIS,21)
# PHS1
IBase = 2000
UBase = 150
RLdFw = 32.6236  # Ω/phase
RLdRv = 32.6236  # Ω/phase
ARGLd = 36.8699  # deg
X1phsP = 5.56058  # Ω (primer)
X0phsP = 9.56813  # Ω (primer)
RFFwPP = 8.77022  # Ω/loop
RFRvPP = 8.77022  # Ω/loop
RFFwPE = 24.6635  # Ω/loop
RFRvPE = 24.6635  # Ω/loop
# DirectionalImpedance(RDIR)
# ZD01
ArgNegRes := 115
ArgDir := 15
IMinOp := 10  # %IB
IBase = 2000
UBase = 150
# AutomaticSOTF(PSOF)
# SFV1
# Operation  : On | Mode  : UILvl&Imp | UPh<  : 60  %IB | tDLD  : 0.150  s
IBase = 2000  # A  # AutoInit  : On  # tDuration  : 0.020  s
UBase = 150  # kV  # IPh<  : 10  %IB  # tSOTF  : 1.000  s
# PoleSlip(PPAM,78)
# PSP1
# Operation  : Off
# PowerSwingDetection(RPSB,78)
# PSD1
# Operation  : On | OperationLdCh  : On
X1InFw = 6.43856
RLdOutFw = 19.3157
R1LIn = 1.75597
ArgLd := 36
R1FInFw = 19.3157
RLdOutRv = 19.3157
X1InRv = 4.68259
R1FInRv = 19.3157
# ZCheme Communication (PSCH,85)
# ZCOM
# Operation  : On | tSendMin  :
# Scheme Type  : Permisive OR | Unblock  :
# tCootd  : | tSecurity  :
# EFCheme Communication (PSCH,85)
# EFC1
# Operation  : On | tSendMin  :
# Scheme Type  : Permisive OR | Unblock  :
# tCootd  : | tSecurity  :
# Control
# AutoRecloser (RREC, 79)
# AR01
# Operation  : On | t11Ph  : | 1 s | tInhibit  :
# NoOfShots  : 1 | t12Ph  : | tTrip  :
# ARMode  : | t13Ph  :
# StartByCBOpen  : Off | t13PhHS  :
# CBAuxContType  : NormOpen | tReclaim  :  40 sec
# CBReadyType  : CO | tSync  :
# Syncronising(RSYN, 25)
# SYN1
# Operation  : On | URatio  :
# SelPhaseBus1  : phase2 | OperationSynch  :
# SelPhaseBus2  : phase2 | UHighBusSynch  :
# SelPhaseLine1  : phase2 | UHighLineSynch  :
# SelPhaseLine2  : phase2 | UDiffSynch  :
# CBConfig  : | FreqDiffMin  :
# UBase  : | FreqDiffMin  :
# PhaseShift  : | tMaxSynch  :
# Monitoring
# FaultLocator(RFLO)
# FLO1
R1A = 0.262575
R1L = 0.3591
X1A = 3.14235
X1L = 2.63655
R1B = 0.50805
R0L = 1.7766
LineLength = 9.45
X1B = 4.1463
X0L = 7.90965
