# PERHITUNGAN SETELAN RELAI JARAK 150 KV
# GI TANGERANG LAMA - JATAKE #1,2
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# TANGERANG LAMA | JATAKE | CIKUPA
# L1; 10.3 KM;  2.91 OHM | L3; 7.2 KM;  2.04 OHM | PASAR KEMIS
# L4; 5.7 KM; 1.61 OHM
# 60 MVA
# 12.5%
# 150kV
# MAXIMANGANDO
# L2; 1.1 KM; 0.17 OHM
j := sqrt(-1)
a := -0.5 + 0.5*j*sqrt(3)
k := 2*π/360
# 1. Data Impedansi
# 1.1  TANGERANG LAMA - JATAKE -1,2
# OHL-150kV-ZEBRA 2X484.5mm (1620A)
R11a := 0.0387  # Ω/km
X11a := 0.2807  # Ω/km
L11a := 10.3  # km
Iccc_a := 1620  # A
R11b := 0  # Ω/km
X11b := 0  # Ω/km
L11b := 0  # km
Iccc_b := 9999  # A
R11c := 0  # Ω/km
X11c := 0  # Ω/km
L11c := 0  # km
Iccc_c := 9999  # A
L11 := L11a + L11b + L11c
Iccc := min(Iccc_a, Iccc_b, Iccc_c)
L11 = 10.3  # km
Iccc = 1620  # A
L1 := L11
# b dan c dikosongkan karena ada hanya untuk mengakomodir apabila ada beda jenis penghantar
# pada satu ruas. kalau sama dikosongkan dan Iccc dibuat tinggi
# Imp. urutan nol
RL10a := (0.15 + R11a)*L11a
RL10a = 1.94361
XL10a := (3*X11a)*L11a
XL10a = 8.67363
RL10b := (0.15 + R11b)*L11b
RL10b = 0
XL10b := (3*X11b)*L11b
XL10b = 0
RL10c := (0.15 + R11c)*L11c
RL10c = 0
XL10c := (3*X11c)*L11c
XL10c = 0
RL10 := RL10a + RL10b + RL10c
XL10 := XL10a + XL10b + XL10c
RL10 = 1.94361
XL10 = 8.67363
R10 := RL10/L11
X10 := XL10/L11
R10 = 0.1887  # Ω/km
X10 = 0.8421  # Ω/km
ZL10 := RL10 + XL10*j
ZL10 = 1.94361 + 8.67363i
# Imp. urutan positif
RL11a := R11a*L11a
RL11a = 0.39861
XL11a := X11a*L11a
XL11a = 2.89121
RL11b := R11b*L11b
RL11b = 0
XL11b := X11b*L11b
XL11b = 0
RL11c := R11c*L11c
RL11c = 0
XL11c := X11c*L11c
XL11c = 0
RL11 := RL11a + RL11b + RL11c
XL11 := XL11a + XL11b + XL11c
RL11 = 0.39861
XL11 = 2.89121
R11 := RL11/L11
X11 := XL11/L11
R11 = 0.0387  # Ω/km
X11 = 0.2807  # Ω/km
ZL11 := RL11 + XL11*j
ZL11_verify := (R11a + j*X11a)*L11a + (R11b + j*X11b)*L11b + (R11c + j*X11c)*L11c
ZL11_verify = 0.39861 + 2.89121i
ZL11 = 0.39861 + 2.89121i
|ZL11| = 2.91856
ZL1 := ZL11
θph1 := arg(ZL11)*k^-1
θph1 = 82.1501  # deg
# Imp. mutual
ZM10 := 0.0493 + j*0.2962
|ZM10| = 0.300275  # Ω/km
ZLM10 := ZM10*L11
|ZLM10| = 3.09283  # Ω
θM10 := arg(ZM10)*k^-1
θM10 = 80.5502  # deg
# 1.2 JATAKE - MAXIMANGANDO -1,2
# CAB-150kV-CU 240mm (550A)
R21a := 0.087  # Ω/km
X21a := 0.132  # Ω/km
L21a := 1.1  # km
R21b := 0  # Ω/km
X21b := 0  # Ω/km
L21b := 0  # km
R21c := 0  # Ω/km
X21c := 0  # Ω/km
L21c := 0  # km
L21 := L21a + L21b + L21c
L21 = 1.1  # km
L2 := L21
# Imp. urutan nol
RL20a := (0.15 + R21a)*L21a
RL20a = 0.2607
XL20a := (3*X21a)*L21a
XL20a = 0.4356
RL20b := (0.15 + R21b)*L21b
RL20b = 0
XL20b := (3*X21b)*L21b
XL20b = 0
RL20c := (0.15 + R21c)*L21c
RL20c = 0
XL20c := (3*X21c)*L21c
XL20c = 0
RL20 := RL20a + RL20b + RL20c
XL20 := XL20a + XL20b + XL20c
RL20 = 0.2607
XL20 = 0.4356
R20 := RL20/L21
X20 := XL20/L21
R20 = 0.237  # Ω/km
X20 = 0.396  # Ω/km
ZL20 := RL20 + XL20*j
ZL20 = 0.2607 + 0.4356i
# Imp. urutan positif
RL21a := R21a*L21a
RL21a = 0.0957
XL21a := X21a*L21a
XL21a = 0.1452
RL21b := R21b*L21b
RL21b = 0
XL21b := X21b*L21b
XL21b = 0
RL21c := R21c*L21c
RL21c = 0
XL21c := X21c*L21c
XL21c = 0
RL21 := RL21a + RL21b + RL21c
XL21 := XL21a + XL21b + XL21c
RL21 = 0.0957
XL21 = 0.1452
R21 := RL21/L21
X21 := XL21/L21
R21 = 0.087  # Ω/km
X21 = 0.132  # Ω/km
ZL21 := RL21 + XL21*j
ZL21_verify := (R21a + j*X21a)*L21a + (R21b + j*X21b)*L21b + (R21c + j*X21c)*L21c
ZL21_verify = 0.0957 + 0.1452i
ZL21 = 0.0957 + 0.1452i
|ZL21| = 0.173901
ZL2 := ZL21
θph2 := arg(ZL21)*k^-1
θph2 = 56.6115  # deg
L2 = 1.1  # km
# 1.3 JATAKE - CIKUOPA -1,2
# OHL-150kV-DRAKE 2X468.5mm (1560A)
R31a := 0.0411  # Ω/km
X31a := 0.2812  # Ω/km
L31a := 7.2  # km
R31b := 0  # Ω/km
X31b := 0  # Ω/km
L31b := 0  # km
R31c := 0  # Ω/km
X31c := 0  # Ω/km
L31c := 0  # km
L31 := L31a + L31b + L31c
L31 = 7.2  # km
L3 := L31
# Imp. urutan nol
RL30a := (0.15 + R31a)*L31a
RL30a = 1.37592
XL30a := (3*X31a)*L31a
XL30a = 6.07392
RL30b := (0.15 + R31b)*L31b
RL30b = 0
XL30b := (3*X31b)*L31b
XL30b = 0
RL30c := (0.15 + R31c)*L31c
RL30c = 0
XL30c := (3*X31c)*L31c
XL30c = 0
RL30 := RL30a + RL30b + RL30c
XL30 := XL30a + XL30b + XL30c
RL30 = 1.37592
XL30 = 6.07392
R30 := RL30/L31
X30 := XL30/L31
R30 = 0.1911  # Ω/km
X30 = 0.8436  # Ω/km
ZL30 := RL30 + XL30*j
ZL30 = 1.37592 + 6.07392i
# Imp. urutan positif
RL31a := R31a*L31a
RL31a = 0.29592
XL31a := X31a*L31a
XL31a = 2.02464
RL31b := R31b*L31b
RL31b = 0
XL31b := X31b*L31b
XL31b = 0
RL31c := R31c*L31c
RL31c = 0
XL31c := X31c*L31c
XL31c = 0
RL31 := RL31a + RL31b + RL31c
XL31 := XL31a + XL31b + XL31c
RL31 = 0.29592
XL31 = 2.02464
R31 := RL31/L31
X31 := XL31/L31
R31 = 0.0411  # Ω/km
X31 = 0.2812  # Ω/km
ZL31 := RL31 + XL31*j
ZL31_verify := (R31a + j*X31a)*L31a + (R31b + j*X31b)*L31b + (R31c + j*X31c)*L31c
ZL31_verify = 0.29592 + 2.02464i
ZL31 = 0.29592 + 2.02464i
|ZL31| = 2.04615
ZL3 := ZL31
θph3 := arg(ZL31)*k^-1
θph3 = 81.6846  # deg
L3 = 7.2  # km
# 1.4 CIKUPA - PASAR KEMIS -1,2
# OHL-150kV-ZEBRA 2X484.5mm (1620A)
R41a := 0.0387  # Ω/km
X41a := 0.2807  # Ω/km
L41a := 5.7  # km
R41b := 0  # Ω/km
X41b := 0  # Ω/km
L41b := 0  # km
R41c := 0  # Ω/km
X41c := 0  # Ω/km
L41c := 0  # km
L41 := L41a + L41b + L41c
L41 = 5.7  # km
L4 := L41
# Imp. urutan nol
RL40a := (0.15 + R41a)*L41a
RL40a = 1.07559
XL40a := (3*X41a)*L41a
XL40a = 4.79997
RL40b := (0.15 + R41b)*L41b
RL40b = 0
XL40b := (3*X41b)*L41b
XL40b = 0
RL40c := (0.15 + R41c)*L41c
RL40c = 0
XL40c := (3*X41c)*L41c
XL40c = 0
RL40 := RL40a + RL40b + RL40c
XL40 := XL40a + XL40b + XL40c
RL40 = 1.07559
XL40 = 4.79997
R40 := RL40/L41
X40 := XL40/L41
R40 = 0.1887  # Ω/km
X40 = 0.8421  # Ω/km
ZL40 := RL40 + XL40*j
ZL40 = 1.07559 + 4.79997i
# Imp. urutan positif
RL41a := R41a*L41a
RL41a = 0.22059
XL41a := X41a*L41a
XL41a = 1.59999
RL41b := R41b*L41b
RL41b = 0
XL41b := X41b*L41b
XL41b = 0
RL41c := R41c*L41c
RL41c = 0
XL41c := X41c*L41c
XL41c = 0
RL41 := RL41a + RL41b + RL41c
XL41 := XL41a + XL41b + XL41c
RL41 = 0.22059
XL41 = 1.59999
R41 := RL41/L41
X41 := XL41/L41
R41 = 0.0387  # Ω/km
X41 = 0.2807  # Ω/km
ZL41 := RL41 + XL41*j
ZL41_verify := (R41a + j*X41a)*L41a + (R41b + j*X41b)*L41b + (R41c + j*X41c)*L41c
ZL41_verify = 0.22059 + 1.59999i
ZL41 = 0.22059 + 1.59999i
|ZL41| = 1.61512
ZL4 := ZL41
θph4 := arg(ZL41)*k^-1
θph4 = 82.1501  # deg
L4 = 5.7  # km
# 1.5 TRAFO di GI L2
MVA := 60
X_trafo := 12 %
XT1 := X_trafo*150^2/MVA
XT1 = 45  # Ω
XT1 = 45  # Ω
|ZL1| = 2.91856  # ohm
L1 = 10.3  # km
|ZL2| = 0.173901  # ohm
L2 = 1.1  # km
|ZL3| = 2.04615  # ohm
L3 = 7.2  # km
|ZL4| = 1.61512  # ohm
L4 = 5.7  # km
XT1 = 45  # ohm
# PERHITUNGAN SETELAN RELE JARAK ~ Distance Relay MiCom P443
# I. Distance relay MiCOM - P443
# 3.1.1 Ratio CT & PT
CT1 := 2000/5  # A
PT1 := 150000/100  # Volt
In := 5  # A
Vn := 100/sqrt(3)  # V
n1 := CT1/PT1 = 0.266667
|ZL1| = 2.91856  # Ω  # (Primer)
ZL1s := n1*|ZL1| = 0.778282  # Ω  # (Secondary)
# 3.1.2 Jangkauan induktif
# ZONE-1
Z1P := 0.8*ZL1
|Z1P| = 2.33485  # Ω  # (Primer)
Z1S := Z1P*n1
|Z1S| = 0.622626  # Ω  # (Sekunder)
# ZONE-2
Z2min := 1.2*ZL1
|Z2min| = 3.50227  # Ω  # (Primer)
Z2mak1 := 0.8*(ZL1 + 0.8*ZL2)
|Z2mak1| = 2.43574  # Ω  # (Primer)
ZTrf2 := 0.8*(ZL1 + 0.5*XT1*j)
|ZTrf2| = 20.3155  # Ω  # (Primer)
Z2b := ZL1 + 0.8*ZL2
|Z2b| = 3.04468  # Ω  # (Primer)
# Dipilih Zone 2 terbesar tetapi tidak lebih besar dari zone 2 trafo
Z21mak := Z2mak1*(|Z2mak1| > |Z2min|) + Z2min*(|Z2min| > |Z2mak1|)
Z22mak := Z21mak*(|Z21mak| < |ZTrf2|) + ZTrf2*(|ZTrf2| < |Z21mak|)
Z2P := Z22mak
Z2P = 0.478332 + 3.46945i
|Z2P| = 3.50227  # Ω  # (Primer)
Z2S := Z2P*n1
|Z2S| = 0.933939  # Ω  # (Sekunder)
# ZONE-3 Forward
# Infeed
K3 := 1
Z3min := 1.2*(ZL1 + ZL3)
|Z3min| = 5.9576  # Ω  # (Primer)
Z3mak1 := 0.8*(ZL1 + (1.2*ZL3)*K3)
|Z3mak1| = 4.29912  # Ω  # (Primer)
Z3mak2 := 0.8*(ZL1 + (K3*(0.8*(ZL3 + 0.8*ZL4))))
|Z3mak2| = 4.4713  # Ω  # (Primer)
ZTrf3 := 0.8*(ZL1 + 0.8*XT1*j)
|ZTrf3| = 31.1146  # Ω  # (Primer)
Z3b := (ZL1 + (K3*(0.8*(ZL3 + 0.8*ZL4))))
|Z3b| = 5.58912  # Ω  # (Primer)
Z31 := Z3mak1*(|Z3mak1| > |Z3mak2|) + Z3mak2*(|Z3mak2| > |Z3mak1|)
Z32 := Z31*(|Z31| > |Z3min|) + Z3min*(|Z3min| > |Z31|)
Z3P := ZTrf3*(|Z32| > |ZTrf3|) + Z32*(|ZTrf3| > |Z32|)
|Z3P| = 5.9576  # Ω  # (Primer)
Z3S := Z3P*n1
|Z3S| = 1.58869  # Ω  # (Sekunder)
# ZONE-3 Reverse
# Disetting 10 % dari impedansi Line yang diamankan (ZL11)
# Z3 Reverse
Z3R := 0.1*ZL1
Z3R = 0.039861 + 0.289121i
|Z3R| = 0.291856  # Ω  # (Primer)
Z3RS := |Z3R|*n1
Z3RS = 0.0778282  # Ω  # (Sekunder)
# 3.1.3.  Setelan Waktu
T1 := 0
T1 = 0  # detik
T2 := 0.4*(|Z2b| > |Z22mak|) + 0.8*(|Z22mak| > |Z2b|)
T2 = 0.8  # detik
T3 := 1.2*(|Z3b| > |Z32|) + 1.6*(|Z32| > |Z3b|)
T3 = 1.6  # detik
# Timer Zone 2
|ZL1| = 2.91856
|Z2P| = 3.50227
q := |Z2P| - |ZL1|
q = 0.583712
Z1sg := 0.8*ZL2
|Z1sg| = 0.139121  # Ω  # (Primer)
# Lihat apakah Z2bs - (ZL1) < dari Z1sg, maka T2bs = 0.4 detik  jika tidak T2bs=0.8 detik
T2a := 0.4
T2b := 0.8
T2 := T2a*(q < |Z1sg|) + T2b*(q > |Z1sg|)
T2 = 0.8  # detik
# 3.1.4. PROTECTION SETTING DISTANCE ELEMENT
# Line setting :
Lmin := 0.3  # km
L := L11
Lmax := 1000  # km
L = 10.3  # km
Lstep := 0.01  # km
ZL := |ZL1|*n1
ZLmin := 0.001/In  # Ω
ZL = 0.778282  # Ω  # sekunder
ZLmax := 500/In  # Ω
ZLstep := 0.001/In  # Ω
θL := θph1
θLmin := -90  # deg
θL = 82.1501  # deg
θLmax := 90  # deg
θLstep := 0.1  # deg
# Zone setting :
# Bit  : 7 6 5 4 3 2 1 0
# Bit 0 = Z1  enabled
# Bit 1 = Z2  enabled
# Bit 2 = Zp  enabled
# Bit 3 = Z3  enabled
# Bit 4 = Z4  enabled
# Zone status : 0 0 0 0 0 0 1 1
# Ground Fault Compensation setting :
kZ0 := (ZL10 - ZL11)/(3*ZL11)
|kZ0| = 0.683587
kZ0min := 0
kZN := |kZ0|
kZ0max := 7
kZN = 0.683587
kZ0step := 0.001
θkZ0min := 0  # deg
θkZ0 := arg(kZ0)*k^-1
θkZN := θkZ0
θkZ0max := 360  # deg
θkZN = -7.1095  # deg
θkZ0step := 0.1  # deg
# Zone 1
Z1 := |Z1S|
Z1 = 0.622626  # Ω  # sekunder
Zmin := 0.001/In  # Ω
tZ1 := T1
tZ1 = 0  # sec
Zmax := 500/In  # Ω
# Zone 2
Zstep := 0.001/In  # Ω
Z2 := |Z2S|
Z2 = 0.933939  # Ω  # sekunder
tZmin := 0  # sec
tZ2 := T2
tZ2 = 0.8  # sec
tZmax := 10  # sec
tZstep := 0.002  # sec
# Zone 3
Z3 := |Z3S|
Z3 = 1.58869  # Ω  # sekunder
tZ3 := T3
tZ3 = 1.6  # sec
# Resistive Reach calculation :
CT1 = 400
n1 = 0.266667
CTp := CT1*In = 2000
Iccc = 1620
Iloadmax := In = 5  # A
In = 5
CCC := Iccc = 1620
CC := CCC*(CCC < CTp) + CTp*(CTp < CCC)  # A
CC := Iccc
IloadMax := CC/CT1
IloadMax = 4.05
Zloadmin := Vn/IloadMax = 14.2556  # (ohm) dr sisi sekunder
# Rumus lain untuk perhitungan resistive reach berdasarkan primary value
# Tegangan phasa-phasa
Vpp := PT1*100  # Volt
# Impedansi Beban Maksimum
ZloadMax := Vpp/(sqrt(3)*CC)*n1
|ZloadMax| = 14.2556  # Ω  # Ω  # Ω  # sekunder  # sekunder  # sekunder
# Tipikal Resistive reach max : nilai "R gangguan fasa" akan mencegah impedansi beban min dengan margin lebih besar atau sama dengan 40 %. nilai "R gangguan tanah" dengan margin lebih besar atau sama dengan 20 %.
# Margin resistive reach max :
MRphmax := 0.4*Zloadmin
MRphmax = 5.70222  # Ω  # Ω  # Ω  # sekunder  # sekunder  # sekunder
MRgmax := 0.2*Zloadmin
MRgmax = 2.85111  # Ω  # sekunder
# Tipikal Resistive reach min (ph fault) : lebih besar dari fault resistance (dgn formula warrington)
# Resistive reach min (g fault) : 20 ohm primer (tipikal)
# Jarak konduktor fasa :
Lc := 3  # m
# Acuan Jarak Konduktor Fasa:
# 70 kV (1.5 meter)
# 150 kV (3.0 meter)
# 500 kV (8.0 meter)
# Arus gangguan fasa-fasa :
Ihs3f := 22643  # A
Ihs2f := sqrt(3)/2*Ihs3f
Ihs2f = 19609.4  # A
# Arc resistance :
Ra := (28710*Lc)/Ihs2f^1.4
Ra = 0.084276  # Ω
# Resistive reach max :
Rphmax := Zloadmin - MRphmax
Rphmax = 8.55334  # Ω  # sekunder
Rgmax := Zloadmin - MRgmax
Rgmax = 11.4044  # Ω  # sekunder
# Resistive reach min :
Rphmin := Ra*n1
Rphmin = 0.0224736  # Ω  # sekunder
Rgmin := 20*n1
Rgmin = 5.33333  # Ω  # sekunder
# Setting resistive reach : | lebih besar dari Rgmin dan lebih kecil dari Rgmax
Rphminr := 0  # Ω
R3ph := 0.9*Rphmax
R3ph = 7.698  # Ω  # sekunder
Rphmaxr := 400/In  # Ω
R3g := 0.5*Zloadmin
R3g = 7.12778  # Ω  # sekunder
# modif rumus karena nilai R3g melewati 50%Zload min
faktor_pengali1 := 1.001*sqrt(Rgmin/R3g) = 0.865877
faktor_pengali2 := 1.001*(Rgmin/R3g)^0.333 = 0.908847
Rphstep := 0.01/In  # Ω
R2ph := 0.9*R3ph
R2ph = 6.9282  # Ω  # sekunder
Rgminr := 0  # Ω
R2g := 0.8*R3g = 5.70222
R2g = 5.70222  # Ω  # sekunder
R1ph := 0.8*R2ph
R1ph = 5.54256  # Ω  # sekunder
Rgmaxr := 400/In  # Ω
R1g := 0.8*R2g
R1g = 4.56178  # Ω  # sekunder
Rgstep := 0.01/In  # Ω
Rgmin = 5.33333
Rphmin = 0.0224736
# DISTANCE SCHEME :
# Program mode : Standard scheme
# Standard mode : BASIC
# Fault type  : Both enabled | Phase to ground and Phase to phase fault
# Trip mode  : 1P Z1 Z2 & CR
# Bit  : 6 5 4 3 2 1 0
# TOR-SOTF Mode : 0 0 0 0 0 1 1
# Bit 0 = Z1  enabled
# Bit 1 = Z2  enabled
# Bit 2 = Zp  enabled
# Bit 3 = Z3  enabled
# Bit 4 = Z4  enabled
# SOTF Delay  : 30 sec.
# Weak Infeed  : Disabled
# Loss of Load  : Disabled
# Z BLINDER IMP:
CC = 1620  # A
Vp := PT1*100 = 150000  # V
k := 2*π/360
k = 0.0174533
n1 = 0.266667
# a. Load Impedance:
Zld_primer := Vp/sqrt(3)/CC
Zld_primer = 53.4584  # Ω (primary)
Zld := Zld_primer*n1 = 14.2556  # Ω (secondary)
# Power factor load angle:
θld := 30*k
cos(30*k) = 0.866025
# b. Blinder Impedance:
ZB := Zld*cos(30*k)*0.51
ZB = 6.2963  # Ω (secondary)
ZB_primer := ZB/n1 = 23.6111  # Ω (primary)
# POWER SWING :
ΔRmin := 0
ΔR := 0.3*R3ph
ΔR = 2.3094  # Ω
ΔX := 0.3*R3ph
ΔX = 2.3094  # Ω
ΔRmax := 400/In  # Ω
R5 := 0.85*ZB
Z5 := 2*|ZL|
R5 = 5.35185  # Ω
Z5 = 1.55656  # Ω
ΔRstep := 0.01/In  # Ω
# SUPERVISION
# AUTORECLOSE
# 1P Trip Mode  : 1 - 3
# 1P Dead Time 1  : 1  sec
# Reclaim Time  : 40  sec
# Pulse Time  : 0.2  sec
# SUSEPTANCE
# ARUS DIFF saat kondisi NORMAL
I_diff.normal := 42  # A
B_suseptance := I_diff.normal*sqrt(3)*10^6/150000
# Nilai SUSEPTANCE
B_suseptance = 484.974  # uS  # primary
B_suseptance/n1 = 1818.65  # uS  # secondary
# 2. Perhitungan Setting
# 2.1 Current Differential Setting
# a. basic current differential setting I_s1 :
# Tegangan Sistem
KV := PT1*100 = 150000
# Charging Current :
Bt_unit := 132*10^-6  # S/km
Bt := Bt_unit*L1 = 1359.6*10^-6  # S
Xc := 1/Bt
Xc = 735.51  # Ω
# Charging current :
Ic := KV/(sqrt(3)*Xc)
Ic = 117.745  # A primary
Ics := Ic/CT1
Ics = 0.294362  # A secondary
# Setting I_s1 minimum 2.5 x arus charging :
In = 5
Is_calculation := 2.5*Ics
Is_calculation = 0.735905  # A secondary
Is_standard := 0.2*In = 1  # A secondary
Is1 := Is_standard*(Is_calculation < Is_standard) + Is_calculation*(Is_calculation ≥ Is_standard)
# *nilai perhitungan terlalu kecil, dipilih 0.2 x In
# dipilih :
Is1 = 1  # A secondary
# b. percentage bias setting k_(1  :)
k1 := 30 %  # (recommended by manufacture)
# c. basic current differential setting I_s2 :
Is2 := 2*In  # (recommended by manufacture)
# dipilih :
Is2 = 10  # A secondary
# d. percentage bias setting k_2  _(:)
k2 := 150 %
# CT Correction
# Arus Primer CT di GI A
CT_A := 4000
# Arus Primer CT di GI B
CT_B := 3000
CT_corr_di_A := CT_A/min(CT_A, CT_B) = 1.33333
CT_corr_di_B := CT_B/min(CT_A, CT_B) = 1
