# PERHITUNGAN SETELAN RELAI JARAK
# SKTT 150 KV SMRCN-ALSUT
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# 1. Data SKTT 150 kV
j := sqrt(-1)
Vn := 150000
k := 2*π/360
# 1.1 SUMMARECON-ALSUT
# Jenis penghantar | 2x1000mm N2XCK2Y CU (1886 A)
R11b := 0.014
X11b := 0.089  # Ω
# /km
L11b := 6.8  # km
# OHL NIHIL
R11a := 0
X11a := 0  # Ω
# /km
L11a := 0  # km
L1 := L11a + L11b = 6.8  # km
# Imp. urutan positif
RL11 := (R11a*L11a) + (R11b*L11b)
RL11 = 0.0952  # Ω
RL111 := RL11/L1
RL111 = 0.014
XL11 := (X11a*L11a) + (X11b*L11b)
XL11 = 0.6052  # Ω
XL111 := XL11/L1
XL111 = 0.089
ZL11 := (R11a + j*X11a)*L11a + (R11b + j*X11b)*L11b
ZL11 = 0.0952 + 0.6052i  # Ω
|ZL11| = 0.612642  # Ω
θph11 := arg(ZL11)*k^-1
θph11 = 81.0604  # deg
θph1 := θph11
XL11 := ZL11*sin(θph11*k)
|XL11| = 0.6052
# Imp. urutan nol
R10a := 0 + R11a = 0
X10a := 3*X11a = 0  # Ω
R10b := 0.15 + R11b = 0.164
X10b := 3*X11b = 0.267  # Ω
RL10 := (R10a*L11a) + (R10b*L11b)
RL10 = 1.1152  # Ω
XL10 := (X10a*L11a) + (X10b*L11b)
XL10 = 1.8156  # Ω
ZL10 := (R10a + j*X10a)*L11a + (R10b + j*X10b)*L11b
ZL10 = 1.1152 + 1.8156i  # Ω
|ZL10| = 2.13075  # Ω
θph10 := arg(ZL10)*k^-1
θph10 = 58.4404  # deg
XL10 := ZL10*sin(θph10*k)
|XL10| = 1.8156
# Impedansi mutual LSI - MILLENIUM : (asumsi)
Rm1 := 0.228
Xm1 := 0.620
RmP1 := Rm1*L1
XmP1 := Xm1*L1
RmP1 = 1.5504
XmP1 = 4.216  # Ω
# 1.2 ALSUT-CILEDUG
# Jenis penghantar | 2x1000mm N2XCK2Y CU (1886 A)
R21a := 0.014
X21a := 0.089  # Ω  # /km
L21a := 3.25  # km
# OHL NIHIL
R21b := 0
X21b := 0  # Ω
# /km
L21b := 0  # km
L2 := L21a + L21b = 3.25  # km
# Imp. urutan positif
RL21 := (R21a*L21a) + (R21b*L21b)
RL21 = 0.0455  # Ω
RL211 := RL21/L2
RL211 = 0.014
XL21 := (X21a*L21a) + (X21b*L21b)
XL21 = 0.28925  # Ω
XL211 := XL21/L2
XL211 = 0.089
ZL21 := (R21a + j*X21a)*L21a + (R21b + j*X21b)*L21b
ZL21 = 0.0455 + 0.28925i  # Ω
|ZL21| = 0.292807  # Ω
θph21 := arg(ZL11)*k^-1
θph21 = 81.0604  # deg
θph2 := θph21
XL21 := ZL21*sin(θph11*k)
|XL21| = 0.28925
# Imp. urutan nol
X20 := 3*XL211
R20 := 0.15 + RL211
X20 = 0.267
R20 = 0.164
RL20 := R20*L2
XL20 := X20*L2  # Ω
ZL20 := (RL20 + j*XL20)
ZL20 = 0.533 + 0.86775i  # Ω
|ZL20| = 1.01837  # Ω
θph20 := arg(ZL20)*k^-1
θph20 = 58.4404  # deg
# 1.3 ALSUT-CIKUPA
# Jenis penghantar | 4x428.9mm ZEBRA (3000 A)
R31a := 0.01985
X31a := 0.2674  # Ω  # /km
L31a := 23.4  # km
# OHL NIHIL
R31b := 0
X31b := 0  # Ω
# /km
L31b := 0  # km
L3 := L31a + L31b = 23.4  # km
# Imp. urutan positif
RL31 := (R31a*L31a) + (R31b*L31b)
RL31 = 0.46449  # Ω
RL311 := RL21/L3
RL311 = 0.00194444
XL31 := (X31a*L31a) + (X31b*L31b)
XL31 = 6.25716  # Ω
XL311 := XL31/L3
XL311 = 0.2674
ZL31 := (R31a + j*X31a)*L31a + (R31b + j*X31b)*L31b
ZL31 = 0.46449 + 6.25716i  # Ω
|ZL31| = 6.27438  # Ω
θph31 := arg(ZL11)*k^-1
θph31 = 81.0604  # deg
θph3 := θph31
XL31 := ZL31*sin(θph31*k)
|XL31| = 6.19816
# Imp. urutan nol
X30 := 3*XL311
R30 := 0.15 + RL311
X30 = 0.8022
R30 = 0.151944
RL30 := R30*L3
XL30 := X30*L3  # Ω
ZL30 := (RL30 + j*XL30)
ZL30 = 3.5555 + 18.7715i  # Ω
|ZL30| = 19.1052  # Ω
θph30 := arg(ZL30)*k^-1
θph30 = 79.2747  # deg
# 1.4 CIKUPA-SUVARNA
# Jenis penghantar
# Zebra 4x428.9mm (3000 A)
L4 := 5.9  # km
# Berdasarkan data ABB
R41 := 0.01985
X41 := 0.2674  # Ω
# /km
CCC4 := 3000
R40 := 0.15 + R41
X40 := 3*X41  # Ω  # /km
R40 = 0.16985
X40 = 0.8022
# Imp. urutan positif
RL41 := R41*L4
XL41 := X41*L4  # Ω
ZL41 := (RL41 + j*XL41)
ZL41 = 0.117115 + 1.57766i  # Ω
|ZL41| = 1.582  # Ω
θph41 := arg(ZL41)*k^-1
θph41 = 85.7545  # deg
# Imp. urutan nol
RL40 := R40*L4
XL40 := X40*L4  # Ω
ZL40 := (RL40 + j*XL40)
ZL40 = 1.00212 + 4.73298i  # Ω
|ZL40| = 4.83791
θph40 := arg(ZL40)*k^-1  # Ω
θph40 = 78.0453  # deg
# 1.5 Impedansi Trafo
# 1.5.1 GI ALSUT
# Trafo1&2 150/20kV 60MVA 12%
XT1a := 0.12*150^2/60 = 45  # Ω
# Trafo3 150/20kV 60MVA 12.944%
XT1b := 0.12944*150^2/60 = 48.54  # Ω
|ZL11| = 0.612642
L1 = 6.8
L2 = 3.25
|ZL21| = 0.292807
L3 = 23.4
|ZL31| = 6.27438
XT1 :=
    XT1a if XT1b ≥ XT1a
    XT1b if XT1a > XT1b
L4 = 5.9
|ZL41| = 1.582
XT1 = 45  # Ω
# 2. PERHITUNGAN SETELAN RELE JARAK
# 2.1  LINE 150 kV SUMMARECON-ALSUT
# Distance relay ABB RED670
ZL11 = 0.0952 + 0.6052i
# 2.1.1 Ratio CT & PT
CT1 := 2000/1  # A
PT1 := 150000/100  # Volt
IBase := 2000
UBase := 150
n1 := CT1/PT1
n1 = 1.33333
KN := (ZL10 - ZL11)/(3*ZL11)
|KN| = 0.861225
# 3.1.2 Jangkauan Impedansi
In := 1  # A
# ZONE-1 Phase
Z1P := 0.8*ZL11
Z1P = 0.07616 + 0.48416i
|Z1P| = 0.490114  # Ω  # (Primer)
Z1S := Z1P*n1
Z1S = 0.101547 + 0.645547i
|Z1S| = 0.653485  # Ω  # (Sekunder)
Z10P := 0.8*ZL10
Z10P = 0.89216 + 1.45248i
|Z10P| = 1.7046  # Ω  # (Primer)
Z10S := Z10P*n1
Z10S = 1.18955 + 1.93664i
|Z10S| = 2.27279  # Ω  # (Sekunder)
# Activation of zone 1 operation (ZM1)
# OperationDir = Forward
# Operation PP = On
# Operation PE = On
# Setting of zone 1 phase fault reach :
X1Z1P := |Z1P|*sin(θph11*k)
X1Z1P = 0.48416  # Ω  # (Primer)
X1Z1S := X1Z1P*n1
X1Z1S = 0.645547  # Ω  # (Sekunder)
R1Z1P := |Z1P|*cos(θph11*k)
R1Z1P = 0.07616  # Ω  # (Primer)
R1Z1S := R1Z1P*n1
R1Z1S = 0.101547  # Ω  # (Sekunder)
R1ZM01 := R1Z1P
R1ZM01 = 0.07616
# Setting of zone earth fault zero sequence values :
X0Z1P := |Z10P|*sin(θph10*k)
X0Z1P = 1.45248  # Ω  # (Primer)
X0Z1S := X0Z1P*n1
X0Z1S = 1.93664  # Ω  # (Sekunder)
R0Z1P := |Z10P|*cos(θph10*k)
R0Z1P = 0.89216  # Ω  # (Primer)
R0Z1S := R0Z1P*n1
R0Z1S = 1.18955  # Ω  # (Sekunder)
R0ZM01 := R0Z1P
R0ZM01 = 0.89216
# Setting Zone-1 terhadap Z line adalah
Z1% := Z1P/ZL11*100  # %
Z1% = 80  # %
# Setting of the fault resistive cover :
# Batasan setting RFPP
RFPPZ1Pmax ≤ 3*X1Z1P  # Ω/loop
RFPPZ1Pmax := 3*X1Z1P
RFPPZ1Pmax = 1.45248  # Ω/loop
RFPPZ1P := 0.7*3*X1Z1P
RFPPZ1P = 1.01674  # Ω/loop
RFPPZ1S := RFPPZ1P*n1
RFPPZ1S = 1.35565  # Ω/loop
# Perhitungan RFPE ada dibagian bawah karena mengacu dari besaran RldFw
# Load impedance limitation, with load encroachment function activated
# Setting of minimum operating currents
IMinOpPP := 15  # %  # Ibase
IMinOpPE := 15  # %  # Ibase
IMinOpIN := 10  # %  # Ibase
# ZONE-2 Phase
# Infeed
K := 1
Z2min := 1.2*ZL11
|Z2min| = 0.73517  # Ω  # (Primer)
Z2mak1 := (ZL11 + (0.8*ZL21)*K)*0.8
|Z2mak1| = 0.67751  # Ω  # (Primer)
Z2mak2 := (ZL11 + 0.8*ZL21)*0.8
|Z2mak2| = 0.67751  # Ω  # (Primer)
ZTrf := 0.8*(ZL11 + 0.5*XT1*j)  # arah trafo di GI Pati
|ZTrf| = 18.4843  # Ω  # (Primer)
# Dipilih Zone 2 terbesar tetapi tidak lebih besar dari zone 2 trafo
Z21mak := Z2mak1*(|Z2mak1| > |Z2min|) + Z2min*(|Z2min| > |Z2mak1|)
Z2P := Z21mak*(|Z21mak| < |ZTrf|) + ZTrf*(|ZTrf| < |Z21mak|)
Z2P = 0.11424 + 0.72624i
|Z2P| = 0.73517  # Ω  # (Primer)
Z2S := Z2P*n1
Z2S = 0.15232 + 0.96832i
|Z2S| = 0.980227  # Ω  # (Sekunder)
θphZ2P := arg(Z2P)*k^-1
θphZ2P = 81.0604  # deg
# ZONE-2 Earth
Z20min := 1.2*ZL10
|Z20min| = 2.55689  # Ω  # (Primer)
Z20mak1 := (ZL10 + (0.8*ZL20)*K)*0.8
|Z20mak1| = 2.35635  # Ω  # (Primer)
Z20mak2 := (ZL10 + 0.8*ZL20)*0.8
|Z20mak2| = 2.35635  # Ω  # (Primer)
Z20Trf := 0.8*(ZL10 + 0.5*XT1*j)
# arah trafo di GI Kmjng
|Z20Trf| = 19.4729  # Ω  # (Primer)
# Dipilih Zone 2 terbesar tetapi tidak lebih besar dari zone 2 trafo
Z210mak := Z20mak1*(|Z20mak1| > |Z20min|) + Z20min*(|Z20min| > |Z20mak1|)
Z20P := Z210mak*(|Z210mak| < |Z20Trf|) + Z20Trf*(|Z20Trf| < |Z210mak|)
Z20P = 1.33824 + 2.17872i
|Z20P| = 2.55689  # Ω  # (Primer)
Z20S := Z20P*n1
Z20S = 1.78432 + 2.90496i
|Z20S| = 3.40919  # Ω  # (Sekunder)
θphZ20P := arg(Z20P)*k^-1
θphZ20P = 58.4404  # deg
# Activation of zone 2 operation (ZM2)
# OperationDir = Forward
# Operation PP = On
# Operation PE = On
# Setting of zone 2 phase fault reach :
X1Z2P := |Z2P|*sin(θphZ2P*k)
X1Z2P = 0.72624  # Ω  # (Primer)
X1Z2S := X1Z2P*n1
X1Z2S = 0.96832  # Ω  # (Sekunder)
R1Z2P := |Z2P|*cos(θphZ2P*k)
R1Z2P = 0.11424  # Ω  # (Primer)
R1Z2S := R1Z2P*n1
R1Z2S = 0.15232  # Ω  # (Sekunder)
X1ZM02 := X1Z2P
X1ZM02 = 0.72624
Z1ZM02 := X1ZM02/sin(θph1*k) = 0.73517
# Setting of zone earth fault zero sequence values :
X0Z2P := |Z20P|*sin(θphZ20P*k)
X0Z2P = 2.17872  # Ω  # (Primer)
X0Z2S := X0Z2P*n1
X0Z2S = 2.90496  # Ω  # (Sekunder)
R0Z2P := |Z20P|*cos(θphZ20P*k)
R0Z2P = 1.33824  # Ω  # (Primer)
R0Z2S := R0Z2P*n1
R0Z2S = 1.78432  # Ω  # (Sekunder)
R0ZM02 := R0Z2P
R0ZM02 = 1.33824
# Setting Zone-2 terhadap Z line adalah
Z2% := |Z2P|/|ZL11|*100  # %
Z2% = 120  # %
# Setting of the fault resistive cover :
# Batasan setting RFPP
RFPPZ2Pmax ≤ 3*X1Z2P  # Ω/loop
RFPPZ2Pmax := 3*X1Z2P
RFPPZ2Pmax = 2.17872  # Ω/loop
RFPPZ2P := 0.7*3*X1Z2P
RFPPZ2P = 1.5251  # Ω/loop
RFPPZ2S := RFPPZ2P*n1
RFPPZ2S = 2.03347  # Ω/loop
# Perhitungan RFPE ada dibagian bawah karena mengacu dari besaran RldFw
# Load impedance limitation, with load encroachment function activated
# Setting of minimum operating currents
|ZL11| = 0.612642
IMinOpPP := 15  # %  # Ibase
|ZL21| = 0.292807
IMinOpPE := 15  # %  # Ibase
# ZONE-3 Forward Phase
# Infeed
K := 1
Z3min := 1.2*(ZL11 + K*ZL31)
|Z3min| = 8.26218  # Ω  # (Primer)
Z3mak1 := 0.8*(ZL11 + (1.2*ZL31)*K)
|Z3mak1| = 6.51199  # Ω  # (Primer)
Z3mak2 := 0.8*(ZL11 + (0.8*(ZL21 + 0.8*ZL41)*K))
|Z3mak2| = 1.48626  # Ω  # (Primer)
Z3mak3 := 0.8*(ZL11 + 0.8*(ZL31 + 0.8*ZL41))
|Z3mak3| = 5.31421  # Ω  # (Primer)
Z3Trf := 0.8*(ZL11 + 0.8*XT1*j)
# arah trafo di GI Alsut
|Z3Trf| = 29.2843
Z31 := Z3mak1*(|Z3mak1| > |Z3min|) + Z3min*(|Z3min| > |Z3mak1|)
Z32 := Z3mak2*(|Z3mak2| > |Z31|) + Z31*(|Z31| > |Z3mak2|)
Z3P := Z3Trf*(|Z32| > |Z3Trf|) + Z32*(|Z3Trf| > |Z32|)
|Z3P| = 8.26218  # Ω  # (Primer)
θphZ3P := arg(Z3P)*k^-1
Z3P = 0.671628 + 8.23483i  # Ω  # (Primer)
θphZ3P = 85.3373  # deg
Z3S := Z3P*n1
|Z3S| = 11.0162  # Ω  # (Sekunder)
Z3S = 0.895504 + 10.9798i  # Ω  # (Sekunder)
# Setting of zone 3 phase fault reach :
X1Z3P := |Z3P|*sin(θphZ3P*k)
X1Z3P = 8.23483  # Ω  # (Primer)
X1Z3S := X1Z3P*n1
X1Z3S = 10.9798  # Ω  # (Sekunder)
R1Z3P := |Z3P|*cos(θphZ3P*k)
R1Z3P = 0.671628  # Ω  # (Primer)
R1Z3S := R1Z3P*n1
R1Z3S = 0.895504  # Ω  # (Sekunder)
X1ZM03 := X1Z3P
X1ZM03 = 8.23483
Z1ZM03 := X1ZM03/sin(θph1*k) = 8.33609
R1ZM03 := R1Z3P
R1ZM03 = 0.671628
# ZONE-3 Forward EARTH fault
Z30min := 1.2*(ZL10 + K*ZL30)
|Z30min| = 25.3323  # Ω  # (Primer)
Z30mak1 := 0.8*(ZL10 + (1.2*ZL30)*K)
|Z30mak1| = 19.9434  # Ω  # (Primer)
Z30mak2 := 0.8*(ZL10 + (0.8*(ZL20 + 0.8*ZL40)*K))
|Z30mak2| = 4.76284  # Ω  # (Primer)
Z30mak3 := 0.8*(ZL10 + 0.8*(ZL30 + 0.8*ZL40))
|Z30mak3| = 16.3103  # Ω  # (Primer)
Z30Trf := 0.8*(ZL10 + 0.8*XT1*j)  # arah trafo di GI Alsut
|Z30Trf| = 30.2656
Z301 := Z30mak1*(|Z30mak1| > |Z30min|) + Z30min*(|Z30min| > |Z30mak1|)
Z302 := Z301*(|Z301| > |Z30mak2|) + Z30mak2*(|Z30mak2| > |Z301|)
Z30P := Z30Trf*(|Z302| > |Z30Trf|) + Z302*(|Z30Trf| > |Z302|)
|Z30P| = 25.3323  # Ω  # (Primer)
Z30P = 5.60484 + 24.7045i  # Ω  # (Primer)
Z30S := Z30P*n1
|Z30S| = 33.7764  # Ω  # (Sekunder)
Z30S = 7.47312 + 32.9393i  # Ω  # (Sekunder)
θphZ30P := arg(Z30P)*k^-1
θphZ30P = 77.2174  # deg
# Setting of zone 3 EARTH fault reach :
X0Z3P := |Z30P|*sin(θphZ30P*k)
X0Z3P = 24.7045  # Ω  # (Primer)
X0Z3S := X0Z3P*n1
X0Z3S = 32.9393  # Ω  # (Sekunder)
R0Z3P := |Z30P|*cos(θphZ30P*k)
R0Z3P = 5.60484  # Ω  # (Primer)
R0Z3S := R0Z3P*n1
R0Z3S = 7.47312  # Ω  # (Sekunder)
X0ZM03 := X0Z3P
X0ZM03 = 24.7045
Z0ZM03 := X0ZM03/sin(θph10*k) = 28.9926
R0ZM03 := R0Z3P
R0ZM03 = 5.60484
# Setting Zone-3 terhadap Z line adalah
Z3% := |Z3P|/|ZL11|*100  # %
Z3% = 1348.61  # %
# Setting of the fault resistive cover :
# Batasan setting RFPP
RFPPZ3Pmax ≤ 3*X1Z3P  # Ω/loop
RFPPZ3Pmax := 3*X1Z3P
RFPPZ3Pmax = 24.7045  # Ω/loop
RFPPZ3P := 0.7*3*X1Z3P
RFPPZ3P = 17.2931  # Ω/loop
RFPPZ3S := RFPPZ3P*n1
RFPPZ3S = 23.0575  # Ω/loop
# Perhitungan RFPE ada dibagian bawah karena mengacu dari besaran RldFw
# Timer Zone 2,3
# A. Timer Zone 2
|ZL11| = 0.612642
q := |Z2P - ZL11|
q = 0.122528
X1sg := 0.8*XL21
|X1sg| = 0.2314  # Ω  # (Primer)
# Lihat apakah Z2bs - (ZL11) < dari Z1sg, maka T2bs = 0.4 detik  jika tidak T2bs=0.8 detik
T2a := 0.4
T2b := 0.8
T2 := T2a*((|Z2P| - |XL11|) < |X1sg|) + T2b*((|Z2P| - |XL11|) > |X1sg|)
T2 = 0.4
# B. Timer Zone 3
# Setting waktu tunda untuk Zone-3 ditentukan 1.6 detik
T3 := 1.6  # detik
# Load impedance limitation, with load encroachment function activated
# Setting of minimum operating currents
IMinOpPP := 15  # %  # Ibase
IMinOpPE := 15  # %  # Ibase
# Setting of phase selection with load encroachment (PPHS)
# Set mengcover melebihi zone 2 mendekati zone 3, untuk mendapatkan jangkauan phase selection yang luas.
Z2% = 120
Z3% = 1348.61
# Berdasarkan manual, X1Phs disetting lebih dari 1.44 XL11 agar menjangkau zone 2 namun hanya sampai mendekati zone 3. Phase selection digunakan untuk kebutuhan single pole autoreclose. Jadi atur nilai 1.44 (safety margin) agar dapat memenuhi persyaratan itu.
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|X1Z2P| = 0.72624
|X0Z2P| = 2.17872
|X1Z3P| = 8.23483
|X0Z3P| = 24.7045
X1phsP := 0.95*|X1Z3P|
X1phsP = 7.82309  # Ω (primer)
X0phsP := 0.95*|X0Z3P|
X0phsP = 23.4693  # Ω (primer)
# Set the angle of the load limitation line
ARGLd := acos(0.8)*k^-1
ARGLd = 36.8699  # deg
# Nominal operation voltage
U := 150000  # V
# Load current
CCC := 1886  # A
# Set the load limitation reach in forward direction:
Umin := 0.95*U
Umin = 142500  # volt
Pexpmax := Umin*CCC*cos(ARGLd*k)
Pexpmax = 215004000  # watt
RLdFw := 0.5*Umin^2/Pexpmax
RLdFw = 47.223  # Ω/phase
# Set the load limitation in the reverse (import) direction
RLdRv := RLdFw
RLdRv = 47.223  # Ω/phase
# Setting RFPE digrading dari Rload
RFPEZ3Pphase := 0.7*RLdFw
RFPEZ3Pphase = 33.0561  # Ω/phase
RFPEZ3P := 0.9*RLdFw
RFPEZ3P = 42.5007  # Ω/loop
RFPEZ2P := 0.7*RFPEZ3P
RFPEZ2P = 29.7505  # Ω/loop
RFPEZ1P := 0.7*RFPEZ2P
RFPEZ1P = 20.8253  # Ω/loop
# Fault resistance reach
RFFwPE := 1.2*RFPEZ2P
RFFwPE = 35.7006  # Ω/loop
RFRvPE := RFFwPE
RFRvPE = 35.7006  # Ω/loop
RFFwPP := 1.1*RFPPZ2P
RFFwPP = 1.67761  # Ω/loop
RFRvPP := RFFwPP
RFRvPP = 1.67761  # Ω/loop
# TEF
# Operation  = off
Is1 := 20  # %  # In
t1 := 2  # s
# Setting of the tripping logic (TRP01) | Setting of the tripping logic (TRP02)
# Operation  = On
# Program  = 1/3ph
# tTripMin  = 0.150s
# TripLockOut  = Off
# AutoLock  = Off
# Operation  = On
# Program  = 1/3ph
# tTripMin  = 0.150s
# TripLockOut  = Off
# AutoLock  = Off
# Setting of the Switch On to Fault (SOTF) function
# Operation  = On
# Ibase  = 3000A
# Ubase  = 150kV
# Mode  = Impedance
# AutoInit  = Off
# IPh<  = 10% * Ibase
# UPh<  = 60% * Ubase
# Setting of the local accelaration logic (ZCLC)
# Extension  = Off
# LossOf Load  = Off
# Scheme communication logic for distance protection (ZCOM):
# Set the current reversal and WEI functions:
# Operation = On | Operation = Off
# Scheme type = Permissive Overreach
# tCoord = 0 s
# tSendmin = 0.1 s
# Unblock = off
# tSecurity = 0.035 s
# Setting of Fuse Failure supervision function based on U0-I0, U2-I2, and dU-dI (FSD)
# Operation  = On
# OpMode  = UZsIZs
# Ubase  = 150kV
# Ibase  = 3000A
# 3U0>  = 20% * Ubase
# 3I0<  = 10% * Ibase
# 3U2>  = 20% * Ubase
# 3I2<  = 10% * Ibase
# Operation DUDI  = On
# DU>  = 20% * Ubase
# IPH>  = 10% * Ibase
# UPH>  = 70% * Ubase
# DI<  = 10% * Ibase
# SEALIN  = On
# USealln<  = 60% * Ubase
# UDLD<  = 60% * Ubase
# IDLD<  = 20% * Ibase
# FAULT LOCATOR
MVAbase := 100
kVbase := 150
Zbase := kVbase^2/MVAbase
Zbase = 225  # ohm
R1Apu := 0.00093
R1A := R1Apu*Zbase
R1A = 0.20925  # ohm
# A : source imp at local s/s
# B : source imp at remote s/s
X1Apu := 0.01210
X1A := X1Apu*Zbase
X1A = 2.7225  # ohm
R1Bpu := 0.00098
R1B := R1Bpu*Zbase
R1B = 0.2205  # ohm  # DIGSILENT 05 Agst 2019
X1Bpu := 0.01254
X1B := X1Bpu*Zbase
X1B = 2.8215  # ohm
ZL11 = 0.0952 + 0.6052i
ZL11S := ZL11
ZL11S = 0.0952 + 0.6052i
|ZL11S| = 0.612642  # Ω Primer
R1L := |ZL11S|*cos(θph11*k)
R1L = 0.0952
X1L := |ZL11S|*sin(θph11*k)
X1L = 0.6052
ZL10 = 1.1152 + 1.8156i
ZL10S := ZL10
ZL10S = 1.1152 + 1.8156i
|ZL10S| = 2.13075  # Ω Primer
R0L := |ZL10S|*cos(θph10*k)
R0L = 1.1152
X0L := |ZL10S|*sin(θph10*k)
X0L = 1.8156
R0M := RmP1
R0M = 1.5504
X0M := XmP1
X0M = 4.216
LineLength := L1
LineLength = 6.8
# POWER SWING DETECTION
X1InFw := 1.1*X1ZM03
X1InFw = 9.05832
R1LIn := 0.1*RFPPZ3Pmax
R1LIn = 2.47045
X1ZM03 = 8.23483
R1FInFw := 1.1*RFPPZ3Pmax
R1FInFw = 27.1749
X1InRv := 0.8*X1ZM03
X1InRv = 6.58787
R1ZM03 = 0.671628
R1FInRv := 1.1*RFPPZ3Pmax
R1FInRv = 27.1749
RLdInFw := RFPPZ3Pmax
RLdInFw = 24.7045
ArgLd := 36.87
RLdOutFw := 1.1*RLdInFw
RLdOutFw = 27.1749
RLdOutRv := RLdOutFw
RLdOutRv = 27.1749
# Initial PSD timer tP1
tP1 := 0.045  # s
# Fast PSD timer tP2
tP2 := 0.015  # s
# Hold timer for initof Fast PSD timer
tW := 0.250  # s
# Hold timer for PSD detected
tH := 0.500  # s
# timer overriding 1-ph Reclosing
tEF := 2.000  # s
# timer to delay block by the IN current
tR1 := 0.300  # s
# timer Blocking output at slow swings
tR2 := 0.300  # s
# Setting of synchrocheck function (SYN1)
# Operation = On
Δθ := 15  # deg
t := 0.5  # sec
Δf := 1/t*Δθ/180
Δf = 0.166667  # Hz
# Setting of Breaker Failure Function (BFP1) | DISABLED
# Operation  = On
# RetripMode  = I> Check
# BUTripMode  = 1 out of 3
# FunctionMode  = Current
# Ibase  = 1600A
# IP>  = 20% * Ibase
# IN>  = 20% * Ibase
# t1  = 0.15s
# t2  = 0.25s
# t2MPh  = 0.25s
# t3  = 0.03s
# tPulse  = 0.20s
# I>BlkCont  = 20%* Ibase
# tCBAlarm  = 5.00s
# Setting of single and/or three phase auto recloser device (AR1)
# !Note: Operasi AR1: Externalctrl: Activation/deactivation is made by external switch
# Operation  = ExternalCtrl
# Setting of the number of Auto reclose shots  NoOfShots  = 1
# Setting of the Autoreclose first shot types allowed  FirstShot  = SPAR
# Set if you want the AR to be started from CB Open instead
# of from start inputs  StartByCBOpen  = Off
# Select the type of contact used for the CB position input  CBAuxContType= NO
# Extended t1S and t1 at PLC failure activated of not  Extended t1  = On
# Set the 3Ph shot 1 timer extention when the PLC is not
# operative and connected to input PLCFAIL  tExtended t1  = 0.5s
# Shot 1, Single phase reclosure dead-time  t1 1Ph  = 1 s (SPAR)
# Shot 1, two phase reclosure dead time  t1 2Ph  = 1 s (not used because of SPAR)
# Shot 1, Three phase reclosure dead time  t1 3Ph  = 3 s (not used because of SPAR)
# Shot 1, Three phase reclosure dead time for high speed
# shot without Synchrocheck  t1 3PhHS  = 0.40s
# Shot 2, Three phase reclosure dead time  t2 3Ph  = 60.00s
# Shot 3, Three phase reclosure dead time  t3 3Ph  = 60.00s
# Shot 4, Three phase reclosure dead time  t4 3Ph  = 60.00s
# Shot 5, Three phase reclosure dead time  t5 3Ph  = 60.00s
# Select if you want the multi shot cycle to advance to next
# shot at a new fault if CB has been closed  Follow CB  = Off
# Maximum time for Synchro check condition to be fulfilled  tSync  = 3.00s
# Reclose pulse duration  tPulse  = 0.2s
# Setting of the operating mode  CutPulse  = Off
# Set the reclaim time  tReclaim  = 40.00s
# Set the inhibit reset time  tInhibit  = 5.00s
# Setting of the type of CB Ready condition  CBReadyType  = OCO
# Max duration of trip or start signal  tTrip  = 0.2s
# Setting of the Priority between AR terminals in multi
# breaker schemes  Priority  = None
# Setting of the maximum wait time for Master to be ready  tWaitMaster  = 15.00s
# Setting of the time CB shall be closed before a fault
# to get an AR attempt  tCBClosedMin  = 5.00s
#
# Setting of the operating mode for next AR attempt  AutoCont  = Off
# Blocking of the Auto reclose program at unsuccessful
# auto reclosing  BlockByUnsucCl  = Off
# Wait time after reclose attempt before proceeding to
# next shots  tAutoCondWait  = 4.00s
# Setting of the signal mode at Unsuccessful reclosing  UnsucCIBYCBChk  = No CB Check
# CB check time before unsuccessful alarm  tUnsucCl  = 20.00s
# DATA SETTING
# (Primary Value)
# Lokasi : GI 150 kV Summarecon
# Bay  : PHT 150 kV Alsut 1, 2
# Impedance Protection
# DistanceZones(PDIS,21)
# ZM01 | ZM02 | ZM03
# Operation  : On | Operation  : On | Operation  : On
IBase = 2000
IBase = 2000
IBase = 2000
UBase = 150
UBase = 150
UBase = 150
# OperationDir  : Forward | OperationDir  : Forward | OperationDir  : Forward
X1Z1P = 0.48416
X1Z2P = 0.72624
X1Z3P = 8.23483
R1Z1P = 0.07616
R1Z2P = 0.11424
R1Z3P = 0.671628
X0Z1P = 1.45248
X0Z2P = 2.17872
X0Z3P = 24.7045
R0Z1P = 0.89216
R0Z2P = 1.33824
R0Z3P = 5.60484
RFPPZ1P = 1.01674
RFPPZ2P = 1.5251
RFPPZ3P = 17.2931
RFPEZ1P = 20.8253
RFPEZ2P = 29.7505
RFPEZ3P = 42.5007
# OperationPP  : On | OperationPP  : On | OperationPP  : On
# Timer tPP  : On | Timer tPP  : On | Timer tPP  : On
T1 := 0.0
T2 = 0.4
T3 = 1.6
IMinOpPP = 15  # %IB
IMinOpPP = 15  # %IB
IMinOpPP = 15  # %IB
IMinOpPE = 15  # %IB
IMinOpPE = 15  # %IB
IMinOpPE = 15  # %IB
IMinOpIN = 10  # %IB
IMinOpIN = 10  # %IB
IMinOpIN = 10  # %IB
# ZM04 | ZM05
# Operation  : Off | Operation  : Off
# PhaseSelection(PDIS,21)
# PHS1
IBase = 2000
UBase = 150
RLdFw = 47.223  # Ω/phase
RLdRv = 47.223  # Ω/phase
ARGLd = 36.8699  # deg
X1phsP = 7.82309  # Ω (primer)
X0phsP = 23.4693  # Ω (primer)
RFFwPP = 1.67761  # Ω/loop
RFRvPP = 1.67761  # Ω/loop
RFFwPE = 35.7006  # Ω/loop
RFRvPE = 35.7006  # Ω/loop
# DirectionalImpedance(RDIR)
# ZD01
ArgNegRes := 115
ArgDir := 15
IMinOp := 10  # %IB
IBase = 2000
UBase = 150
# AutomaticSOTF(PSOF)
# SFV1
# Operation  : On | Mode  : UILvl&Imp | UPh<  : 60  %IB | tDLD  : 0.150  s
IBase = 2000  # A  # AutoInit  : On  # tDuration  : 0.020  s
UBase = 150  # kV  # IPh<  : 10  %IB  # tSOTF  : 1.000  s
# PoleSlip(PPAM,78)
# PSP1
# Operation  : Off
# PowerSwingDetection(RPSB,78)
# PSD1
# Operation  : On | OperationLdCh  : On
X1InFw = 9.05832
RLdOutFw = 27.1749
R1LIn = 2.47045
ArgLd := 36
R1FInFw = 27.1749
RLdOutRv = 27.1749
X1InRv = 6.58787
R1FInRv = 27.1749
# ZCheme Communication (PSCH,85)
# ZCOM
# Operation  : On | tSendMin  :
# Scheme Type  : Permisive OR | Unblock  :
# tCootd  : | tSecurity  :
# EFCheme Communication (PSCH,85)
# EFC1
# Operation  : On | tSendMin  :
# Scheme Type  : Permisive OR | Unblock  :
# tCootd  : | tSecurity  :
# Control
# AutoRecloser (RREC, 79)
# AR01
# Operation  : On | t11Ph  : | 1 s | tInhibit  :
# NoOfShots  : 1 | t12Ph  : | tTrip  :
# ARMode  : | t13Ph  :
# StartByCBOpen  : Off | t13PhHS  :
# CBAuxContType  : NormOpen | tReclaim  :  40 sec
# CBReadyType  : CO | tSync  :
# Syncronising(RSYN, 25)
# SYN1
# Operation  : On | URatio  :
# SelPhaseBus1  : phase2 | OperationSynch  :
# SelPhaseBus2  : phase2 | UHighBusSynch  :
# SelPhaseLine1  : phase2 | UHighLineSynch  :
# SelPhaseLine2  : phase2 | UDiffSynch  :
# CBConfig  : | FreqDiffMin  :
# UBase  : | FreqDiffMin  :
# PhaseShift  : | tMaxSynch  :
# Monitoring
# FaultLocator(RFLO)
# FLO1
R1A = 0.20925
R1L = 0.0952
R0M = 1.5504
X1A = 2.7225
X1L = 0.6052
X0M = 4.216
R1B = 0.2205
R0L = 1.1152
LineLength = 6.8
X1B = 2.8215
X0L = 1.8156
