# PERHITUNGAN SETELAN RELAI JARAK SUTT 150 KV
# BALARAJA - SUVARNA SUTERA
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# 1. Data SUTT 150 kV
# 1.1  Balaraja - Suvarna
j := sqrt(-1)
a := -0.5 + 0.5*j*sqrt(3)
k := 2*π/360
# Jenis penghantar  OHL-150kV-TACSR 2X410/60mm2 (2730A)
L1 := 5.4  # km
RL11 := 0.036
XL11 := 0.282  # Ω/km
# Imp. urutan positif
ZL11 := (RL11 + j*XL11)*L1
ZL11 = 0.1944 + 1.5228i  # Ω
|ZL11| = 1.53516  # Ω
θph1 := arg(ZL11)*k^-1
θph1 = 82.725  # deg
# Imp. urutan nol
RL10 := 0.15 + RL11
RL10 = 0.186
Ω/km
XL10 := 3*XL11
XL10 = 0.846
ZL10 := (RL10 + j*XL10)*L1
ZL10 = 1.0044 + 4.5684i  # Ω
|ZL10| = 4.67751  # Ω
θN1 := arg(ZL10)*k^-1
θN1 = 77.6003  # deg
# 1.2  Suvarna - Cikupa
# Jenis penghantar  OHL-150kV-TACSR 2X410/60mm2 (2730A)
L2 := 5.9  # km
RL21 := 0.036
XL21 := 0.282  # Ω/km
# Imp. urutan positif
ZL21 := (RL21 + j*XL21)*L2
ZL21 = 0.2124 + 1.6638i  # Ω
|ZL21| = 1.6773  # Ω
θph2 := arg(ZL21)*k^-1
θph2 = 82.725  # deg
# Imp. urutan nol
RL20 := 0.15 + RL21
XL20 := 3*XL21
ZL20 := (RL20 + j*XL20)*L2
ZL20 = 1.0974 + 4.9914i  # Ω
|ZL20| = 5.11061  # Ω
θN2 := arg(ZL20)*k^-1
θN2 = 77.6003  # deg
# 1.3  Suvarna - Cikupa
# Jenis penghantar  OHL-150kV-TACSR 2X410/60mm2 (2730A)
L3 := 5.9  # km
# Imp. urutan positif
RL31 := 0.036
XL31 := 0.282  # Ω/km
ZL31 := (RL31 + j*XL31)*L3
ZL31 = 0.2124 + 1.6638i  # Ω
|ZL31| = 1.6773  # Ω
θph3 := arg(ZL31)*k^-1
θph3 = 82.725  # deg
# Imp. urutan nol
RL30 := RL31 + 0.15
XL30 := 3*XL31
ZL30 := (RL30 + j*XL30)*L3
ZL30 = 1.0974 + 4.9914i  # Ω
|ZL30| = 5.11061  # Ω
θN3 := arg(ZL30)*k^-1
θN3 = 77.6003  # deg
# 1.4  Cikupa - Pasar Kemis
# Jenis penghantar  OHL-150kV-ZEBRA 2X484.5mm (1620A)
L4 := 5.7  # km
# Imp. urutan positif
RL41 := 0.0387
XL41 := 0.2807  # Ω/km
ZL41 := (RL41 + j*XL41)*L4
ZL41 = 0.22059 + 1.59999i  # Ω
|ZL41| = 1.61512  # Ω
θph4 := arg(ZL41)*k^-1
θph4 = 82.1501  # deg
# Imp. urutan nol
RL40 := RL41 + 0.15
XL40 := 3*XL41
ZL40 := (RL40 + j*XL40)*L4
ZL40 = 1.07559 + 4.79997i  # Ω
|ZL40| = 4.919  # Ω
θN4 := arg(ZL40)*k^-1
θN4 = 77.3697  # deg
# 2. Impedansi Trafo
# 2.1 GI Suvarna Trafo 150/20 kV 60 MVA 12.5%
# Trafo 1
XT11a := 0.125*150^2/60
XT11a = 46.875  # Ω
XT11 := XT11a = 46.875
# SUTT BALARAJA - SUVARNA
# Distance relay TOSHIBA- GRZ 100 (Pola POTT)
# 3.1.1 Ratio CT & PT
CT1 := 3200/1  # A
PT1 := 150000/100  # Volt
n1 := CT1/PT1
n1 = 2.13333
# 3.1.2 Jangkauan induktif
# ZONE-1
|ZL11| = 1.53516  # Ω  # (Primer)
Z1P := 0.8*ZL11
|Z1P| = 1.22813  # Ω  # (Primer)
Z1S := Z1P*n1
|Z1S| = 2.62  # Ω  # (Sekunder)
# ZONE-2
# Infeed
K2 := 1.0
Z2min := 1.2*ZL11
|Z2min| = 1.84219  # Ω  # (Primer)
Z2mak1 := (ZL11 + 0.8*ZL21*K2)*0.8
|Z2mak1| = 2.3016  # Ω  # (Primer)
Z2mak2 := (ZL11 + 0.8*ZL21)*0.8
|Z2mak2| = 2.3016  # Ω  # (Primer)
ZTrf := 0.8*(ZL11 + 0.5*XT11*j)
|ZTrf| = 19.9688  # Ω  # (Primer)
# Dipilih Zone 2 terbesar tetapi tidak lebih besar dari zone 2 trafo
Z21mak := Z2mak1*(|Z2mak1| > |Z2min|) + Z2min*(|Z2min| > |Z2mak1|)
Z2P := Z21mak*(|Z21mak| < |ZTrf|) + ZTrf*(|ZTrf| < |Z21mak|)
Z2P = 0.291456 + 2.28307i
|Z2P| = 2.3016  # Ω  # (Primer)
Z2S := Z2P*n1
|Z2S| = 4.91008  # Ω  # (Sekunder)
# ZONE-3 Forward
# Infeed
K3 := 1.0
Z3min := 1.2*(ZL11 + ZL31)
|Z3min| = 3.85495  # Ω  # (Primer)
Z3mak1 := 0.8*(ZL11 + (1.2*ZL31)*K3)
|Z3mak1| = 2.83834  # Ω  # (Primer)
Z3mak2 := 0.8*(ZL11 + (0.8*(ZL31 + 0.8*ZL41)*K3))
|Z3mak2| = 3.12851  # Ω  # (Primer)
Z3mak3 := 0.8*(ZL11 + 0.8*(ZL31 + 0.8*ZL41))
|Z3mak3| = 3.12851  # Ω  # (Primer)
Z3mak4 := 0.8*(ZL11 + 1.2*ZL31)
|Z3mak4| = 2.83834  # Ω  # (Primer)
ZTrf := 0.8*(ZL11 + 0.8*XT11*j)
|ZTrf| = 31.2186  # Ω  # (Primer)
Z31 := Z3mak1*(|Z3mak1| > |Z3mak2|) + Z3mak2*(|Z3mak2| > |Z3mak1|)
Z32 := Z31*(|Z31| > |Z3min|) + Z3min*(|Z3min| > |Z31|)
Z3P := ZTrf*(|Z32| > |ZTrf|) + Z32*(|ZTrf| > |Z32|)
|Z3P| = 3.85495  # Ω  # (Primer)
Z3S := Z3P*n1
|Z3S| = 8.2239  # Ω  # (Sekunder)
|ZL11| + |ZL21| = 3.21246  # Ω  # (Primer)
# 3.1.3.  Setelan Waktu
T1 := 0
T1 = 0  # detik
T2 := 0.4*(|Z2mak2| > |Z2min|) + 0.8*(|Z2min| > |Z2mak2|)
T2 = 0.4  # detik
Z3mak5 := Z3mak4*(|Z3mak4| > |Z3mak3|) + Z3mak3*(|Z3mak3| > |Z3mak4|)
T3 := 1.2*(|Z3mak5| > |Z3min|) + 1.6*(|Z3min| > |Z3mak5|)
T3 = 1.6  # detik
# Timer Zone 2
|ZL11| = 1.53516
q := |Z2P - ZL11|
q = 0.766442
Z1sg := 0.8*ZL21
|Z1sg| = 1.34184  # Ω  # (Primer)
# Lihat apakah Z2bs - (ZL11) < dari Z1sg, maka T2bs = 0.4 detik  jika tidak T2bs=0.8 detik
T2a := 0.4
T2b := 0.8
T2 := T2a*(q < |Z1sg|) + T2b*(q > |Z1sg|)
T2 = 0.4
tk2 := T2
# 3.1.4. Secondary Tap Setting
# Relay Nominal Current
In := 1  # A
# Zone 1
# Phase => ZS-C = MHO
|Z1S| = 2.62  # Ω  # (secondary)
Z1S = 0.331776 + 2.59891i  # Ω  # (secondary)
Z1Sr := |Z1S|*sin(θph1*k)
Z1Sr = 2.59891  # Ω  # (secondary)
θF := 30189.21  # A
θIL := 2730  # A  # Tetha IL sama dengan CCC
# θFadalah Pemilihan SC yg terkecil antara SC 1Ph-G atau SC 3Ph
θ1 := θIL/(θF + θIL)
θ1 = 0.0829303
Z1Sθ1 := (atan(θ1)*(k^-1))
Z1Sθ1 = 4.74071  # deg
# dipilih
Z1Sθ1 := 4.741  # deg
# Ground => ZG-C = QUAD
Z1Gr := Z1Sr
Z1Gr = 2.59891  # Ω  # (secondary)
Z1Gθ1 := Z1Sθ1
Z1Gθ1 = 4.741  # deg
# Zone 2
# Phase => ZS-C = MHO
|Z2S| = 4.91008  # Ω  # (secondary)
Z2S = 0.621773 + 4.87055i  # Ω  # (secondary)
Z2Sr := |Z2S|*sin(θph1*k)
Z2Sr = 4.87055  # Ω  # (secondary)
margin := 5  # deg
Z2Sθ2 := θph1 - margin
Z2Sθ2 = 77.725  # deg
θph1 = 82.725
# Ground => ZG-C = QUAD
Z2Gr := Z2Sr
Z2Gr = 4.87055  # Ω  # (secondary)
Z2Gθ2 := Z2Sθ2
Z2Gθ2 = 77.725  # deg
# Zone 3 (FORWARD)
# Phase => ZS-C = MHO
|Z3S| = 8.2239  # Ω  # (secondary)
Z3S = 1.04141 + 8.1577i  # Ω  # (secondary)
Z3Sr := |Z3S|*sin(θph1*k)
Z3Sr = 8.1577  # Ω  # (secondary)
Z3Sθ := θph1
Z3Sθ = 82.725  # deg
# Ground => ZG-C = QUAD
Z3Gr := Z3Sr
Z3Gr = 8.1577  # Ω  # (secondary)
Z3Gθ := θph1
Z3Gθ = 82.725  # deg
# Blinder setting :
CCC := 2730  # A
ILmax := CCC  # A
ILmax = 2730  # A
kV := 150000  # V
Zloadmax := 0.8*kV/(sqrt(3)*ILmax)
Zloadmax = 25.378  # Ω  # (Primer)
Zloadmaxs := Zloadmax*n1
Zloadmaxs = 54.1398  # Ω  # (Sekunder)
margin := 2
Rset := Zloadmaxs/margin
Rset = 27.0699  # Ω  # (Sekunder)
BFRS := Rset
BFRS = 27.0699  # Ω
BRRS := BFRS
BRRS = 27.0699  # Ω
BFRG := BFRS
BFRG = 27.0699  # Ω
BRRG := BFRG
BRRG = 27.0699  # Ω
BFLSθ := 120  # deg
# BRLS = Linked with BFLS
# BFLS = Linked with BFRS
BFRSθ := 75  # deg (fixed)
BFLSθ := 90  # deg (fixed)
BFLGθ := 120  # deg
# BRLG = Linked with BFLG
# Zero Sequence Compensation :
RL11 = 0.036
XL11 = 0.282
Krs := RL10/RL11*100
Krs = 516.667  # %
Kxs := XL10/XL11*100
Kxs = 300  # %
# Power swing Block :
|Z3S| < PSBZ < 0.4*Zloadmaxs
# PSBZ θ = Linked with Z3S θ
|Z3S| = 8.2239  # Ω  # (Sekunder)
PSBRθ := 75  # deg (fixed)
0.4*Zloadmaxs = 21.6559  # Ω  # (Sekunder)
PSBLθ := 90  # deg (fixed)
PSBZ := 8.53  # Ω  # (Sekunder)
# Timer PSB :
TPSB := 40  # ms
# Fault locator setting :
ZL11 = 0.1944 + 1.5228i  # Ω  # Primer
ZL11s := ZL11*n1
ZL11s = 0.41472 + 3.24864i  # Ω  # Sekunder
R1 := |ZL11s|*cos(θph1*k)
R1 = 0.41472  # Ω  # (secondary)
X1 := |ZL11s|*sin(θph1*k)
X1 = 3.24864  # Ω  # (secondary)
ZL10 = 1.0044 + 4.5684i  # Ω  # Primer
ZL10s := ZL10*n1
ZL10s = 2.14272 + 9.74592i  # Ω  # Sekunder
R0 := |ZL10s|*cos(θN1*k)
R0 = 2.14272  # Ω  # (secondary)
X0 := |ZL10s|*sin(θN1*k)
X0 = 9.74592  # Ω  # (secondary)
L1 = 5.4  # km
# Charging current compensation :
kV = 150000  # V
# Susceptasi untuk ACSR 240/40 mm2 menggunakan data penghantar HA221 281.1 mm2
Bt := 2.88*10^-6*L1  # S
Xc := 1/Bt
Xc = 64300.4  # Ω
Ich := kV/(sqrt(3)*Xc)
Ich = 1.34684  # A
ZIC := Ich/CT1
ZIC = 0.000420888  # A
# Under Voltage Element :
# Phase selection element (UV with current compensation)
# a. Under voltage element (UVCV)
Vfn := 100/sqrt(3)  # UVCV < rated voltage x 0.8
UVCV := Vfn*0.8
UVCV = 46.188  # dipilih
UVCV := 46  # volt
# b. Reach setting (UVCZ)
K := n1 = 2.13333
UVCZ := ZL11*K*1.2  # UVCZ = ZLine x K x 120 %
|UVCZ| = 3.93001  # dipilih
UVCZ := 3.93  # Ω
# c. Angle setting (UVCθ)
UVCθ := θph1
UVCθ = 82.725  # dipilih
UVCθ := 82.725  # deg
# VT Failure Supervision :
Vff := 100  # V
UVFS := Vff*0.6  # UVFS,UVFG = 60 % x 3Vo
UVFS = 60  # V
UVFG := Vfn*0.6
UVFG = 34.641  # dipilih
UVFG := 35  # V
# Weak Infeed Tripping Function :
Vff := 100  # V
UVLS := Vff*0.6  # UVLS,UVLG = 60 % x 3Vo
UVLS = 60  # V
UVLG := Vfn*0.6
UVLG = 34.641  # dipilih
UVLG := 35  # V
# Switch-on-to-fault/stub protection (OCH) :
# a. Overcurrent element for SOTF (OCH)
# V
Vb := 150  # kV
# Vbase
MVAb := 100  # MVA
# Zbase
Zb := Vb^2/MVAb = 225
# Zback
Zback := sqrt(0.00271776^2 + 0.04837213^2) + sqrt(0.00267634^2 + 0.0483213^2) + sqrt(0.01880199^2 + 0.09605879^2)
Zback = 0.194725
# Zline
Zline1 := (L1*sqrt(RL11^2 + XL11^2)) = 1.53516
Zline1b := Zline1/Zb = 0.00682293  # pu
Zline2 := Zline1
Zline2b := Zline1b = 0.00682293  # pu
Zline0 := sqrt(RL10^2 + XL10^2) = 0.866206
Zline0b := Zline0/Zb = 0.0038498  # pu
if0 := 1/(Zback + Zline1b + Zline2b + Zline0b) = 4.71207  # pu
Ib := 100000000/(sqrt(3)*150000) = 384.9  # A
# ifmin
Ifmin := 3*(if0*Ib) = 5441.03  # A
# OCH < (0.8*IFmin/CT)*0.5)
OCH2 := (0.8*Ifmin/CT1)*0.5 = 0.680129  # A
# dipilih
OCH := 0.65  # A
# b. Delayed drop-off setting for SOTF (TFSOTF)
TSOTF := 1  # sec
# III. CHECK SYNCHRONIZING RELAY  dan AUTO RECLOSER (TOSHIBA, GRZ 100)
# 1. Data Trafo Tegangan
PT := 150000/sqrt(3)/(100/sqrt(3))
Un := 100/sqrt(3)  # V
# 2. Setting
# 1. Sudut phasa
θ := 15  # derajat
# 2. Undervoltage detector (SY1OV) :
SY1OV := 0.9*Un  # (phase-phase)
SY1OV = 51.9615  # V
# 3. Overvoltage detector (SY1UV) :
SY1UV := 1.05*Un  # (phase-phase)
SY1UV = 60.6218  # V
# 4. Timer
ts := 0.5  # detik
# 5. Limiting Slip Frequency
δf := 1/ts*θ/180
δf = 0.166667  # Hertz
# Setelan  A/R :
Deadtime1 := 1  # sec
Reclaimtime := 40  # sec
