# PERHITUNGAN SETELAN RELAI JARAK UGC 150 KV
# GI  CILEDUG - ALSUT
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# CILEDUG | ALSUT | SUMMARECON
# L1; 3.25 KM; 0.208 OHM | L2=L3; 6.8 KM; 0.612 OHM | CURUG
# L4; 4.7 KM; 0.42 OHM
# 60 MVA
# 12%
# 150kV
# N/A
# N/A
j := sqrt(-1)
a := -0.5 + 0.5*j*sqrt(3)
k := 2*π/360
# 1. Data Impedansi
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# 1.1  CILEDUG - ALAM SUTERA
# CAB-150 KV N2XCK2Y CU 2x1000mm (1860A)
R11a := 0.014448  # Ω/km
X11a := 0.062439  # Ω/km
L11a := 3.25  # km
Iccc_a := 1428  # A
R11b := 0  # Ω/km
X11b := 0  # Ω/km
L11b := 0  # km
Iccc_b := 9999  # A
R11c := 0  # Ω/km
X11c := 0  # Ω/km
L11c := 0  # km
Iccc_c := 9999  # A
L11 := L11a + L11b + L11c
Iccc := min(Iccc_a, Iccc_b, Iccc_c)
L11 = 3.25  # km
Iccc = 1428  # A
L1 := L11
# Imp. urutan nol
RL10a := (0.15 + R11a)*L11a
RL10a = 0.534456
XL10a := (3*X11a)*L11a
XL10a = 0.60878
RL10b := (0.15 + R11b)*L11b
RL10b = 0
XL10b := (3*X11b)*L11b
XL10b = 0
RL10c := (0.15 + R11c)*L11c
RL10c = 0
XL10c := (3*X11c)*L11c
XL10c = 0
RL10 := RL10a + RL10b + RL10c
XL10 := XL10a + XL10b + XL10c
RL10 = 0.534456
XL10 = 0.60878
R10 := RL10/L11
X10 := XL10/L11
R10 = 0.164448  # Ω/km
X10 = 0.187317  # Ω/km
ZL10 := RL10 + XL10*j
ZL10 = 0.534456 + 0.60878i
# Imp. urutan positif
RL11a := R11a*L11a
RL11a = 0.046956
XL11a := X11a*L11a
XL11a = 0.202927
RL11b := R11b*L11b
RL11b = 0
XL11b := X11b*L11b
XL11b = 0
RL11c := R11c*L11c
RL11c = 0
XL11c := X11c*L11c
XL11c = 0
RL11 := RL11a + RL11b + RL11c
XL11 := XL11a + XL11b + XL11c
RL11 = 0.046956
XL11 = 0.202927
R11 := RL11/L11
X11 := XL11/L11
R11 = 0.014448  # Ω/km
X11 = 0.062439  # Ω/km
ZL11 := RL11 + XL11*j
ZL11_verify := (R11a + j*X11a)*L11a + (R11b + j*X11b)*L11b + (R11c + j*X11c)*L11c
ZL11_verify = 0.046956 + 0.202927i
ZL11 = 0.046956 + 0.202927i
|ZL11| = 0.208289
ZL1 := ZL11
θph1 := arg(ZL11)*k^-1
θph1 = 76.9714  # deg
# Imp. mutual
ZM10 := 0.0493 + j*0.2962
|ZM10| = 0.300275  # Ω/km
ZLM10 := ZM10*L11
|ZLM10| = 0.975893  # Ω
θM10 := arg(ZM10)*k^-1
θM10 = 80.5502  # deg
# 1.2 ALAM SUTERA - SUMMARECON GADING SERPONG
# CAB-150 KV N2XCK2Y CU 2x1000mm (1886A)
R21a := 0.014  # Ω/km
X21a := 0.089  # Ω/km
L21a := 6.8  # km
R21b := 0  # Ω/km
X21b := 0  # Ω/km
L21b := 0  # km
R21c := 0  # Ω/km
X21c := 0  # Ω/km
L21c := 0  # km
L21 := L21a + L21b + L21c
L21 = 6.8  # km
L2 := L21
# Imp. urutan nol
RL20a := (0.15 + R21a)*L21a
RL20a = 1.1152
XL20a := (3*X21a)*L21a
XL20a = 1.8156
RL20b := (0.15 + R21b)*L21b
RL20b = 0
XL20b := (3*X21b)*L21b
XL20b = 0
RL20c := (0.15 + R21c)*L21c
RL20c = 0
XL20c := (3*X21c)*L21c
XL20c = 0
RL20 := RL20a + RL20b + RL20c
XL20 := XL20a + XL20b + XL20c
RL20 = 1.1152
XL20 = 1.8156
R20 := RL20/L21
X20 := XL20/L21
R20 = 0.164  # Ω/km
X20 = 0.267  # Ω/km
ZL20 := RL20 + XL20*j
ZL20 = 1.1152 + 1.8156i
# Imp. urutan positif
RL21a := R21a*L21a
RL21a = 0.0952
XL21a := X21a*L21a
XL21a = 0.6052
RL21b := R21b*L21b
RL21b = 0
XL21b := X21b*L21b
XL21b = 0
RL21c := R21c*L21c
RL21c = 0
XL21c := X21c*L21c
XL21c = 0
RL21 := RL21a + RL21b + RL21c
XL21 := XL21a + XL21b + XL21c
RL21 = 0.0952
XL21 = 0.6052
R21 := RL21/L21
X21 := XL21/L21
R21 = 0.014  # Ω/km
X21 = 0.089  # Ω/km
ZL21 := RL21 + XL21*j
ZL21_verify := (R21a + j*X21a)*L21a + (R21b + j*X21b)*L21b + (R21c + j*X21c)*L21c
ZL21_verify = 0.0952 + 0.6052i
ZL21 = 0.0952 + 0.6052i
|ZL21| = 0.612642
ZL2 := ZL21
θph2 := arg(ZL21)*k^-1
θph2 = 81.0604  # deg
L2 = 6.8  # km
# 1.3 ALAM SUTERA - SUMMARECON GADING SERPONG
# CAB-150 KV N2XCK2Y CU 2x1000mm (1886A)
R31a := 0.014  # Ω/km
X31a := 0.089  # Ω/km
L31a := 6.8  # km
R31b := 0  # Ω/km
X31b := 0  # Ω/km
L31b := 0  # km
R31c := 0  # Ω/km
X31c := 0  # Ω/km
L31c := 0  # km
L31 := L31a + L31b + L31c
L31 = 6.8  # km
L3 := L31
# Imp. urutan nol
RL30a := (0.15 + R31a)*L31a
RL30a = 1.1152
XL30a := (3*X31a)*L31a
XL30a = 1.8156
RL30b := (0.15 + R31b)*L31b
RL30b = 0
XL30b := (3*X31b)*L31b
XL30b = 0
RL30c := (0.15 + R31c)*L31c
RL30c = 0
XL30c := (3*X31c)*L31c
XL30c = 0
RL30 := RL30a + RL30b + RL30c
XL30 := XL30a + XL30b + XL30c
RL30 = 1.1152
XL30 = 1.8156
R30 := RL30/L31
X30 := XL30/L31
R30 = 0.164  # Ω/km
X30 = 0.267  # Ω/km
ZL30 := RL30 + XL30*j
ZL30 = 1.1152 + 1.8156i
# Imp. urutan positif
RL31a := R31a*L31a
RL31a = 0.0952
XL31a := X31a*L31a
XL31a = 0.6052
RL31b := R31b*L31b
RL31b = 0
XL31b := X31b*L31b
XL31b = 0
RL31c := R31c*L31c
RL31c = 0
XL31c := X31c*L31c
XL31c = 0
RL31 := RL31a + RL31b + RL31c
XL31 := XL31a + XL31b + XL31c
RL31 = 0.0952
XL31 = 0.6052
R31 := RL31/L31
X31 := XL31/L31
R31 = 0.014  # Ω/km
X31 = 0.089  # Ω/km
ZL31 := RL31 + XL31*j
ZL31_verify := (R31a + j*X31a)*L31a + (R31b + j*X31b)*L31b + (R31c + j*X31c)*L31c
ZL31_verify = 0.0952 + 0.6052i
ZL31 = 0.0952 + 0.6052i
|ZL31| = 0.612642
ZL3 := ZL31
θph3 := arg(ZL31)*k^-1
θph3 = 81.0604  # deg
L3 = 6.8  # km
# 1.4 SUMMARECON GADING SERPONG - CURUG
# CAB-150 KV N2XCK2Y CU 2x1000mm (1782A)
R41a := 0.014448  # Ω/km
X41a := 0.088532  # Ω/km
L41a := 4.7  # km
R41b := 0  # Ω/km
X41b := 0  # Ω/km
L41b := 0  # km
R41c := 0  # Ω/km
X41c := 0  # Ω/km
L41c := 0  # km
L41 := L41a + L41b + L41c
L41 = 4.7  # km
L4 := L41
# Imp. urutan nol
RL40a := (0.15 + R41a)*L41a
RL40a = 0.772906
XL40a := (3*X41a)*L41a
XL40a = 1.2483
RL40b := (0.15 + R41b)*L41b
RL40b = 0
XL40b := (3*X41b)*L41b
XL40b = 0
RL40c := (0.15 + R41c)*L41c
RL40c = 0
XL40c := (3*X41c)*L41c
XL40c = 0
RL40 := RL40a + RL40b + RL40c
XL40 := XL40a + XL40b + XL40c
RL40 = 0.772906
XL40 = 1.2483
R40 := RL40/L41
X40 := XL40/L41
R40 = 0.164448  # Ω/km
X40 = 0.265596  # Ω/km
ZL40 := RL40 + XL40*j
ZL40 = 0.772906 + 1.2483i
# Imp. urutan positif
RL41a := R41a*L41a
RL41a = 0.0679056
XL41a := X41a*L41a
XL41a = 0.4161
RL41b := R41b*L41b
RL41b = 0
XL41b := X41b*L41b
XL41b = 0
RL41c := R41c*L41c
RL41c = 0
XL41c := X41c*L41c
XL41c = 0
RL41 := RL41a + RL41b + RL41c
XL41 := XL41a + XL41b + XL41c
RL41 = 0.0679056
XL41 = 0.4161
R41 := RL41/L41
X41 := XL41/L41
R41 = 0.014448  # Ω/km
X41 = 0.088532  # Ω/km
ZL41 := RL41 + XL41*j
ZL41_verify := (R41a + j*X41a)*L41a + (R41b + j*X41b)*L41b + (R41c + j*X41c)*L41c
ZL41_verify = 0.0679056 + 0.4161i
ZL41 = 0.0679056 + 0.4161i
|ZL41| = 0.421605
ZL4 := ZL41
θph4 := arg(ZL41)*k^-1
θph4 = 80.7313  # deg
L4 = 4.7  # km
# 1.5 TRAFO di GI L2
MVA := 60
X_trafo := 12 %
XT1 := X_trafo*150^2/MVA
XT1 = 45  # Ω
XT1 = 45  # Ω
|ZL1| = 0.208289  # ohm
L1 = 3.25  # km
|ZL2| = 0.612642  # ohm
L2 = 6.8  # km
|ZL3| = 0.612642  # ohm
L3 = 6.8  # km
|ZL4| = 0.421605  # ohm
L4 = 4.7  # km
XT1 = 45  # ohm
# PERHITUNGAN SETELAN RELE JARAK ~ Distance Relay MiCom P443
# I. Distance relay MiCOM - P443
# 3.1.1 Ratio CT & PT
CT1 := 3000/1  # A
PT1 := 150000/100  # Volt
In := 1  # A
Vn := 100/sqrt(3)  # V
n1 := CT1/PT1 = 2
|ZL1| = 0.208289  # Ω  # (Primer)
ZL1s := n1*|ZL1| = 0.416577  # Ω  # (Secondary)
# 3.1.2 Jangkauan induktif
# ZONE-1
Z1P := 0.8*ZL1
|Z1P| = 0.166631  # Ω  # (Primer)
Z1S := Z1P*n1
|Z1S| = 0.333262  # Ω  # (Sekunder)
# ZONE-2
Z2min := 1.2*ZL1
|Z2min| = 0.249946  # Ω  # (Primer)
Z2mak1 := 0.8*(ZL1 + 0.8*ZL2)
|Z2mak1| = 0.558424  # Ω  # (Primer)
ZTrf2 := 0.8*(ZL1 + 0.5*XT1*j)
|ZTrf2| = 18.1624  # Ω  # (Primer)
Z2b := ZL1 + 0.8*ZL2
|Z2b| = 0.69803  # Ω  # (Primer)
# Dipilih Zone 2 terbesar tetapi tidak lebih besar dari zone 2 trafo
Z21mak := Z2mak1*(|Z2mak1| > |Z2min|) + Z2min*(|Z2min| > |Z2mak1|)
Z22mak := Z21mak*(|Z21mak| < |ZTrf2|) + ZTrf2*(|ZTrf2| < |Z21mak|)
Z2P := Z22mak
Z2P = 0.0984928 + 0.549669i
|Z2P| = 0.558424  # Ω  # (Primer)
Z2S := Z2P*n1
|Z2S| = 1.11685  # Ω  # (Sekunder)
# ZONE-3 Forward
# Infeed
K3 := 1
Z3min := 1.2*(ZL1 + ZL3)
|Z3min| = 0.984642  # Ω  # (Primer)
Z3mak1 := 0.8*(ZL1 + (1.2*ZL3)*K3)
|Z3mak1| = 0.754436  # Ω  # (Primer)
Z3mak2 := 0.8*(ZL1 + (K3*(0.8*(ZL3 + 0.8*ZL4))))
|Z3mak2| = 0.774267  # Ω  # (Primer)
ZTrf3 := 0.8*(ZL1 + 0.8*XT1*j)
|ZTrf3| = 28.9624  # Ω  # (Primer)
Z3b := (ZL1 + (K3*(0.8*(ZL3 + 0.8*ZL4))))
|Z3b| = 0.967834  # Ω  # (Primer)
Z31 := Z3mak1*(|Z3mak1| > |Z3mak2|) + Z3mak2*(|Z3mak2| > |Z3mak1|)
Z32 := Z31*(|Z31| > |Z3min|) + Z3min*(|Z3min| > |Z31|)
Z3P := ZTrf3*(|Z32| > |ZTrf3|) + Z32*(|ZTrf3| > |Z32|)
|Z3P| = 0.984642  # Ω  # (Primer)
Z3S := Z3P*n1
|Z3S| = 1.96928  # Ω  # (Sekunder)
# ZONE-3 Reverse
# Disetting 10 % dari impedansi Line yang diamankan (ZL11)
# Z3 Reverse
Z3R := 0.1*ZL1
Z3R = 0.0046956 + 0.0202927i
|Z3R| = 0.0208289  # Ω  # (Primer)
Z3RS := |Z3R|*n1
Z3RS = 0.0416577  # Ω  # (Sekunder)
# 3.1.3.  Setelan Waktu
T1 := 0
T1 = 0  # detik
T2 := 0.4*(|Z2b| > |Z22mak|) + 0.8*(|Z22mak| > |Z2b|)
T2 = 0.4  # detik
T3 := 1.2*(|Z3b| > |Z32|) + 1.6*(|Z32| > |Z3b|)
T3 = 1.6  # detik
# Timer Zone 2
|ZL1| = 0.208289
|Z2P| = 0.558424
q := |Z2P| - |ZL1|
q = 0.350135
Z1sg := 0.8*ZL2
|Z1sg| = 0.490114  # Ω  # (Primer)
# Lihat apakah Z2bs - (ZL1) < dari Z1sg, maka T2bs = 0.4 detik  jika tidak T2bs=0.8 detik
T2a := 0.4
T2b := 0.8
T2 := T2a*(q < |Z1sg|) + T2b*(q > |Z1sg|)
T2 = 0.4  # detik
# 3.1.4. PROTECTION SETTING DISTANCE ELEMENT
# Line setting :
Lmin := 0.3  # km
L := L11
Lmax := 1000  # km
L = 3.25  # km
Lstep := 0.01  # km
ZL := |ZL1|*n1
ZLmin := 0.001/In  # Ω
ZL = 0.416577  # Ω  # sekunder
ZLmax := 500/In  # Ω
ZLstep := 0.001/In  # Ω
θL := θph1
θLmin := -90  # deg
θL = 76.9714  # deg
θLmax := 90  # deg
θLstep := 0.1  # deg
# Zone setting :
# Bit  : 7 6 5 4 3 2 1 0
# Bit 0 = Z1  enabled
# Bit 1 = Z2  enabled
# Bit 2 = Zp  enabled
# Bit 3 = Z3  enabled
# Bit 4 = Z4  enabled
# Zone status : 0 0 0 0 0 0 1 1
# Ground Fault Compensation setting :
kZ0 := (ZL10 - ZL11)/(3*ZL11)
|kZ0| = 1.01514
kZ0min := 0
kZN := |kZ0|
kZ0max := 7
kZN = 1.01514
kZ0step := 0.001
θkZ0min := 0  # deg
θkZ0 := arg(kZ0)*k^-1
θkZN := θkZ0
θkZ0max := 360  # deg
θkZN = -37.1934  # deg
θkZ0step := 0.1  # deg
# Zone 1
Z1 := |Z1S|
Z1 = 0.333262  # Ω  # sekunder
Zmin := 0.001/In  # Ω
tZ1 := T1
tZ1 = 0  # sec
Zmax := 500/In  # Ω
# Zone 2
Zstep := 0.001/In  # Ω
Z2 := |Z2S|
Z2 = 1.11685  # Ω  # sekunder
tZmin := 0  # sec
tZ2 := T2
tZ2 = 0.4  # sec
tZmax := 10  # sec
tZstep := 0.002  # sec
# Zone 3
Z3 := |Z3S|
Z3 = 1.96928  # Ω  # sekunder
tZ3 := T3
tZ3 = 1.6  # sec
# Resistive Reach calculation :
CT1 = 3000
n1 = 2
CTp := CT1*In = 3000
Iccc = 1428
Iloadmax := In = 1  # A
In = 1
CCC := Iccc = 1428
CC := CCC*(CCC < CTp) + CTp*(CTp < CCC)  # A
CC := Iccc
IloadMax := CC/CT1
IloadMax = 0.476
Zloadmin := Vn/IloadMax = 121.292  # (ohm) dr sisi sekunder
# Rumus lain untuk perhitungan resistive reach berdasarkan primary value
# Tegangan phasa-phasa
Vpp := PT1*100  # Volt
# Impedansi Beban Maksimum
ZloadMax := Vpp/(sqrt(3)*CC)*n1
|ZloadMax| = 121.292  # Ω  # Ω  # Ω  # sekunder  # sekunder  # sekunder
# Tipikal Resistive reach max : nilai "R gangguan fasa" akan mencegah impedansi beban min dengan margin lebih besar atau sama dengan 40 %. nilai "R gangguan tanah" dengan margin lebih besar atau sama dengan 20 %.
# Margin resistive reach max :
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MRphmax := 0.4*Zloadmin
MRphmax = 48.5168  # Ω  # Ω  # Ω  # sekunder  # sekunder  # sekunder
MRgmax := 0.2*Zloadmin
MRgmax = 24.2584  # Ω  # sekunder
# Tipikal Resistive reach min (ph fault) : lebih besar dari fault resistance (dgn formula warrington)
# Resistive reach min (g fault) : 20 ohm primer (tipikal)
# Jarak konduktor fasa :
Lc := 4.3  # km
# Arus gangguan fasa-fasa :
Ihs3f := 26240  # A
Ihs2f := sqrt(3)/2*Ihs3f
Ihs2f = 22724.5  # A
# Arc resistance :
Ra := (28710*Lc)/Ihs2f^1.4
Ra = 0.0982674  # Ω
# Resistive reach max :
Rphmax := Zloadmin - MRphmax
Rphmax = 72.7752  # Ω  # sekunder
Rgmax := Zloadmin - MRgmax
Rgmax = 97.0337  # Ω  # sekunder
# Resistive reach min :
Rphmin := Ra*n1
Rphmin = 0.196535  # Ω  # sekunder
Rgmin := 20*n1
Rgmin = 40  # Ω  # sekunder
# Setting resistive reach : | lebih besar dari Rgmin dan lebih kecil dari Rgmax
Rphminr := 0  # Ω
R3ph := 0.9*Rphmax
R3ph = 65.4977  # Ω  # sekunder
Rphmaxr := 400/In  # Ω
R3g := 0.5*Zloadmin
R3g = 60.646  # Ω  # sekunder
# modif rumus karena nilai R3g melewati 50%Zload min
faktor_pengali1 := 1.001*sqrt(Rgmin/R3g) = 0.812948
faktor_pengali2 := 1.001*(Rgmin/R3g)^0.333 = 0.871459
Rphstep := 0.01/In  # Ω
R2ph := 0.9*R3ph
R2ph = 58.9479  # Ω  # sekunder
Rgminr := 0  # Ω
R2g := 0.8*R3g = 48.5168
R2g = 48.5168  # Ω  # sekunder
R1ph := 0.8*R2ph
R1ph = 47.1584  # Ω  # sekunder
Rgmaxr := 400/In  # Ω
R1g := 0.8*R2g
R1g = 38.8135  # Ω  # sekunder
Rgstep := 0.01/In  # Ω
Rgmin = 40
Rphmin = 0.196535
# DISTANCE SCHEME :
# Program mode : Standard scheme
# Standard mode : BASIC
# Fault type  : Both enabled | Phase to ground and Phase to phase fault
# Trip mode  : 1P Z1 Z2 & CR
# Bit  : 6 5 4 3 2 1 0
# TOR-SOTF Mode : 0 0 0 0 0 1 1
# Bit 0 = Z1  enabled
# Bit 1 = Z2  enabled
# Bit 2 = Zp  enabled
# Bit 3 = Z3  enabled
# Bit 4 = Z4  enabled
# SOTF Delay  : 30 sec.
# Weak Infeed  : Disabled
# Loss of Load  : Disabled
# Z BLINDER IMP:
CC = 1428  # A
Vp := PT1*100 = 150000  # V
k := 2*π/360
k = 0.0174533
n1 = 2
# a. Load Impedance:
Zld_primer := Vp/sqrt(3)/CC
Zld_primer = 60.646  # Ω (primary)
Zld := Zld_primer*n1 = 121.292  # Ω (secondary)
# Power factor load angle:
θld := 30*k
cos(30*k) = 0.866025
# b. Blinder Impedance:
ZB := Zld*cos(30*k)*0.51
ZB = 53.5714  # Ω (secondary)
ZB_primer := ZB/n1 = 26.7857  # Ω (primary)
# POWER SWING :
ΔRmin := 0
ΔR := 0.3*R3ph
ΔR = 19.6493  # Ω
ΔX := 0.3*R3ph
ΔX = 19.6493  # Ω
ΔRmax := 400/In  # Ω
R5 := 0.85*ZB
Z5 := 2*|ZL|
R5 = 45.5357  # Ω
Z5 = 0.833154  # Ω
ΔRstep := 0.01/In  # Ω
# SUPERVISION
# AUTORECLOSE
# 1P Trip Mode  : 1 - 3
# 1P Dead Time 1  : 1  sec
# Reclaim Time  : 40  sec
# Pulse Time  : 0.2  sec
# SUSEPTANCE
# ARUS DIFF saat kondisi NORMAL
I_diff.normal := 42  # A
B_suseptance := I_diff.normal*sqrt(3)*10^6/150000
# Nilai SUSEPTANCE
B_suseptance = 484.974  # uS
# 2. Perhitungan Setting
# 2.1 Current Differential Setting
# a. basic current differential setting I_s1 :
# Tegangan Sistem
KV := PT1*100 = 150000
# Charging Current :
Bt_unit := 132*10^-6  # S/km
Bt := Bt_unit*L1/n1 = 214.5*10^-6  # S
Xc := 1/Bt
Xc = 4662  # Ω
# Charging current :
Ic := KV/(sqrt(3)*Xc)
Ic = 18.5762  # A primary
Ics := Ic/CT1
Ics = 0.00619208  # A secondary
# Setting I_s1 minimum 2.5 x arus charging :
In = 1
Is_calculation := 2.5*Ics
Is_calculation = 0.0154802  # A secondary
Is_standard := 0.2*In = 0.2  # A secondary
Is1 := Is_standard*(Is_calculation < Is_standard) + Is_calculation*(Is_calculation ≥ Is_standard)
# *nilai perhitungan terlalu kecil, dipilih 0.2 x In
# dipilih :
Is1 = 0.2  # A secondary
# b. percentage bias setting k_(1  :)
k1 := 30 %  # (recommended by manufacture)
# c. basic current differential setting I_s2 :
Is2 := 2*In  # (recommended by manufacture)
# dipilih :
Is2 = 2  # A secondary
# d. percentage bias setting k_2  _(:)
k2 := 150 %
CT_A := 3000/1
CT_B := 2000/1
CT_corr_di_A := CT_A/CT_B = 1.5
CT_corr_di_B := CT_B/CT_B = 1
